Simulations: Version=174
  DataStore
  Experiment Standard
    Factors
      Permutation
        Factor Site
          CompositeFactor Dalby
            Specifications:
              [Soil]
              [Weather]
              [Clock]
            Soil Black Vertosol-Bongeen (Dalby No027): ASCOrder=Vertosol; ASCSubOrder=Black; SoilType=Black Vertosol; Site=Dalby; NearestTown=Dalby, Q 4405; Region=Darling Downs and Granite Belt; State=Queensland; Country=Australia; ApsoilNumber=27; Latitude=-27.123; Longitude=151.305; LocationAccuracy=+/- 20m; YearOfSampling=0; DataSource=CSIRO Sustainable Ecosystems, Toowoomba
              Comments=Clay - Toowoomba - Wheat ll,xf copied from sorghum. Wheat kl is just default apsim kl values for wheat.
              Physical
                Thickness  ParticleSizeClay  ParticleSizeSand  ParticleSizeSilt  Rocks  BD    AirDry  LL15  DUL   SAT
                150        30                5                 65                0      1.25  0.115   0.23  0.45  0.5
                150        30                5                 65                0      1.31  0.184   0.23  0.43  0.48
                300        30                5                 65                0      1.23  0.23    0.23  0.46  0.51
                300        30                5                 65                0      1.24  0.23    0.23  0.45  0.5
                300        30                5                 65                0      1.25  0.23    0.23  0.45  0.5
                300        30                5                 65                0      1.26  0.23    0.23  0.44  0.49
                300        30                5                 65                0      1.29  0.23    0.23  0.43  0.48
                BD, DUL source: Field measured and checked for sensibility
                AirDry, LL15 source: Estimated based on local knowledge
                SAT source: Calculated from measured, estimated or calculated BD
                Rocks, ParticleSizeSand, ParticleSizeSilt, ParticleSizeClay source: Calculated
                SoilCrop wheatSoil: LL=[0.23, 0.24, 0.29, 0.34, 0.37, 0.38, 0.39]; KL=[0.06, 0.06, 0.06, 0.04, 0.04, 0.02, 0.01]; XF=[1, 1, 1, 1, 1, 1, 1]
                  LL source: Estimated based on local knowledge
                SoilCrop sorghumSoil: LL=[0.23, 0.24, 0.29, 0.34, 0.37, 0.38, 0.39]; KL=[0.07, 0.07, 0.07, 0.05, 0.05, 0.04, 0.03]; XF=[1, 1, 1, 1, 1, 1, 1]
                  LL source: Field measured and checked for sensibility
                SoilCrop chickpeaSoil: same as Standard.Factors.Permutation.Site.Dalby.Black Vertosol-Bongeen (Dalby No027).Physical.sorghumSoil
                SoilCrop MungbeanSoil: same as Standard.Factors.Permutation.Site.Dalby.Black Vertosol-Bongeen (Dalby No027).Physical.wheatSoil
                SoilCrop maizeSoil: same as Standard.Factors.Permutation.Site.Dalby.Black Vertosol-Bongeen (Dalby No027).Physical.sorghumSoil
                SoilCrop SoybeanSoil: same as Standard.Factors.Permutation.Site.Dalby.Black Vertosol-Bongeen (Dalby No027).Physical.wheatSoil
                SoilCrop RedcloverSoil: same as Standard.Factors.Permutation.Site.Dalby.Black Vertosol-Bongeen (Dalby No027).Physical.sorghumSoil
                SoilCrop CottonSoil: LL=[0.23, 0.23, 0.23, 0.303, 0.328, 0.346, 0.366]; KL=[0.1, 0.1, 0.1, 0.1, 0.09, 0.07, 0.05]; XF=[1, 1, 1, 1, 1, 1, 1]
                  LL, KL, XF source: Estimated
              WaterBalance SoilWater: SummerDate=1-Nov; SummerU=6; SummerCona=3.5; WinterDate=1-Apr; WinterU=4; WinterCona=2.5; DiffusConst=40; DiffusSlope=16; Salb=0.12; CN2Bare=73; CNRed=20; CNCov=0.8; PSIDul=-100; Thickness=[150, 150, 300, 300, 300, 300, 300]; SWCON=[0.3, 0.3, 0.3, 0.3, 0.3, 0.3, 0.3]
              Organic: FOMCNRatio=40; CarbonUnits=WalkleyBlack
                Thickness  Carbon  SoilCNRatio  FBiom  FInert  FOM
                150        0.915   12           0.04   0.4     347.129
                150        0.777   12           0.02   0.6     270.344
                300        0.346   12           0.02   0.8     163.972
                300        0.231   12           0.02   1       99.454
                300        0.154   12           0.01   1       60.322
                300        0.123   12           0.01   1       36.587
                300        0.131   12           0.01   1       22.191
              Chemical: Thickness=[150, 150, 300, 300, 300, 300, 300]; PH=[8.2, 8.5, 8.6, 8.6, 7.4, 5.3, 5.3]; PHUnits=Water
                PH source: Estimated based on local knowledge
              Nutrient
              Solute NO3: Thickness=[300, 1500]; InitialValues=[100, 0]; InitialValuesUnits=kg/ha; WaterTableConcentration=0; D0=0; DepthConstant=0; MaxDepthSoluteAccessible=0; RunoffEffectivenessAtMovingSolute=0; MaxEffectiveRunoff=0
              Solute NH4: Thickness=[600, 1200]; InitialValues=[0, 0]; InitialValuesUnits=ppm; WaterTableConcentration=0; D0=0; DepthConstant=0; MaxDepthSoluteAccessible=0; RunoffEffectivenessAtMovingSolute=0; MaxEffectiveRunoff=0
              Solute Urea: Thickness=[150, 150, 300, 300, 300, 300, 300]; InitialValues=[0, 0, 0, 0, 0, 0, 0]; InitialValuesUnits=kg/ha; WaterTableConcentration=0; D0=0; DepthConstant=0; MaxDepthSoluteAccessible=0; RunoffEffectivenessAtMovingSolute=0; MaxEffectiveRunoff=0
              Water: Thickness=[150, 150, 300, 300, 300, 300, 300]; InitialValues=[0.275, 0.271, 0.278, 0.275, 0.275, 0.273, 0.271]; InitialPAWmm=79.5; RelativeTo=LL15; FilledFromTop=false
              CERESSoilTemperature Temperature
              SoilTemperature (disabled): CONSTANT_TEMPdepth=10
            Weather Dalby met
              FileName=C:\Users\uqztan6\OneDrive - The University of Queensland\Documents\APSFARM model\Moonggoo\climate\baseline\Dalby_baseline.met
            Clock: Start=1970-01-01; End=2019-12-31
          CompositeFactor DalbySSP126
            Specifications:
              [Soil]
              [Weather]
              [Clock]
            Soil Black Vertosol-Bongeen (Dalby No027): ASCOrder=Vertosol; ASCSubOrder=Black; SoilType=Black Vertosol; Site=Dalby; NearestTown=Dalby, Q 4405; Region=Darling Downs and Granite Belt; State=Queensland; Country=Australia; ApsoilNumber=27; Latitude=-27.123; Longitude=151.305; LocationAccuracy=+/- 20m; YearOfSampling=0; DataSource=CSIRO Sustainable Ecosystems, Toowoomba
              Comments=Clay - Toowoomba - Wheat ll,xf copied from sorghum. Wheat kl is just default apsim kl values for wheat.
              Physical
                Thickness  ParticleSizeClay  ParticleSizeSand  ParticleSizeSilt  Rocks  BD    AirDry  LL15  DUL   SAT
                150        30                5                 65                0      1.25  0.115   0.23  0.45  0.5
                150        30                5                 65                0      1.31  0.184   0.23  0.43  0.48
                300        30                5                 65                0      1.23  0.23    0.23  0.46  0.51
                300        30                5                 65                0      1.24  0.23    0.23  0.45  0.5
                300        30                5                 65                0      1.25  0.23    0.23  0.45  0.5
                300        30                5                 65                0      1.26  0.23    0.23  0.44  0.49
                300        30                5                 65                0      1.29  0.23    0.23  0.43  0.48
                BD, DUL source: Field measured and checked for sensibility
                AirDry, LL15 source: Estimated based on local knowledge
                SAT source: Calculated from measured, estimated or calculated BD
                Rocks, ParticleSizeSand, ParticleSizeSilt, ParticleSizeClay source: Calculated
                SoilCrop wheatSoil: same as Standard.Factors.Permutation.Site.Dalby.Black Vertosol-Bongeen (Dalby No027).Physical.wheatSoil
                SoilCrop sorghumSoil: same as Standard.Factors.Permutation.Site.Dalby.Black Vertosol-Bongeen (Dalby No027).Physical.sorghumSoil
                SoilCrop chickpeaSoil: same as Standard.Factors.Permutation.Site.Dalby.Black Vertosol-Bongeen (Dalby No027).Physical.sorghumSoil
                SoilCrop MungbeanSoil: same as Standard.Factors.Permutation.Site.Dalby.Black Vertosol-Bongeen (Dalby No027).Physical.wheatSoil
                SoilCrop maizeSoil: same as Standard.Factors.Permutation.Site.Dalby.Black Vertosol-Bongeen (Dalby No027).Physical.sorghumSoil
                SoilCrop SoybeanSoil: same as Standard.Factors.Permutation.Site.Dalby.Black Vertosol-Bongeen (Dalby No027).Physical.wheatSoil
                SoilCrop RedcloverSoil: same as Standard.Factors.Permutation.Site.Dalby.Black Vertosol-Bongeen (Dalby No027).Physical.sorghumSoil
                SoilCrop CottonSoil: LL=[0.23, 0.23, 0.23, 0.30285, 0.3276, 0.34628, 0.3655]; KL=[0.1, 0.1, 0.1, 0.1, 0.09, 0.07, 0.05]; XF=[1, 1, 1, 1, 1, 1, 1]
                  LL, KL, XF source: Estimated
              WaterBalance SoilWater: same as Standard.Factors.Permutation.Site.Dalby.Black Vertosol-Bongeen (Dalby No027).SoilWater
              Organic: same as Standard.Factors.Permutation.Site.Dalby.Black Vertosol-Bongeen (Dalby No027).Organic
              Chemical: same as Standard.Factors.Permutation.Site.Dalby.Black Vertosol-Bongeen (Dalby No027).Chemical
              Nutrient
              Solute NO3: Thickness=[300, 1500]; InitialValues=[100, 0]; InitialValuesUnits=kg/ha; WaterTableConcentration=0; D0=0; DepthConstant=0; MaxDepthSoluteAccessible=0; RunoffEffectivenessAtMovingSolute=0; MaxEffectiveRunoff=0
              Solute NH4: Thickness=[600, 1200]; InitialValues=[0, 0]; InitialValuesUnits=ppm; WaterTableConcentration=0; D0=0; DepthConstant=0; MaxDepthSoluteAccessible=0; RunoffEffectivenessAtMovingSolute=0; MaxEffectiveRunoff=0
              Solute Urea: same as Standard.Factors.Permutation.Site.Dalby.Black Vertosol-Bongeen (Dalby No027).Urea
              Water: Thickness=[150, 150, 300, 300, 300, 300, 300]; InitialValues=[0.275, 0.271, 0.278, 0.275, 0.275, 0.273, 0.271]; InitialPAWmm=79.5; RelativeTo=LL15; FilledFromTop=false
              CERESSoilTemperature Temperature
              SoilTemperature: CONSTANT_TEMPdepth=10
            Weather Dalby126 met
              FileName=C:\Users\uqztan6\OneDrive - The University of Queensland\Documents\APSFARM model\Moonggoo\climate\baseline\Dalby_ssp126.met
            Clock: Start=2021-01-01; End=2070-12-31
          CompositeFactor DalbySSP245
            Specifications:
              [Soil]
              [Weather]
              [Clock]
            Soil Black Vertosol-Bongeen (Dalby No027): same as Standard.Factors.Permutation.Site.DalbySSP126.Black Vertosol-Bongeen (Dalby No027)
            Weather Dalby245 met
              FileName=C:\Users\uqztan6\OneDrive - The University of Queensland\Documents\APSFARM model\Moonggoo\climate\baseline\Dalby_ssp245.met
            Clock: Start=2021-01-01; End=2070-12-31
          CompositeFactor DalbySSP585
            Specifications:
              [Soil]
              [Weather]
              [Clock]
            Soil Black Vertosol-Bongeen (Dalby No027): same as Standard.Factors.Permutation.Site.DalbySSP126.Black Vertosol-Bongeen (Dalby No027)
            Weather Dalby585 met
              FileName=C:\Users\uqztan6\OneDrive - The University of Queensland\Documents\APSFARM model\Moonggoo\climate\baseline\Dalby_ssp585.met
            Clock: Start=2021-01-01; End=2070-12-31
          CompositeFactor Capella
            Specifications:
              [Soil]
              [Weather]
              [Clock]
            Weather Capella met
              FileName=C:\Users\uqztan6\OneDrive - The University of Queensland\Documents\APSFARM model\Moonggoo\climate\Capella\Capella_baseline.met
            Clock: Start=1970-01-01; End=2019-12-31
            Soil Black Vertosol (Capella No1272): ASCOrder=Vertosol; ASCSubOrder=Black; SoilType=Black Vertosol; Site=Capella; NearestTown=Capella; Region=Central Highlands; State=Queensland; Country=Australia; ApsoilNumber=1272; Latitude=-23.159917; Longitude=148.048517; LocationAccuracy=+/- 20m; YearOfSampling=2015; DataSource=Brett Cocks  CSIRO Agriculture
              Comments=Shallow Vertosol Black Self-Mulching Epicalcareous over decaying basalt  - Collected as a part of GRDC Measuring an manageing soil water
              Physical
                Thickness  ParticleSizeClay  ParticleSizeSand  ParticleSizeSilt  Rocks  BD    AirDry  LL15  DUL    SAT
                150        30                5                 65                0      1.15  0.15    0.3   0.487  0.537
                150        30                5                 65                0      1.16  0.24    0.3   0.481  0.531
                300        30                5                 65                0      1.17  0.3     0.3   0.48   0.53
                300        30                5                 65                0      1.17  0.3     0.3   0.48   0.53
                BD, DUL, SAT source: Field measured and checked for sensibility
                AirDry, LL15 source: Estimated based on local knowledge
                Rocks, ParticleSizeSand, ParticleSizeSilt, ParticleSizeClay source: Calculated
                SoilCrop maizeSoil: LL=[0.28, 0.28, 0.3, 0.3]; KL=[0.06, 0.06, 0.06, 0.04]; XF=[1, 1, 1, 1]
                  LL source: Field measured and checked for sensibility
                SoilCrop sorghumSoil: same as Standard.Factors.Permutation.Site.Capella.Black Vertosol (Capella No1272).Physical.maizeSoil
                SoilCrop chickpeaSoil: same as Standard.Factors.Permutation.Site.Capella.Black Vertosol (Capella No1272).Physical.maizeSoil
                SoilCrop wheatSoil: same as Standard.Factors.Permutation.Site.Capella.Black Vertosol (Capella No1272).Physical.maizeSoil
                SoilCrop MungbeanSoil: LL=[0.261, 0.248, 0.3, 0.306]; KL=[0.06, 0.06, 0.06, 0.04]; XF=[1, 1, 1, 1]
                SoilCrop SoybeanSoil: LL=[0.261, 0.248, 0.3, 0.306]; KL=[0.06, 0.06, 0.06, 0.04]; XF=[1, 1, 1, 1]
                SoilCrop RedcloverSoil: LL=[0.28, 0.28, 0.3, 0.3]; KL=[0.06, 0.06, 0.06, 0.04]; XF=[1, 1, 1, 1]
                SoilCrop CottonSoil: LL=[0.3, 0.3, 0.3, 0.313]; KL=[0.1, 0.1, 0.1, 0.1]; XF=[1, 1, 1, 1]
                  LL, KL, XF source: Estimated
              WaterBalance SoilWater: SummerDate=1-nov; SummerU=6; SummerCona=3.5; WinterDate=1-apr; WinterU=4; WinterCona=2.5; DiffusConst=40; DiffusSlope=16; Salb=0.12; CN2Bare=73; CNRed=20; CNCov=0.08; PSIDul=-100; Thickness=[150, 150, 300, 300]; SWCON=[0.3, 0.3, 0.3, 0.3]
              Organic: FOMCNRatio=40; CarbonUnits=WalkleyBlack
                Thickness  Carbon  SoilCNRatio  FBiom  FInert  FOM
                150        0.75    12           0.04   0.4     523.082
                150        0.6     12           0.02   0.6     317.265
                300        0.375   12           0.01   0.8     116.715
                300        0.188   12           0.01   0.95    42.937
              Chemical: PHUnits=Water
                Thickness  PH   EC    ESP    CEC
                150        8.1  0.06  0.005  76
                150        8.2  0.05  0.007  76
                300        8.4  0.07  0.011  71
                300        8.3  0.07  0.017  70
                EC, CL, PH source: Measured
                ESP source: C
              Nutrient
              Solute NO3: Thickness=[300]; InitialValues=[50]; InitialValuesUnits=kg/ha; WaterTableConcentration=0; D0=0; DepthConstant=0; MaxDepthSoluteAccessible=0; RunoffEffectivenessAtMovingSolute=0; MaxEffectiveRunoff=0
              Solute NH4: InitialValuesUnits=ppm; WaterTableConcentration=0; D0=0; DepthConstant=0; MaxDepthSoluteAccessible=0; RunoffEffectivenessAtMovingSolute=0; MaxEffectiveRunoff=0
              Solute Urea: Thickness=[150, 150, 300, 300]; InitialValues=[0, 0, 0, 0]; InitialValuesUnits=kg/ha; WaterTableConcentration=0; D0=0; DepthConstant=0; MaxDepthSoluteAccessible=0; RunoffEffectivenessAtMovingSolute=0; MaxEffectiveRunoff=0
              Water: Thickness=[150, 150, 300, 300]; InitialValues=[0.45, 0.445, 0.444, 0.444]; InitialPAWmm=130.65; RelativeTo=LL15; FilledFromTop=false
              CERESSoilTemperature Temperature
              CERESSoilTemperature SoilTemperature
          CompositeFactor CapellaSSP126
            Specifications:
              [Soil]
              [Weather]
              [Clock]
            Weather Capella126
              FileName=C:\Users\uqztan6\OneDrive - The University of Queensland\Documents\APSFARM model\Moonggoo\climate\Capella\Capella_ssp126.met
            Clock: Start=2021-01-01; End=2070-12-31
            Soil Black Vertosol (Capella No1272): same as Standard.Factors.Permutation.Site.Capella.Black Vertosol (Capella No1272)
          CompositeFactor CapellaSSP245
            Specifications:
              [Soil]
              [Weather]
              [Clock]
            Weather Capella245
              FileName=C:\Users\uqztan6\OneDrive - The University of Queensland\Documents\APSFARM model\Moonggoo\climate\Capella\Capella_ssp245.met
            Clock: Start=2021-01-01; End=2070-12-31
            Soil Black Vertosol (Capella No1272): same as Standard.Factors.Permutation.Site.Capella.Black Vertosol (Capella No1272)
          CompositeFactor CapellaSSP585
            Specifications:
              [Soil]
              [Weather]
              [Clock]
            Weather Capella585
              FileName=C:\Users\uqztan6\OneDrive - The University of Queensland\Documents\APSFARM model\Moonggoo\climate\Capella\Capella_ssp585.met
            Clock: Start=2021-01-01; End=2070-12-31
            Soil Black Vertosol (Capella No1272): same as Standard.Factors.Permutation.Site.Capella.Black Vertosol (Capella No1272)
          CompositeFactor Georgetown
            Specifications:
              [Soil]
              [Weather]
              [Clock]
            Weather Georgetown met
              FileName=C:\Users\uqztan6\OneDrive - The University of Queensland\Documents\APSFARM model\Moonggoo\climate\baseline\Gilbert_baseline.met
            Clock: Start=1970-01-01; End=2019-12-31
            Soil Synthetic Soil Derived from the SLGA: ASCOrder=NA; ASCSubOrder=NA; SoilType=Loam over Clay Loam; Site=9947_36660; NearestTown=GEORGETOWN; Region=Einasleigh Uplands; State=Queensland; ApsoilNumber=9999; Latitude=-18.2899; Longitude=143.55; LocationAccuracy=+- 90m; YearOfSampling=2024; Comments=Landuse is Grazing natural vegetation
              NaturalVegetation=Arid and semi-arid acacia low open woodlands and shrublands with hummock grass
              DataSource=Soil and Landscape Grid of Australia. This soil parameter file was automatically generated from the GSM National Surfaces using pedotransfer functions.
              Water: Thickness=[150, 150, 150, 150, 200, 200]; InitialValues=[0.22, 0.229, 0.242, 0.248, 0.249, 0.248]; InitialPAWmm=96.5; RelativeTo=LL15; FilledFromTop=false
              Physical
                Thickness  ParticleSizeClay  ParticleSizeSand  ParticleSizeSilt  Rocks  BD     AirDry  LL15   DUL    SAT    KS
                150        30                5                 65                0      1.494  0.039   0.116  0.22   0.375  65.943
                150        30                5                 65                0      1.536  0.043   0.13   0.229  0.367  38.13
                150        30                5                 65                0      1.542  0.048   0.144  0.242  0.369  25.177
                150        30                5                 65                0      1.544  0.05    0.151  0.248  0.37   20.459
                200        30                5                 65                0      1.559  0.052   0.155  0.249  0.367  17.558
                200        30                5                 65                0      1.578  0.053   0.158  0.248  0.361  15.737
                Rocks, ParticleSizeSand, ParticleSizeSilt, ParticleSizeClay source: Calculated
                SoilCrop MaizeSoil: LL=[0.122, 0.136, 0.15, 0.156, 0.159, 0.161]; KL=[0.06, 0.06, 0.059, 0.053, 0.044, 0.032]; XF=[1, 0.946, 0.911, 0.903, 0.871, 0.826]
                SoilCrop SorghumSoil: LL=[0.123, 0.137, 0.151, 0.157, 0.16, 0.162]; KL=[0.07, 0.07, 0.069, 0.064, 0.056, 0.046]; XF=[1, 0.946, 0.911, 0.903, 0.871, 0.826]
                SoilCrop ChickpeaSoil: LL=[0.122, 0.136, 0.15, 0.157, 0.16, 0.161]; KL=[0.06, 0.06, 0.06, 0.059, 0.051, 0.037]; XF=[1, 0.946, 0.911, 0.903, 0.871, 0.826]
                SoilCrop WheatSoil: LL=[0.122, 0.136, 0.15, 0.156, 0.159, 0.161]; KL=[0.06, 0.06, 0.059, 0.053, 0.044, 0.032]; XF=[1, 0.946, 0.911, 0.903, 0.871, 0.826]
                SoilCrop MungbeanSoil: LL=[0.122, 0.136, 0.15, 0.156, 0.159, 0.16]; KL=[0.06, 0.06, 0.06, 0.055, 0.042, 0.025]; XF=[1, 0.946, 0.911, 0.903, 0.871, 0.826]
                SoilCrop SoybeanSoil: LL=[0.122, 0.136, 0.15, 0.156, 0.159, 0.161]; KL=[0.06, 0.06, 0.059, 0.053, 0.044, 0.032]; XF=[1, 0.946, 0.911, 0.903, 0.871, 0.826]
                SoilCrop RedcloverSoil: LL=[0.123, 0.137, 0.151, 0.157, 0.16, 0.162]; KL=[0.07, 0.07, 0.069, 0.064, 0.056, 0.046]; XF=[1, 0.946, 0.911, 0.903, 0.871, 0.826]
              WaterBalance SoilWater: SummerDate=1-nov; SummerU=6; SummerCona=6; WinterDate=1-apr; WinterU=4; WinterCona=2.5; DiffusConst=124.373; DiffusSlope=41.6961; Salb=0.13; CN2Bare=78; CNRed=20; CNCov=0; DischargeWidth=10; CatchmentArea=4590.63; PSIDul=-100; Thickness=[150, 150, 150, 150, 200, 200]; SWCON=[0.51097, 0.460319, 0.417846, 0.395004, 0.329609, 0.320335]
              Organic: FOMCNRatio=40; CarbonUnits=Total
                Thickness  Carbon    SoilCNRatio  FBiom    FInert    FOM
                150        0.900074  14           0.04     0.323991  475.475
                150        0.527478  14           0.03106  0.549705  303.176
                150        0.382413  14           0.01404  0.753966  193.314
                150        0.327676  14           0.01     0.880237  123.262
                200        0.276817  14           0.01     0.992121  67.6477
                200        0.232864  14           0.01     1         37.1259
              Chemical: Thickness=[150, 150, 150, 150, 200, 200]; PH=[5.82003, 5.93881, 6.09601, 6.17339, 6.17453, 6.17256]; PHUnits=Water
              Solute NO3: Thickness=[150, 150, 150, 150, 200, 200]; InitialValues=[0, 0, 0, 0, 0, 0]; InitialValuesUnits=ppm; WaterTableConcentration=0; D0=0; DepthConstant=0; MaxDepthSoluteAccessible=0; RunoffEffectivenessAtMovingSolute=0; MaxEffectiveRunoff=0
              Solute NH4: same as Standard.Factors.Permutation.Site.Georgetown.Synthetic Soil Derived from the SLGA.NO3
              Solute Urea: same as Standard.Factors.Permutation.Site.Georgetown.Synthetic Soil Derived from the SLGA.NO3
              CERESSoilTemperature Temperature
              Nutrient
              CERESSoilTemperature SoilTemperature
          CompositeFactor GeorgetownSSP126
            Specifications:
              [Soil]
              [Weather]
              [Clock]
            Weather GeorgetownSSP126
              FileName=C:\Users\uqztan6\OneDrive - The University of Queensland\Documents\APSFARM model\Moonggoo\climate\baseline\Gilbert_ssp126.met
            Clock: Start=2021-01-01; End=2070-12-31
            Soil Synthetic Soil Derived from the SLGA: same as Standard.Factors.Permutation.Site.Georgetown.Synthetic Soil Derived from the SLGA
          CompositeFactor GeorgetownSSP245
            Specifications:
              [Soil]
              [Weather]
              [Clock]
            Weather GeorgetownSSP245
              FileName=C:\Users\uqztan6\OneDrive - The University of Queensland\Documents\APSFARM model\Moonggoo\climate\baseline\Gilbert_ssp245.met
            Clock: Start=2021-01-01; End=2070-12-31
            Soil Synthetic Soil Derived from the SLGA: same as Standard.Factors.Permutation.Site.Georgetown.Synthetic Soil Derived from the SLGA
          CompositeFactor GeorgetownSSP585
            Specifications:
              [Soil]
              [Weather]
              [Clock]
            Weather GeorgetownSSP585
              FileName=C:\Users\uqztan6\OneDrive - The University of Queensland\Documents\APSFARM model\Moonggoo\climate\baseline\Gilbert_ssp585.met
            Clock: Start=2021-01-01; End=2070-12-31
            Soil Synthetic Soil Derived from the SLGA: same as Standard.Factors.Permutation.Site.Georgetown.Synthetic Soil Derived from the SLGA
    Simulation Farm
      Clock: Start=1970-01-01; End=2019-12-31
      Summary SummaryFile
      Weather
        FileName=C:\Users\uqztan6\OneDrive - The University of Queensland\Documents\APSFARM model\Moonggoo\climate\baseline\Capella_baseline.met
      SoilArbitrator Soil Arbitrator
      Zone Field 1: Area=1; Slope=0; AspectAngle=0; Altitude=50
        Fertiliser
        SurfaceOrganicMatter: InitialResidueName=wheat_stubble; InitialResidueType=wheat; InitialResidueMass=500; InitialStandingFraction=0; InitialCPR=0; InitialCNR=100
        MicroClimate: a_interception=0; b_interception=1; c_interception=0; d_interception=0; SoilHeatFluxFraction=0.4; MinimumHeightDiffForNewLayer=0; NightInterceptionFraction=0.5; ReferenceHeight=2
        Plant Maize
        Plant Wheat
        Plant Sorghum
        Plant Mungbean
        Plant Soybean
        Plant Chickpea
        Plant RedClover
        Soil Black Vertosol-Bongeen (Dalby No027): ASCOrder=Vertosol; ASCSubOrder=Black; SoilType=Black Vertosol; Site=Dalby; NearestTown=Dalby, Q 4405; Region=Darling Downs and Granite Belt; State=Queensland; Country=Australia; ApsoilNumber=27; Latitude=-27.123; Longitude=151.305; LocationAccuracy=+/- 20m; YearOfSampling=0; DataSource=CSIRO Sustainable Ecosystems, Toowoomba
          Comments=Clay - Toowoomba - Wheat ll,xf copied from sorghum. Wheat kl is just default apsim kl values for wheat.
          Physical: same as Standard.Factors.Permutation.Site.DalbySSP126.Black Vertosol-Bongeen (Dalby No027).Physical
          WaterBalance SoilWater: same as Standard.Factors.Permutation.Site.Dalby.Black Vertosol-Bongeen (Dalby No027).SoilWater
          Organic: same as Standard.Factors.Permutation.Site.Dalby.Black Vertosol-Bongeen (Dalby No027).Organic
          Chemical: same as Standard.Factors.Permutation.Site.Dalby.Black Vertosol-Bongeen (Dalby No027).Chemical
          Nutrient
          Solute NO3: Thickness=[300, 1500]; InitialValues=[100, 0]; InitialValuesUnits=kg/ha; WaterTableConcentration=0; D0=0; DepthConstant=0; MaxDepthSoluteAccessible=0; RunoffEffectivenessAtMovingSolute=0; MaxEffectiveRunoff=0
          Solute NH4: Thickness=[600, 1200]; InitialValues=[0, 0]; InitialValuesUnits=ppm; WaterTableConcentration=0; D0=0; DepthConstant=0; MaxDepthSoluteAccessible=0; RunoffEffectivenessAtMovingSolute=0; MaxEffectiveRunoff=0
          Solute Urea: same as Standard.Factors.Permutation.Site.Dalby.Black Vertosol-Bongeen (Dalby No027).Urea
          Water: Thickness=[150, 150, 300, 300, 300, 300, 300]; InitialValues=[0.275, 0.271, 0.278, 0.275, 0.275, 0.273, 0.271]; InitialPAWmm=79.5; RelativeTo=LL15; FilledFromTop=false
          CERESSoilTemperature Temperature
          SoilTemperature (disabled): CONSTANT_TEMPdepth=10
      Zone Field 2: same as Standard.Farm.Field 1
      Zone Field 3: same as Standard.Farm.Field 1
      Zone Field 4: same as Standard.Farm.Field 1
      Zone Field 5: same as Standard.Farm.Field 1
      Zone Field 6: same as Standard.Farm.Field 1
      Zone Field 7: same as Standard.Farm.Field 1
      Zone Field 8: same as Standard.Farm.Field 1
      Zone Field 9: same as Standard.Farm.Field 1
      Zone Field 10: same as Standard.Farm.Field 1
      FarmMachinery: FuelCost=1.85; WorkRates=[18, 0, 0, 70, 18, 0, 18, 0]; FuelConsRates=[46, 0, 0, 46, 46, 0, 46, 0]; FuelConsumption=0
        TractorNames=[220kW FWA, 220kW FWA, SprayRig, SprayRig, 220kW FWA, SprayRig, 220kW FWA, SprayRig]
        ImplementNames=[Planter, Sprayer, Planter, Sprayer, Manure Spreader, Manure Spreader, Disc Cultivator, Disc Cultivator]
        FarmMachineryItem 220kW FWA: MachineryType=0; MaxHours=12; NewPrice=0; TradeInValue=0; LifeOfEquipment=0; OilTyreCost=1; RepairsMaintenance=0
        FarmMachineryItem Planter: MachineryType=1; MaxHours=12; NewPrice=0; TradeInValue=0; LifeOfEquipment=0; OilTyreCost=0; RepairsMaintenance=0
        FarmMachineryItem SprayRig: MachineryType=0; MaxHours=8; NewPrice=0; TradeInValue=0; LifeOfEquipment=0; OilTyreCost=0.5; RepairsMaintenance=0
        FarmMachineryItem Sprayer: MachineryType=1; MaxHours=8; NewPrice=0; TradeInValue=0; LifeOfEquipment=0; OilTyreCost=0; RepairsMaintenance=0
          Memo
            https://www.deere.com/en/sprayers/see-spray-ultimate/
        FarmMachineryItem Manure Spreader: MachineryType=1; MaxHours=12; NewPrice=0; TradeInValue=0; LifeOfEquipment=0; OilTyreCost=0; RepairsMaintenance=0
        FarmMachineryItem Disc Cultivator: MachineryType=1; MaxHours=12; NewPrice=0; TradeInValue=0; LifeOfEquipment=0; OilTyreCost=0; RepairsMaintenance=0
      FarmEconomics: InitialBalance=0; Balance=0
        CostPriceInfo Wheat: VariableCost=47; Price=314
        CostPriceInfo Maize: VariableCost=132; Price=314
        CostPriceInfo Sorghum: VariableCost=33; Price=311
        CostPriceInfo Chickpea: VariableCost=83; Price=796
        CostPriceInfo Mungbean: VariableCost=57; Price=1103
        CostPriceInfo Soybean: VariableCost=40; Price=537
        CostPriceInfo Covercrop: VariableCost=40; Price=0
        CostInfo Urea: Cost=1.4
          Memo
            https://tgrm.com.au/_products//Products/FERTILISERS/INCITECPIVOTFERTILISERSSTOCKFEEDUREA25KGBAG1150528201-8106-16630-.aspx
        CostInfo Roundup: Cost=12
          Memo
            https://roundup.com/en-us/shop/driveway-patio-weeds/roundup-dual-action-365/roundup-dual-action-365.html
        CostInfo Manure: Cost=0.425
          Memo
            $425/t from https://tgrm.com.au/_products//Products/ORGANICPRODUCTS/KATEK1TONBAGSTANDARDPOULTRYMANUREPELLETSSUPERBOOSTER103-8115-16126-.aspx
        CostInfo Pesticide: Cost=62.4
          Memo
            https://agmargins.net.au/Reports/Details/52f7ee1a-caf7-4242-9ba2-278cda704282
            https://onlinelibrary.wiley.com/doi/abs/10.1162/108819803323059442
        CostInfo Organicherbicides: Cost=3.1
          Memo
            https://www.amazon.com/dp/B07TSHB427?tag=lawnstarterla-20&linkCode=ogi&th=1
        CostInfo Organicpesticides: Cost=44
          Memo
            https://tgrm.com.au/_products//Products/ORGANICPRODUCTS/SERO-X5LTBIOLOGICALINSECTICIDEGROWTHAGRICULTURE100521-8115-28084-.aspx
      Manager
```csharp
using System;
using System.Linq;
using System.Collections.Generic;
using Models.Core;
using Models.Interfaces;
using Models.Functions;
using Models.PMF;
using Models.Soils;
using Models.WaterModel;
using Models.Management;
using Models.Soils.Nutrients;
using Models.Management;
using Models.Utilities;
using Models.Climate;
using APSIM.Shared.Utilities;
using Models.Surface;
using System.Diagnostics;

namespace Models
{
    [Serializable]
    public class MScript : Model
    {
        [Link] private Clock Clock;
        [Link] private Summary Summary;
        [Link] private RotationManager RotationManager;
        [Link] SurfaceOrganicMatter SOM;

        // The paddocks - ie the names of zones.
        private List<string> myPaddockNames {get; set;}
        public string[] managedPaddocks {get {return myPaddockNames.ToArray();} set {}}
        
        // Default parameters for crops we manage.
        // The parameters for each alias are child components (FarmCropMgtInfo) of this manager 
        // Crop aliases: "Early Wheat" and "Late Wheat" both mean "Wheat", but different parameters. 
        private Dictionary<string, FarmCropMgtInfo> cropDefaults; 
       
        // Helpers for rotation arc rules. These will be called from the rotation manager 
        // component, which in turn is asked to do the daily management step by us. 
        public double CanSowSorghum {get { return(canSow("Sorghum")); } set {} }
        public double CanSowWheat {get { return(canSow("Wheat")); } set {} }
        public double CanSowMaize {get { return(canSow("Maize")); } set {} }
        public double CanSowChickpea {get { return(canSow("Chickpea")); } set {} }
        public double CanSowMungbean {get { return(canSow("Mungbean")); } set {} }
        public double CanSowSoybean {get { return(canSow("Soybean")); } set {} }
        public double CanSowSpringSorghum {get { return(canSow("SpringSorghum")); } set {} }
        public double CanSowEarlySorghum {get { return(canSow("EarlySorghum")); } set {} }
        public double CanSowLateSorghum {get { return(canSow("LateSorghum")); } set {} }
        public double CanSowCovercrop {get { return(canSow("Covercrop")); } set {} }
         
        public double CanHarvestSorghum {get { return(canHarvest("Sorghum")); } set {} }
        public double CanHarvestWheat {get { return(canHarvest("Wheat")); } set {} }
        public double CanHarvestMaize {get { return(canHarvest("Maize")); } set {} }
        public double CanHarvestChickpea {get { return(canHarvest("Chickpea")); } set {} }
        public double CanHarvestMungbean {get { return(canHarvest("Mungbean")); } set {} }
        public double CanHarvestSoybean {get { return(canHarvest("Soybean")); } set {} }
        public double CanHarvestSpringSorghum {get { return(canHarvest("SpringSorghum")); } set {} }
        public double CanHarvestEarlySorghum {get { return(canHarvest("EarlySorghum")); } set {} }
        public double CanHarvestLateSorghum {get { return(canHarvest("LateSorghum")); } set {} }
        public double CanHarvestCovercrop {get { return(canHarvest("Covercrop")); } set {} }
        public double Biomass0LateSorghum {get { return(Biomass0("LateSorghum")); } set {} }
        public double Biomass0Sorghum {get { return(Biomass0("Sorghum")); } set {} }
        public double Biomass0EarlySorghum {get { return(Biomass0("EarlySorghum")); } set {} }
        public double Biomass0SpringSorghum {get { return(Biomass0("SpringSorghum")); } set {} }
        
        
        
        // Amount of manure applied to all paddocks on each day
        public double manureApplied_kg {get; set;}
        
        // This is set during the management phase to the current paddock being managed.        
        public string _currentPaddock ;       
        public string currentPaddock {get => _currentPaddock; set => _currentPaddock = value; }
        
        // Keep these around as they're tedious to find 
        private Dictionary<string, Accumulator> accumulatedRain = new Dictionary<string, Accumulator>();
        private Dictionary<string, Zone> myPaddockZones = new Dictionary<string, Zone>();
        private Dictionary<string, WaterBalance> myWaterBalances = new Dictionary<string, WaterBalance>();
        private Dictionary<string, Physical> myPhysicals = new Dictionary<string, Physical>();
        // tillage management
        private readonly double tillageDepth = 400; // 耕作深度 
        private readonly double fractionToIncorporate = 1; // 掺入比例 
        // The current state of each paddock
        public Dictionary<string, string> currentStateAll {get; private set;}
        public string currentState {get { return currentStateAll[currentPaddock] ;} set {}}
        public string getCurrentStateOfPaddock(string paddock) {
           return currentStateAll[paddock];
        }

        private Dictionary<string, int> daysSinceLastHarvests;
        [NonSerialized] private Events myEvents;
           
        private bool afterInit = false;
        [EventSubscribe("StartOfSimulation")]
        private void OnStartOfSimulation(object sender, EventArgs e)
        {
            cropDefaults = new Dictionary<string, FarmCropMgtInfo>();
            foreach (var def in (this.Parent.Children).OfType<FarmCropMgtInfo>()) {
               cropDefaults[def.Name] = def;
               Summary.WriteMessage(this, $"Found crop defaults for '{def.Name}' aka '{def.RealName}'", MessageType.Diagnostic);
            }
            // A rain accumulator is kept for each crop
            foreach (var crop in cropDefaults.Keys) {
               accumulatedRain.Add(crop, new Accumulator(this, "[Weather].Rain", cropDefaults[crop].RainDays));
            }
            accumulatedRain.Add("weed", new Accumulator(this, "[Weather].Rain", 4));
            
            // Set up initial values
            myEvents = new Events(this);
            currentStateAll = new Dictionary<string, string>();
            daysSinceLastHarvests = new Dictionary<string, int>();
            myPaddockNames = new List<string>();
            
            // find a child component with initial state parameters 
            var initStateModel = (this.Parent.Children).OfType<FarmPaddocks>().FirstOrDefault();
            
            for (var i = 0; i < initStateModel.PaddockNames.Length; i++) {
               if (initStateModel.IsManaged[i]) 
               {
                  myPaddockNames.Add(initStateModel.PaddockNames[i]);
                  if (! RotationManager.Nodes.Exists(x => x.Name == initStateModel.InitialState[i]))
                     throw new Exception("Can't find a initial state/node called '" + initStateModel.InitialState[i] + "'");
                  currentStateAll.Add(initStateModel.PaddockNames[i], initStateModel.InitialState[i]);
                  daysSinceLastHarvests.Add(initStateModel.PaddockNames[i], initStateModel.DaysSinceHarvest[i]);
               }
            }
            
            // Hook up the water balance objects etc to our dictionaries 
            foreach (var paddock in myPaddockNames) {
                myPaddockZones[ paddock ] = FindInScope(paddock) as Zone; 
                if (myPaddockZones[ paddock ]  == null) { throw new Exception("Can't find a paddock called '" + paddock + "'");}
 
                myWaterBalances[ paddock ] = myPaddockZones[ paddock ].FindInScope("SoilWater") as WaterBalance;
                if (myWaterBalances[ paddock ] == null) { throw new Exception("Can't find a waterbalance in '" + paddock + "'");}

                myPhysicals[ paddock ] = myWaterBalances[ paddock ].FindSibling("Physical") as Physical;
               
                // trick the logger into recording initial state
                currentPaddock = paddock;
                RotationManager.CurrentState = currentStateAll[paddock];
                RotationManager.DoLogState(); 
                currentPaddock = "";
                RotationManager.CurrentState = "";
                
                // Make sure red clover doesnt start automatically
                //var covercrop = myPaddockZones[ paddock ].FindChild<Plant>("RedClover");
                //if (covercrop != null)
                //   covercrop.EndCrop();
            }
            afterInit = true;
        }

        [EventSubscribe("EndOfSimulation")]
        private void DoEndOfSimulation(object sender, EventArgs e) 
        {
            // write out the final state
            foreach (var paddock in myPaddockNames) {
               currentPaddock = paddock;
               RotationManager.CurrentState = currentStateAll[paddock];
               RotationManager.DoLogState(); 
               currentPaddock = "";
               RotationManager.CurrentState = "";
            }
        }
        
        [EventSubscribe("StartOfDay")]
        private void DoStartOfDay(object sender, EventArgs e) 
        {
            manureApplied_kg = 0;
        }
        
        [EventSubscribe("EndOfDay")]
        private void DoEndOfDay(object sender, EventArgs e) 
        {
            foreach (var paddock in myPaddockNames) {
               var cropIn = false;
               var cropModules = cropDefaults.Values.Select(c => c.RealName).Distinct();
               foreach (var crop in cropModules) {
                  IPlant Crop = myPaddockZones[paddock].FindInScope(crop) as IPlant;
                  if (Crop.IsAlive)
                     cropIn = true;
               }
               if (!cropIn) 
                  daysSinceLastHarvests[paddock]++;
            }
        }

        [EventSubscribe("DoManagement")]
        private void DoManagement(object sender, EventArgs e)
        {
            foreach (var crop in accumulatedRain.Keys) {
               accumulatedRain[crop].Update();
            }
            
            bool moreToDo = true;
            while (moreToDo) {
               foreach (var paddock in myPaddockNames) {
                  currentPaddock = paddock;
                  RotationManager.CurrentState = currentStateAll[paddock];
                  //Summary.WriteMessage(this, $"Calling DoManagement for {currentPaddock}", MessageType.Diagnostic);
                  moreToDo = RotationManager.DoManagement();
                  currentStateAll[paddock] = RotationManager.CurrentState;
               }
            }
            currentPaddock = "";
        }

        // Rotation arc rules & actions. These depend on currentPaddock being set 
        private double canSow (string crop) {
        
            if (currentPaddock == "") { return 0; }
            //Console.WriteLine( $"Being asked whether can sow crop {crop} in {currentPaddock}");
            var Crop = findMyCrop(cropDefaults[crop].RealName);

            if ((DateUtilities.WithinDates(cropDefaults[crop].StartDate, Clock.Today, cropDefaults[crop].EndDate) &&
                 !Crop.IsAlive &&
                 MathUtilities.Sum(myWaterBalances[currentPaddock].ESW) > cropDefaults[crop].MinESW &&
                 accumulatedRain[crop].Sum > cropDefaults[crop].MinRain && AreaPlantedOk(crop) == 1 ) ||
                (!Crop.IsAlive && DateUtilities.DatesAreEqual(cropDefaults[crop].EndDate, Clock.Today) && 
                 cropDefaults[crop].MustSow)) 
                return 1; 
            return 0; 
        }
        //tillage
         
        private void PerformTillage(string paddockName)
     {
         var paddockZone = myPaddockZones[paddockName];
         var SOM = paddockZone.FindInScope<SurfaceOrganicMatter>();
         if (SOM != null)
         {
             SOM.Incorporate(fractionToIncorporate, tillageDepth);
             //Summary.WriteMessage(this, $"Performed tillage in paddock: {paddockName} with depth: {tillageDepth} and fraction: {fractionToIncorporate}", MessageType.Information);
         }
         else
         {
              Summary.WriteMessage(this, "Surface Organic Matter component not found in paddock: " + paddockName, MessageType.Warning);
         }
     }
     
     private double Biomass0 (string crop) {
        if (currentPaddock == "") { return 0; }
        var Crop = findMyCrop(cropDefaults[crop].RealName);
           if  (Crop.AboveGroundHarvestable.Wt== 0){
           return(1);}
           return(0);   
        }
               
        private double canHarvest (string crop) {
            if (currentPaddock == "") { return 0; }
            //Console.WriteLine( $"Being asked whether can harvest crop {crop} in {currentPaddock}");
            var Crop = findMyCrop(cropDefaults[crop].RealName);
            if (Crop.IsReadyForHarvesting || 
                (Crop.AboveGround.Wt < 200 && Crop.DaysAfterSowing > 100 && Crop.Leaf.CanopyType=="Sorghum" ) ||
                (Crop.DaysAfterSowing > 60 && cropDefaults[crop].Name=="Covercrop")||
                (Crop.DaysAfterSowing > 150&& cropDefaults[crop].Name=="LateSorghum") ) {
               Summary.WriteMessage(this, "Harvest condition met for {crop} in {currentPaddock}. ReadyForHarvesting", MessageType.Information);
               return(1);
            }
            //Summary.WriteMessage(this, $"NO!!!Harvest{crop}. BIOMASS is {Crop.AboveGroundHarvestable.Wt} . since sow:{Crop.DaysAfterSowing}. LAI IS {Crop.LAI}", MessageType.Information);
            return(0);   
        }
               
        public void SowCrop(string crop) 
        {   
            crop = crop.Replace("\"", ""); //NFI why the quotes are added in??
            var myPaddock = FindInScope(currentPaddock) as Zone; 
            if (myPaddock == null) { throw new Exception("Can't find a paddock called '" + currentPaddock + "'");}
            
            Plant Crop = myPaddock.FindInScope(cropDefaults[crop].RealName) as Plant;
            if (Crop == null) { throw new Exception("Can't find crop called '" + currentPaddock + "." + crop + "'");}

            Summary.WriteMessage(this, this.FullPath + " -  sowing " + Crop.FullPath, MessageType.Diagnostic);
            Crop.Sow(population: cropDefaults[crop].Population, cultivar: cropDefaults[crop].CultivarName, 
                     depth: cropDefaults[crop].SowingDepth, rowSpacing: cropDefaults[crop].RowSpacing);
            myEvents.Publish("DoPaddockExpenditure",  new object[] { this, 
                  new FarmEconomics.PaddockExpenditureArgs{
                      Description = $"{crop} Sowing",
                      Category = "In-crop", 
                      Paddock = currentPaddock,
                      Name = Crop.Name,
                      Rate = 1,
                      Area = myPaddockZones [ currentPaddock ].Area}});
            if (cropDefaults[crop].fertType == "Manure") {
               SurfaceOrganicMatter SOM = myPaddock.FindInScope("SurfaceOrganicMatter") as SurfaceOrganicMatter;
               SOM.FractionFaecesAdded = 1.0; // Manure Dry Weight proportion 0-1 (g/g)
               AddFaecesType Data = new AddFaecesType();
               Data.OMWeight = cropDefaults[crop].fertAmount;
               Data.OMN = Data.OMWeight * 0.035;  // N concentration of manure (g/g)
               SOM.AddFaeces(Data);
               SOM.Incorporate(1.0 /* fraction (0-1) */, 100 /* Depth (mm)*/);
               
               manureApplied_kg += cropDefaults[crop].fertAmount;
               
               // Incur a cost (machinery operation & purchase) of application
               myEvents.Publish("Operate",  new object[] { this, 
                  new FarmMachinery.FarmMachineryOperateArgs{
                      Tractor = "220kW FWA",
                      Implement = "Manure Spreader",
                      Category = "In-crop",
                      Paddock = currentPaddock}}); 

               myEvents.Publish("DoPaddockExpenditure",  new object[] { this, 
                  new FarmEconomics.PaddockExpenditureArgs{
                      Description = $"{crop} manure",
                      Category = "In-crop", 
                      Paddock = currentPaddock,
                      Name = cropDefaults[crop].fertType,
                      Rate = cropDefaults[crop].fertAmount,
                      Area = myPaddockZones [ currentPaddock ].Area}}); 

            } else {
               Fertiliser fert = myPaddock.FindInScope("Fertiliser") as Fertiliser;
               fert.Apply(cropDefaults[crop].fertAmount, fertByName(cropDefaults[crop].fertType)); 
               myEvents.Publish("DoPaddockExpenditure",  new object[] { this, 
                  new FarmEconomics.PaddockExpenditureArgs{
                      Description = $"{crop} fertiliser",
                      Category = "In-crop", 
                      Paddock = currentPaddock,
                      Name = cropDefaults[crop].fertType,
                      Rate = cropDefaults[crop].fertAmount,
                      Area = myPaddockZones [ currentPaddock ].Area}}); 
            }
            myEvents.Publish("Operate",  new object[] { this, 
                  new FarmMachinery.FarmMachineryOperateArgs{
                      Tractor = "220kW FWA",
                      Implement = "Planter",
                      Category = "In-crop",
                      Paddock = currentPaddock}}); 

            myEvents.Publish("KillWeeds",  new object [] {this, 
                  new EventArgs()}) ; 
                  
         }
        
        
        
        public void HarvestCrop(string crop)
        {
            crop = crop.Replace("\"", "");
            var myPaddock = FindInScope(currentPaddock) as Zone; 
            Plant Crop = myPaddock.FindInScope(cropDefaults[crop].RealName) as Plant;

            Summary.WriteMessage(this, this.FullPath + " -  harvesting " + Crop.FullPath, MessageType.Diagnostic);
            myEvents.Publish("DoPaddockIncome",  new object[] { this, 
                  new FarmEconomics.PaddockIncomeArgs{
                       Description = $"{crop} aka {Crop.Name} Harvest",
                       Category = "In-crop", 
                       Paddock = currentPaddock,
                       Name = Crop.Name,
                       //  wet yield @ 14% moisture 
                       Yield = 1.14 * GetValuebyName(myPaddock.Get("[" + Crop.Name + "].Grain.Total.Wt")) * 10 / 1000,  // g/m2 -> t/ha
                       Protein = GetValuebyName(myPaddock.Get("[" + Crop.Name + "].Grain.Protein")) ,
                       Area = myPaddockZones [ currentPaddock ].Area}});   
            Crop.Harvest();
            Crop.EndCrop();
            
            // Cover crops are plowed in immediately
            if (cropDefaults[crop].Name=="Covercrop") {
            
               SurfaceOrganicMatter SOM = myPaddockZones [ currentPaddock ].FindInScope("SurfaceOrganicMatter") as SurfaceOrganicMatter;
               SOM.Incorporate(1.0 /* fraction (0-1) */, 100 /* Depth (mm)*/);
               
               myEvents.Publish("Operate",  new object[] { this, 
                  new FarmMachinery.FarmMachineryOperateArgs{
                      Tractor = "220kW FWA",
                      Implement = "Disc Cultivator",
                      Category = "In-crop",
                      Paddock = currentPaddock}}); 
            }

            
            daysSinceLastHarvests[currentPaddock] = 0;
            myEvents.Publish("CropHarvested",  null); 
        }

        private Plant findMyCrop(string crop) {
            if (currentPaddock == "") { return null; }
            Plant Crop = null;
            try {
               var myPaddock = FindInScope(currentPaddock) as Zone;
               Crop = myPaddock.FindInScope(crop) as Plant;
            } catch (Exception e) {
               throw new AggregateException("Error in findMyCrop", e);
            }
            return (Crop);        
        }
        
        private double GetValuebyName(object value) 
        {
            if (value is null) return(0);
              
            if (value is IFunction function)
                value = function.Value();
                
            double result = (double) Convert.ChangeType(value, typeof(double));
            return(result);
        }
        
        public Fertiliser.Types fertByName (string s) {
            if (! Enum.GetNames(typeof(Fertiliser.Types)).Contains(s)) 
                throw new Exception("Can't find a fertiliser called " + s);
            var fertTypes = Enum.GetValues(typeof(Fertiliser.Types)).Cast<Fertiliser.Types>();
            var res = fertTypes.First(x => x.ToString() == s);
            return(res);
        }

        // More helpers for rotation arc rules. These rules also depend on currentPaddock being set 
        // earlier (ie we're calling the rotation graph, and in turn, it's asking us for something)

        // See if the potential area planted for this crop is less or equal to the total area allowed         
        public int AreaPlantedOk(string crop) {
          double areaCrop = 0;
          double areaTot = 0;
     		foreach (var paddockZone in myPaddockZones.Values) {
        	IPlant Crop = paddockZone.FindInScope(cropDefaults[crop].RealName) as IPlant;
        	if (Crop == null) { 
            throw new Exception($"Can't find crop {crop} in '{paddockZone.Name}'");
        		}
        	if (Crop.IsAlive) 
            	areaCrop += paddockZone.Area * 1000; // times 1000
        		areaTot += paddockZone.Area * 1000; 
    				}
              var thisPaddockArea = myPaddockZones[currentPaddock].Area * 1000; // 乘以1000
              var areaFrac = (thisPaddockArea + areaCrop) / areaTot;
               int result = areaFrac <= cropDefaults[crop].maxArea ? 1 : 0;
              double thisPaddockAreaOriginal = thisPaddockArea / 1000;
              double areaCropOriginal = areaCrop / 1000;
              double areaTotOriginal = areaTot / 1000;

    		//Summary.WriteMessage(this, $"area rule for crop {crop} is {result}: this = {thisPaddockAreaOriginal}, pot= {(areaCropOriginal + thisPaddockAreaOriginal)}, tot={areaTotOriginal}", MessageType.Diagnostic);

    		return result;
}
        
        // The number of days since the last crop was harvested
        public int daysSinceLastHarvest {
           get { 
             if (!afterInit) return 0;
             return(daysSinceLastHarvests[currentPaddock]);
           }
           set {}
        }
        
        public int daysSinceLastHarvest_gt_60 {get {return (daysSinceLastHarvest > 60 ? 1 : 0); } set {}}
        public int daysSinceLastHarvest_gt_180 {get {return (daysSinceLastHarvest > 180 ? 1 : 0); } set {}}
        

    }
}
```
        Memo APSFarm
          ### Whole farm management

          This simulation aims to manage paddocks from a single "top level" manager that applies a rotation to each, testing environmental (rainfall, water content), current (eg %age of farm planted) and historical (eg max 2 cereals in a row) states for what crop to sow next.

          The top level manager
        FarmPaddocks Initial Values: DaysSinceHarvest=[0, 66, 66, 66, 66, 66, 66, 66, 66, 66, 66]
          PaddockNames=[, Field 1, Field 2, Field 3, Field 4, Field 5, Field 6, Field 7, Field 8, Field 9, Field 10]
          IsManaged=[false, true, true, true, true, true, true, true, true, true, true]
          InitialState=[, Fallow, Fallow, Fallow, Fallow, Fallow, Fallow, Fallow, Fallow, Fallow, Fallow]
        FarmCropMgtInfo Wheat: RealName=Wheat; MinRain=20; RainDays=5; StartDate=31-mar; EndDate=30-jun; MinESW=70; MustSow=false; Population=50; CultivarName=Hartog; SowingDepth=30; RowSpacing=250; maxArea=0.8; fertType=Manure; fertAmount=3154
        FarmCropMgtInfo Maize: RealName=Maize; MinRain=25; RainDays=7; StartDate=15-jan; EndDate=28-feb; MinESW=100; MustSow=false; Population=6; CultivarName=Dekalb_XL82; SowingDepth=30; RowSpacing=750; maxArea=0.8; fertType=Manure; fertAmount=1971
        FarmCropMgtInfo SpringSorghum: RealName=Sorghum; MinRain=25; RainDays=4; StartDate=15-aug; EndDate=31-oct; MinESW=110; MustSow=false; Population=10; CultivarName=Buster; SowingDepth=30; RowSpacing=750; maxArea=0.1; fertType=Manure; fertAmount=2102
        FarmCropMgtInfo Sorghum: RealName=Sorghum; MinRain=25; RainDays=7; StartDate=1-nov; EndDate=10-jan; MinESW=100; MustSow=false; Population=10; CultivarName=Buster; SowingDepth=30; RowSpacing=750; maxArea=0.8; fertType=Manure; fertAmount=2102
        FarmCropMgtInfo LateSorghum: RealName=Sorghum; MinRain=15; RainDays=5; StartDate=16-feb; EndDate=28-feb; MinESW=80; MustSow=false; Population=10; CultivarName=Buster; SowingDepth=30; RowSpacing=750; maxArea=0.3; fertType=Manure; fertAmount=2102
        FarmCropMgtInfo EarlySorghum: RealName=Sorghum; MinRain=25; RainDays=5; StartDate=1-nov; EndDate=15-dec; MinESW=100; MustSow=false; Population=10; CultivarName=Buster; SowingDepth=30; RowSpacing=750; maxArea=0.3; fertType=Manure; fertAmount=2102
        FarmCropMgtInfo Chickpea: RealName=Chickpea; MinRain=20; RainDays=5; StartDate=1-May; EndDate=15-jun; MinESW=100; MustSow=false; Population=30; CultivarName=Amethyst; SowingDepth=50; RowSpacing=400; maxArea=0.8; fertType=Manure; fertAmount=0
        FarmCropMgtInfo Mungbean: RealName=Mungbean; MinRain=15; RainDays=3; StartDate=5-Dec; EndDate=1-Feb; MinESW=15; MustSow=false; Population=30; CultivarName=Emerald; SowingDepth=30; RowSpacing=250; maxArea=0.8; fertType=Manure; fertAmount=0
        FarmCropMgtInfo Soybean: RealName=Soybean; MinRain=25; RainDays=7; StartDate=1-sep; EndDate=1-dec; MinESW=0; MustSow=false; Population=38; CultivarName=Davis; SowingDepth=50; RowSpacing=750; maxArea=0.8; fertType=Manure; fertAmount=0
        FarmCropMgtInfo Covercrop: RealName=RedClover; MinRain=15; RainDays=5; StartDate=30-jun; EndDate=31-dec; MinESW=0; MustSow=false; Population=500; CultivarName=Colenso; SowingDepth=5; RowSpacing=150; maxArea=0.3; fertType=Manure; fertAmount=0
      Manager Weeds
        rainAmount = 25
        ttSum = 250
        swFrac = 0.5
        controlChemical = Organicherbicides
        controlRate = 1.6
        CO2_conv = 22.8
```csharp
using System;
using System.Linq;
using System.Collections.Generic;
using Models.Core;
using Models.Interfaces;
using Models.Functions;
using Models.PMF;
using Models.Soils;
using Models.WaterModel;
using Models.Soils.Nutrients;
using Models.Management;
using Models.Utilities;
using Models.Climate;
using APSIM.Shared.Utilities;

namespace Models
{
    public class WeedEventArgs: EventArgs
    {
       /// <summary> </summary>
       public string Paddock { get; set; }
    }        
    [Serializable]
    public class WeedScript : Model
    {
        ////////////////////////////////////////////////////////
        [Separator("Weeds - fallow cost of control")]
        [Description("Rainfall amount for germination (mm over 4 days)")]
        public double rainAmount{get; set;} 

        [Description("Thermal time to seed set (dd)")]
        public double ttSum{get; set;} 

        [Description("Surface soil water threshold for weed death (0-1)")]
        public double swFrac{get; set;} 
       
        [Description("Control chemical ()")]
        public string controlChemical{get; set;} 

        [Description("Control rate (l/ha)")]
        public double controlRate{get; set;} 

        [Description("CO2 conversion rate (* kg.chem => kg.co2_e)")]
        public double CO2_conv { get; set; } 

        [Units("kg")]
        public double CO2_e {get {return (ChemicalApplied * CO2_conv);} 
                             set {}}
        private double ChemicalApplied;       
        ////////////////////////////////////////////////////////
        // The paddocks - ie the names of zones.
        [NonSerialized] public List<string> myPaddockNames;
        
        [Link] Simulation Simulation;
        [Link] Weather Weather;
        [Link] private Clock Clock;
        [Link] private Summary Summary;
        [Link] private RotationManager RotationManager;
        [Link(ByName = true)] private Manager Manager;
        private MScript ManagerScript ;
        
        [NonSerialized] private Events myEvents;
        private Accumulator accumulatedRain;
        
        // Keep these around as they're tedious to find 
        private Dictionary<string, Zone> myPaddockZones = new Dictionary<string, Zone>();
        private Dictionary<string, WaterBalance> myWaterBalances = new Dictionary<string, WaterBalance>();
        private Dictionary<string, Physical> myPhysicals = new Dictionary<string, Physical>();
          
        private bool afterInit = false;
        [EventSubscribe("StartOfSimulation")]
        private void OnStartOfSimulation(object sender, EventArgs e)
        {
            ManagerScript = Manager.Script as MScript;
            if (ManagerScript == null)
               throw new Exception("Can't find a manager script");
               
            accumulatedRain =  new Accumulator(this, "[Weather].Rain", 4);
            
            // Set up initial values
            myEvents = new Events(this);
            myPaddockNames = ManagerScript.managedPaddocks.ToList();
            
            // Hook up the water balance objects etc to our dictionaries 
            foreach (var paddock in myPaddockNames) {
                myPaddockZones[ paddock ] = FindInScope(paddock) as Zone; 
                if (myPaddockZones[ paddock ]  == null) { throw new Exception("Can't find a paddock called '" + paddock + "'");}
 
                myWaterBalances[ paddock ] = myPaddockZones[ paddock ].FindInScope("SoilWater") as WaterBalance;
                if (myWaterBalances[ paddock ] == null) { throw new Exception("Can't find a waterbalance in '" + paddock + "'");}

                myPhysicals[ paddock ] = myWaterBalances[ paddock ].FindSibling("Physical") as Physical;
                
                weedsGerminated.Add(paddock, false);
                weedsTT.Add(paddock, 0);
            }
            afterInit = true;
            ChemicalApplied = 0;
        }

        [EventSubscribe("StartOfDay")]
        private void DoStartOfDay(object sender, EventArgs e)
        {
            ChemicalApplied = 0;
        }
        [EventSubscribe("DoManagement")]
        private void DoManagement(object sender, EventArgs e)
        {
            accumulatedRain.Update();
            
            foreach (var paddock in myPaddockNames) {
               checkWeeds(paddock);
            }
        }
        
        // Weeds-------------------
        private Dictionary<string, bool> weedsGerminated = new Dictionary<string, bool>();
        private Dictionary<string, double> weedsTT = new Dictionary<string, double>();

        //[EventSubscribe("CropHarvested")] fixme


        [EventSubscribe("KillWeeds")]
        private void KillWeeds(object sender, EventArgs e) {
            var currentPaddock = ManagerScript.currentPaddock;
            weedsGerminated[currentPaddock] = false;
            weedsTT[currentPaddock] = 0;
        }

        private void checkWeeds (string paddock) {
            var currentState = ManagerScript.getCurrentStateOfPaddock(paddock);
            if (currentState.Contains("Fallow", StringComparison.CurrentCultureIgnoreCase ) /*&&
                daysSinceHarvest[paddock] > 30*/) {

                  if (! weedsGerminated[paddock] && accumulatedRain.Sum >= rainAmount) {
                     weedsGerminated[paddock] = true;
                     weedsTT[paddock] = 0;
                     Summary.WriteMessage(this, $"Weeds germinating in {paddock}", MessageType.Diagnostic);

                  } else if (weedsGerminated[paddock]) {
                     // Thermal time calc
                     weedsTT[paddock] += (Weather.MaxT + Weather.MinT) / 2;
         
                     // Surface SW calc
                     var ll = myPhysicals[paddock].LL15[0];
                     var dul = myPhysicals[paddock].DUL[0];
                     var sw = myWaterBalances[paddock].SW[0];
                     var swf = (sw-ll)/(dul-ll);
         
                     if (swf < swFrac) {
                         // kill off weeds
                         weedsGerminated[paddock] = false;
                         Summary.WriteMessage(this, $"Weeds die in {paddock}", MessageType.Diagnostic);
         
                     } else if (weedsTT[paddock] > ttSum) {
                         // Weeds are mature - spray them
                         
                         myEvents.Publish("DoPaddockExpenditure",  new object[] { this, 
                             new FarmEconomics.PaddockExpenditureArgs {
                                 Description = "Weed control - " + controlChemical,
                                 Category = "Fallow", 
                                 Paddock = paddock,
                                 Name = controlChemical,
                                 Rate = controlRate,
                                 Area = myPaddockZones [ paddock ].Area}});

                         ChemicalApplied += controlRate * myPaddockZones[paddock].Area;
 
                         myEvents.Publish("Operate",  new object[] { this, 
                             new FarmMachinery.FarmMachineryOperateArgs{
                                Tractor = "SprayRig",
                                Category = "Fallow", 
                                Implement = "Sprayer",
                                Paddock = paddock}}); 
                         Summary.WriteMessage(this, $"Weeds mature in {paddock} - sprayed out.", MessageType.Diagnostic);
                         weedsGerminated[paddock] = false;
                         weedsTT[paddock] = 0;
                     }  
                 }
              }   
       }
    }
}
```
      Manager PhaseAccumulations
```csharp
using System;
using System.Linq;
using System.Collections.Generic;

using Models.Core;
using Models.Interfaces;
using Models.Functions;
using Models.Climate;
using Models.Soils;
using Models.WaterModel;
using Models.Soils.Nutrients;
using Models.Management;
using Models.Utilities;

using Models.PMF;
using APSIM.Shared.Utilities;

// General accumulator for rotations. Reports on each transition in each paddock
namespace Models
{
    [Serializable]
    public class AccScript : Model
    {
        [Link] Simulation Simulation;
        [Link] IClock Clock;
        [Link] Weather Weather;
        [Link] ISummary Summary;

        [Link(ByName = true)] private Manager Manager;
        private MScript ManagerScript ;
        
        [Link(IsOptional = true)] private RotationManager RotationManager;
        [Link(IsOptional = true)] private Zone defaultZone;

        private Dictionary<string, Zone> myPaddockZones = null;
        private Dictionary<string, WaterBalance> myWaterBalances;
        private Dictionary<string, Nutrient> myNutrient;
        private Dictionary<string, Solute> myNO3;
        private Dictionary<string, Fertiliser> myFert;
        private Dictionary<string, Plant> myCrops; // eg ["paddockName,cropName"]
        
        // A state / accumulator for each thing in each paddock
        private Dictionary<string, double> me = new Dictionary<string, double>();
        private Dictionary<string, double[]> meArray = new Dictionary<string, double[]>();
        private Dictionary<string, int> meInt = new Dictionary<string, int>();
        
        private string currentPaddock {get { 
           return((ManagerScript is null) ? 
             defaultZone.Name : 
                ManagerScript.currentPaddock); } set {}} 

        [EventSubscribe("StartOfSimulation")]
        public void OnStart_Simulation(object sender, EventArgs e) { 
            myPaddockZones = new Dictionary<string, Zone>();
            myWaterBalances = new Dictionary<string, WaterBalance>();
            myNO3 = new Dictionary<string, Solute>();
            myFert = new Dictionary<string, Fertiliser>();
            myNutrient = new Dictionary<string, Nutrient>();
            myCrops = new Dictionary<string, Plant>();
            
            ManagerScript = Manager.Script as MScript;
            
            foreach (var z in Simulation.FindAllChildren<Zone>() ) {
               myPaddockZones.Add(z.Name, z);
               
               var w = (z as Zone).FindInScope("SoilWater") as WaterBalance;
               myWaterBalances.Add(z.Name, w);

               var no3 = (z as Zone).FindInScope("NO3") as Solute;
               myNO3.Add(z.Name, no3);

               var nut = (z as Zone).FindInScope("Nutrient") as Nutrient;
               myNutrient.Add(z.Name, nut);

               var fert = (z as Zone).FindInScope("Fertiliser") as Fertiliser;
               myFert.Add(z.Name, fert);
               
               foreach (var c in z.FindAllChildren<Plant>() ) {
                   myCrops.Add(z.Name + "," + c.Name, c);
               }
            }
              
            foreach (string paddockName in myPaddockZones.Keys) {
               me.Add(paddockName + "__NeedReset", 1);

               Summary.WriteMessage(this, "Adding " + paddockName, MessageType.Diagnostic);
               me.Add(paddockName + "_eswStart", 0);
               me.Add(paddockName + "_eswYesterday", 0);
               me.Add(paddockName + "_Ep", 0);
               me.Add(paddockName + "_drainage", 0);
               me.Add(paddockName + "_runoff", 0);
               me.Add(paddockName + "_no3Start", 0);
               me.Add(paddockName + "_no3Yesterday", 0);
               me.Add(paddockName + "_rain", 0);
               me.Add(paddockName + "_evaporation", 0);
               me.Add(paddockName + "_applied_fert", 0);
               
               double[] TotalC = myNutrient[paddockName].TotalC.ToArray(); // 
               meArray.Add(paddockName + "_CStart", new double[TotalC.Length]);
               meArray.Add(paddockName + "_CYesterday", new double[TotalC.Length]);
               meArray.Add(paddockName + "_dlt_carbon_tot", new double[TotalC.Length]);
               meArray.Add(paddockName + "_n2o_tot", new double[TotalC.Length]);
               meInt.Add(paddockName + "_daysInPhase", 0);

               meArray.Add(paddockName + "_annual_CStart", new double[TotalC.Length]);
               meArray.Add(paddockName + "_annual_CYesterday", new double[TotalC.Length]);
               meArray.Add(paddockName + "_annual_dlt_carbon_tot", new double[TotalC.Length]);
               meArray.Add(paddockName + "_annual_n2o_tot", new double[TotalC.Length]);
               

               double[] dlayer = myWaterBalances[paddockName].Thickness.ToArray();
               double dep = 0;
               int iLayer = 0;
               for (iLayer = 0; iLayer < dlayer.Length && dep < 300; iLayer++)
                    dep += dlayer[iLayer];
               if (dep != 300) { throw new Exception($"Layer structure is not aligned to 300mm boundary in {paddockName}"); }
               meInt.Add(paddockName + "_iLayer_300mm", iLayer);
               Summary.WriteMessage(this, "L @300 = " + iLayer.ToString(), MessageType.Diagnostic);
      
               for ( ;iLayer < dlayer.Length && dep < 1000; iLayer++)
                    dep += dlayer[iLayer];
               //if (dep > 1000) { throw new Exception($"Layer structure is not aligned to 1000mm boundary in {paddockName}"); }
               meInt.Add(paddockName + "iLayer_300_1000mm", iLayer);
               Summary.WriteMessage(this, $"L @1000 = {iLayer}  (= {dep} mm)", MessageType.Diagnostic);
           }

       } 
       
       [EventSubscribe("Transition")] 
       public void OnTransition(object sender, EventArgs e) {
          me[currentPaddock + "__NeedReset"] = 1;
       } 
   
   [EventSubscribe("StartOfDay")] 
   public void OnStartOfDay(object sender, EventArgs e) { 
      foreach (string paddockName in myPaddockZones.Keys) {
         if (me[paddockName + "__NeedReset"] > 0) {
            me[paddockName + "__NeedReset"] = 0;
            me[paddockName + "_eswStart"] = MathUtilities.Sum(myWaterBalances[paddockName].ESW);
            me[paddockName + "_swYesterday"] = me[paddockName + "_eswStart"];
            me[paddockName + "_Ep"] = 0;
            me[paddockName + "_drainage"] = 0;
            me[paddockName + "_runoff"] = 0;
            me[paddockName + "_no3Start"] = myNO3[paddockName].kgha.Sum();
            me[paddockName + "_no3Yesterday"] = me[paddockName + "_no3Start"];
            me[paddockName + "_rain"] = 0;
            me[paddockName + "_evaporation"] = 0;
            me[paddockName + "_applied_fert"] = 0;
            
            // C pools aren't initialised properly until the end of the 1st day. Fudge it for now.
            var TotalC = myNutrient[paddockName].TotalC.ToArray();
            meArray[paddockName + "_CStart"] = TotalC;
            meArray[paddockName + "_CYesterday"] = TotalC;
            meArray[paddockName + "_dlt_carbon_tot"] = new double[TotalC.Length];
            meArray[paddockName + "_n2o_tot"] = new double[TotalC.Length];
            meInt[paddockName + "_daysInPhase"] = 0;
            
         }
      }
   }
   
   [EventSubscribe("StartOfYear")] 
   public void OnStartOfYear(object sender, EventArgs e) { 
      foreach (string paddockName in myPaddockZones.Keys) {
         var TotalC = myNutrient[paddockName].TotalC.ToArray();
         meArray[paddockName + "_annual_CStart"] = TotalC;
         meArray[paddockName + "_annual_CYesterday"] = TotalC;
         meArray[paddockName + "_annual_dlt_carbon_tot"] = new double[TotalC.Length];
         meArray[paddockName + "_annual_n2o_tot"] = new double[TotalC.Length];
      }
   }
       
   private IEnumerable<string> listCropsIn(string paddock) {
      return(myCrops.Keys.ToList().
          Where(c => c.StartsWith(paddock + "," )).
          Select(s => s.Substring(s.IndexOf(',') + 1)));
   }
   
   [EventSubscribe("EndOfDay")] 
   public void OnEndOfDay(object sender, EventArgs e) { 
      foreach (string paddockName in myPaddockZones.Keys) 
      {
         foreach (var cropName in listCropsIn(paddockName))
         {
            double Ep =  GetValuebyName(myPaddockZones[paddockName].Get($"[{cropName}].Leaf.WaterAllocation"));  
            me[paddockName + "_Ep"] += Ep;
         }
         
         me[paddockName + "_swYesterday"] = MathUtilities.Sum(myWaterBalances[paddockName].ESW);

         me[paddockName + "_drainage"] += myWaterBalances[paddockName].Drainage;

         me[paddockName + "_runoff"] += myWaterBalances[paddockName].Runoff;

         me[paddockName + "_rain"] += Weather.Rain;
         
         me[paddockName + "_evaporation"] += myWaterBalances[paddockName].Es;

         me[paddockName + "_applied_fert"] += myFert[paddockName].NitrogenApplied;

         me[paddockName + "_no3Yesterday"] = myNO3[paddockName].kgha.Sum();

         var TotalC = myNutrient[paddockName].TotalC.ToArray();
         if (MathUtilities.Sum( meArray[paddockName + "_CStart"] ) <= 0) {  // only occurs on the 1st day of simulation
            meArray[paddockName + "_CStart"] = TotalC;  
            meArray[paddockName + "_annual_CStart"] = TotalC;  
         }
         meArray[paddockName + "_CYesterday"] = TotalC;  
         meArray[paddockName + "_annual_CYesterday"] = TotalC;  
         for (int i = 0; i < TotalC.Length; i++) {
            meArray[paddockName + "_dlt_carbon_tot"][i] = TotalC[i] - meArray[paddockName + "_CStart"][i];
            meArray[paddockName + "_n2o_tot"][i] += myNutrient[paddockName].N2Oatm[i];

            meArray[paddockName + "_annual_dlt_carbon_tot"][i] = TotalC[i] - meArray[paddockName + "_annual_CStart"][i];
            meArray[paddockName + "_annual_n2o_tot"][i] += myNutrient[paddockName].N2Oatm[i];
         }
         meInt[paddockName + "_daysInPhase"]++;
      }
    }
    
   // Cumulative Ep: The total transpiration since the last transition
   [Units("mm")]
   public double TEp {
      get {return(getv(currentPaddock + "_Ep"));}
      set {}
   }
   // Cumulative Drainage
   [Units("mm")]
   public double TDrainage {
      get {return(getv(currentPaddock + "_drainage"));}
   }
   // Cumulative Runoff
   [Units("mm")]
   public double TRunoff {
      get {return(getv(currentPaddock + "_runoff"));}
   }
   // <summary> The total rain since the last transition</summary>
   [Units("mm")]
   public double TRainfall {
      get {return(getv(currentPaddock + "_rain"));}
   }
   
   [Units("mm")]
   public double TEs {
      get {return(getv(currentPaddock + "_evaporation"));}
      set {}
   }
   // <summary> The total NO3 applied since the last transition </summary>
   [Units("kg/ha")]
   public double TFertAsNO3 {
      get {return(getv(currentPaddock + "_applied_fert"));}
      set {}
   }

   // <summary> Instantaneous sw at start </summary>
   [Units("mm")]
   public double eswStart {
      get { return(getv(currentPaddock + "_eswStart"));} 
      set {}
   }
   // <summary> Instantaneous sw at end </summary>
   [Units("mm")]
   public double eswYesterday {
      get {return(getv(currentPaddock + "_eswYesterday"));} 
      set {}
   }
   // <summary> Instantaneous no3 at start of a phase </summary>
   [Units("kg/ha")]
   public double no3Start { 
      get {return(getv(currentPaddock + "_no3Start"));}
   }
   // <summary> Instantaneous no3 at end of a phase </summary>
    [Units("kg/ha")]
   public double no3Yesterday {
      get {return(getv(currentPaddock + "_no3Yesterday"));}
   }

   // <summary> Instantaneous total carbon at start of a phase </summary>
    [Units("kg/ha")]
   public double[] totCStart { 
      get {return(geta(currentPaddock + "_CStart"));}
   }
   // <summary> Instantaneous no3 at end of a phase </summary>
    [Units("kg/ha")]
   public double[] totCYesterday {
      get {return(geta(currentPaddock + "_CYesterday"));}
   }
   
   [Units("kg/ha")]
   // <summary> Change in total carbon to 300mm over water year (t/ha) </summary>
   public double dlt_carbon_tot_300mm {
      get {
         double res = 0;
         int n = getInt( currentPaddock + "_iLayer_300mm" );
         for (var i = 0; i < n; i++)
            res += geta(currentPaddock + "_dlt_carbon_tot", i);
         return(res);
      }
   }
   [Units("kg")]
   public double annual_dlt_carbon_tot_300mm {
      get {
         double res = 0;
         foreach (string paddockName in myPaddockZones.Keys) 
         {
            int n = getInt( paddockName + "_iLayer_300mm" );
            for (var i = 0; i < n; i++)
               res += geta(paddockName + "_annual_dlt_carbon_tot", i) * myPaddockZones[paddockName].Area;
         }
         return(res);
      }
   }

    // <summary> Change in total carbon from 300mm - 1000mm over water year</summary>
    [Units("kg/ha")]
    public double dlt_carbon_tot_300_1000mm {
      get {
         double res = 0;
         int n1 = getInt( currentPaddock + "_iLayer_300mm" );
         int n2 = getInt( currentPaddock + "_iLayer_300mm_1000mm" );
         for (var i = n1; i < n2; i++)
            res += geta(currentPaddock + "_dlt_carbon_tot", i);
         return(res);
      }
   }
   
   
   // <summary> N2O emitted from top300mm since start of water year </summary>
   [Units("kg/ha")]
   public double n2o_300mm {
      get {
         double res = 0;
         int n = getInt( currentPaddock + "_iLayer_300mm" );
         for (var i = 0; i < n; i++)
            res += geta(currentPaddock + "_n2o_tot", i);
         return(res);
      }
   }
   
   [Units("kg")]
   // <summary> N2O emitted from top300mm since start of water year (kg) </summary>
   public double annual_n2o_300mm {
      get {
         double res = 0;
         foreach (string paddockName in myPaddockZones.Keys) {
            int n = getInt( paddockName + "_iLayer_300mm" );
            for (var i = 0; i < n; i++)
               res += geta(paddockName + "_annual_n2o_tot", i) * myPaddockZones[paddockName].Area;
         }
         return(res);
      }
   }

   // <summary> N2O emitted from 300mm - 1000mm since start of water year</summary>
   [Units("kg/ha")]
   public double n2o_300_1000mm {
      get {
         double res = 0;
         int n1 = getInt( currentPaddock + "_iLayer_300mm" );
         int n2 = getInt( currentPaddock + "_iLayer_300mm_1000mm" );
         for (var i = n1; i < n2; i++)
            res += geta(currentPaddock + "_n2o_tot", i);
         return(res);
      }
   }
   
    //<summary>CO2 equivalent emissions to 300mm since transition</summary> 
   [Units("t/ha")]
   public double co2_equiv_300mm {
      get {
         return((-1 * dlt_carbon_tot_300mm * 3.67 + 
                 n2o_300mm * 298) / 1000.0);
      }
   }
   
   [Units("t")]
   public double annual_co2_equiv_300mm {
      get {
         return((-1 * annual_dlt_carbon_tot_300mm * 3.67 + 
                 annual_n2o_300mm * 298) / 1000.0);
      }
   }

    //<summary>CO2 equivalent emissions from 300mm -  1000mm since transition</summary>
   [Units("t/ha")]
   public double co2_equiv_300_1000mm {
      get {
         return((-1 * dlt_carbon_tot_300_1000mm * 3.67 + 
            n2o_300_1000mm * 298) / 1000.0);
           
      }
   }

   // <summary> Instantaneous yield (kg/ha, sum of all crops) </summary>
   [Units("kg/ha")]
   public double yield_kgha {
      get{
         double yld2 = 0;
         foreach (var cropName in listCropsIn(currentPaddock))
         {
            // This is quite a mouthful. Should be an easier way to do this..
            var value = myPaddockZones[currentPaddock].Get($"[{cropName}].Grain.Total.Wt"); 
            if (value != null) 
               yld2 = yld2 + GetValuebyName(value) * 10;  // g/m2 -> kg/ha
         }
         return yld2 ;
      }
      set {}
   }

   //<summary> Instantaneous yield (kg) of all crops </summary>
   [Units("kg")]
   public double yield_kg {
      get{
         double yld2 = 0;
         foreach (var cropName in listCropsIn(currentPaddock))
         {
            // This is quite a mouthful. Should be an easier way to do this..
            var value =  myPaddockZones[currentPaddock].Get($"[{cropName}].Grain.Total.Wt"); 
            if (value != null) 
               yld2 = yld2 + GetValuebyName(value) * 10 * myPaddockZones[currentPaddock].Area;// g/m2 -> kg/ha
         }
         return yld2 ;
      }
      set {}
   }

   //<summary> Instantaneous biomass (kg/ha) of all crops</summary>
   [Units("kg/ha")]
   public double biomass_kgha {
      get{
         double biomass2 = 0;
         foreach (var cropName in listCropsIn(currentPaddock))
         {
            // This is quite a mouthful. Should be an easier way to do this..
            var value = myPaddockZones[currentPaddock].Get($"[{cropName}].AboveGround.Wt");
            if (value != null) 
               biomass2 = biomass2 + GetValuebyName(value) * 10;  // g/m2 -> kg/ha;
         }
         return biomass2 ;}
      set {}
   }
   // <summary>Instantaneous biomass (kg) of all crops</summary>
   [Units("kg")]
   public double biomass_kg {
      get{
         double biomass2 = 0;
         foreach (var cropName in listCropsIn(currentPaddock))
         {
            // This is quite a mouthful. Should be an easier way to do this..
            var value =  myPaddockZones[currentPaddock].Get($"[{cropName}].AboveGround.Wt");
            if (value != null) 
               biomass2 = biomass2 + GetValuebyName(value) * 10 * myPaddockZones[currentPaddock].Area; // g/m2 -> kg/ha 
         }
         return biomass2 ;}
   }
#if false
   // Instantaneous protein of all crops
   [Output, Description("Grain Protein"), Units("%")] public double protein {
      get{
         double pro2 = 0;
         Paddock p = (Paddock) MySimulation.LinkByName(currentPaddock());
         foreach (Component crop in p.Crops)
         {
            double pro = 0;
            crop.Get("grain_protein", out pro);
            pro2 = pro2 + pro;
         }
        
         return pro2 ;}
   }
   
   // Instantaneous N of all crops
   [Output, Description("Grain N"), Units("g/m2")] public double GrainN_gm2 {
      get{
         double GN2 = 0;
         Paddock p = (Paddock) MySimulation.LinkByName(currentPaddock());
         foreach (Component crop in p.Crops)
         {
            double GN = 0;
            if (crop.Get("grain_N", out GN))
               GN2 = GN2 + GN;
            else if (crop.Get("GrainGreenN", out GN))
               GN2 = GN2 + GN;
         }
         return GN2 ;}
   }

#endif
   
   public int daysInPhase {
      get {
        return(getInt( currentPaddock + "_daysInPhase"));
      }
   }
   
        private double[] geta(string key) {
           if (meArray.ContainsKey(key)) return(meArray[key]);
           return(null);
        }

        private double geta(string key, int i) {
           if (meArray.ContainsKey(key)) return(meArray[key] [i]);
           return(-1.0);
        }
        
        private double getv(string key) {
           if (me.ContainsKey(key)) return(me[key]);
           return(-1.0);
        }
        
        private int getInt(string key) {
           if (meInt.ContainsKey(key)) return(meInt[key]);
           return(0);
        }
        
        private double GetValuebyName(object value) 
        {
            double result;
            if (value is IFunction function)
                value = function.Value();
            result = (double) Convert.ChangeType(value, typeof(double));
            return(result);
        }

    
        [EventSubscribe("DoManagement")]
        private void DoDailyCalculations(object sender, EventArgs e)
        {
            // Called once per day
        }
    }
}
```
      Manager Pesticides
        ChemicalName = Organicpesticide
        ApplicationRate = 0.15
        CO2_conv = 24.5
        TractorName = SprayRig
        ImplementName = Sprayer
```csharp
using System;
using System.Linq;
using System.Collections.Generic;
using Models.Core;
using Models.Interfaces;
using Models.Functions;
using Models.PMF;
using Models.Soils;
using Models.WaterModel;
using Models.Soils.Nutrients;
using Models.Management;
using Models.Utilities;
using Models.Climate;
using APSIM.Shared.Utilities;

namespace Models
{
    [Serializable]
    
    public class PestControlScript : Model
    {
        [Link] private Clock Clock;
        [Link] private Summary Summary;

        [Description("Control chemical name (matches item in economics)")]
        public string ChemicalName { get; set; } 

        [Description("Application rate (kg/ha)")]
        public double ApplicationRate { get; set; } 

        [Description("CO2 conversion rate (* kg.chem => kg.co2_e)")]
        public double CO2_conv { get; set; } 

        [Description("Tractor name")]
        public string TractorName { get; set; } 

        [Description("Implement name")]
        public string ImplementName { get; set; } 

        /// <summary>Pesticide applied today across all paddocks (kg)</summary>
        [Units("kg")]
        public double PesticideApplied {get; set;}

        /// <summary>CO2 equivalent of that pesticide (kg)</summary>
        [Units("kg")]
        public double CO2_e {get; set;}

        [NonSerialized] private Events myEvents;
        [EventSubscribe("StartOfSimulation")]
        private void OnStartOfSimulation(object sender, EventArgs e)
        {
            myEvents = new Events(this);
        }

        [EventSubscribe("StartOfDay")]
        private void OnStartOfDay(object sender, EventArgs e)
        {
            CO2_e = PesticideApplied = 0;
        }

        [EventSubscribe("Sowing")]
        private void OnSowing(object sender, EventArgs e)
        {
            string paddockName = (sender as Model).Parent.Name;           
            var paddockZone = FindInScope(paddockName) as Zone;
            //var crops = paddockZone.Children.OfType<IPlant>();
            
             //foreach (var crop in crops)
           //{
               string cropType = (sender as Model).Name; 
                if ( (cropType == "Chickpea")|| (cropType == "Sorghum")||(cropType == "Soybean") )
               { 
            
            double amountToApply = ApplicationRate * paddockZone.Area;
            PesticideApplied += amountToApply;
            CO2_e = PesticideApplied * CO2_conv;

            myEvents.Publish("DoPaddockExpenditure",  new object[] { this, 
                  new FarmEconomics.PaddockExpenditureArgs{
                      Description = $"{ChemicalName} pesticide",
                      Category = "In-crop", 
                      Paddock = paddockName,
                      Name = ChemicalName,
                      Rate = ApplicationRate,
                      Area = paddockZone.Area}});
                       
            myEvents.Publish("Operate",  new object[] { this, 
                  new FarmMachinery.FarmMachineryOperateArgs{
                      Tractor = TractorName,
                      Implement = ImplementName,
                      Category = "In-crop",
                      Paddock = paddockName}}); 
          
            Summary.WriteMessage(this, $"{Clock.Today.ToShortDateString()}: Applied {amountToApply} kg of {ChemicalName} to {paddockName}, total today {PesticideApplied} kg.", MessageType.Information);
        }
        //}
        }
    }
}
```
      Report AnnualReport: EventNames=[Clock].EndOfYear
        VariableNames:
          [Clock].Today
          [FarmEconomics].Balance as Balance
          Sum of [Weather].Rain from [Clock].StartOfYear to [Clock].Today as Rain
          Sum of [FarmMachinery].FuelConsumption on [Clock].EndOfDay from [Clock].StartOfYear to [Clock].Today as FuelConsumption
          Sum of [Manager].Script.manureApplied_kg from [Clock].StartOfYear to [Clock].Today as ManureApplied
          // CO2 sources
          Sum of [Pesticides].PestControlScript.CO2_e from [Clock].StartOfYear to [Clock].Today as pest_co2
          Sum of [Weeds].WeedScript.CO2_e from [Clock].StartOfYear to [Clock].Today as weed_co2
          // This is in kg
          Sum of ([FarmMachinery].FuelConsumption * 2.68) on [Clock].EndOfDay from [Clock].StartOfYear to [Clock].Today as diesel_co2 //kg
          [PhaseAccumulations].AccScript.annual_co2_equiv_300mm as co2_equiv_soil
      Report PhaseReport: EventNames=[RotationManager].Transition
        VariableNames:
          [Clock].Today
          [Manager].MScript.currentPaddock as Paddock
          [Manager].MScript.currentState as currentState
          [PhaseAccumulations].AccScript.daysInPhase as daysInPhase
          [PhaseAccumulations].AccScript.eswStart  as eswStart
          [PhaseAccumulations].AccScript.eswYesterday as eswEnd
          [PhaseAccumulations].AccScript.no3Start  as no3Start
          [PhaseAccumulations].AccScript.no3Yesterday as no3End
          [PhaseAccumulations].AccScript.yield_kgha as yield_kgha
          [PhaseAccumulations].AccScript.biomass_kgha as biomass_kgha
          [PhaseAccumulations].AccScript.TEp as TEp
          [PhaseAccumulations].AccScript.TEs as TEs
          [PhaseAccumulations].AccScript.TRunoff as TRunoff
          [PhaseAccumulations].AccScript.TDrainage as TDrainage
          [PhaseAccumulations].AccScript.TRainfall as TRainfall
          [PhaseAccumulations].AccScript.TFertAsNO3 as TFert
          [PhaseAccumulations].AccScript.co2_equiv_300mm as co2_equiv_300mm
          [PhaseAccumulations].AccScript.dlt_carbon_tot_300mm as carbon_300mm
          sum([Nutrient].Organic.C) as OrganicC
        Memo
          Each line (transition) is reporting at the end of the phase, immediately before the next.

          Usually that's when a crop is harvested, or when a fallow finishes

          The module requires a manager (ie PhaseAccumulations) to tell us (by a DoOutput() method call) when the transition has been made.
      RotationManager: TopLevel=false; InitialState=Fallow; Verbose=false
        Nodes:
          ID  Name
          1   Sorghum
          2   Maize
          3   Fallow
          4   Chickpea
          5   Wheat
          6   Soybean
          7   Mungbean
          8   LateSorghum
          9   SpringSorghum
          10  EarlySorghum
          11  Covercrop
        Arcs:
          {SourceID=1, DestinationID=3, Conditions=[[Manager].Script.CanHarvestSorghum], Actions=[[Manager].Script.HarvestCrop("Sorghum");], BezierPoints=[1077, 37, 1075, 38, 1073, 39, 1072, 41, 1070, 42, 1069, 44, 1067, 45, 1066, 46, 1064, 48, 1063, 49, 1061, 50, 1060, 52, 1058, 53, 1057, 54, 1055, 56, 1054, 57, 1052, 58, 1051, 60, 1050, 61, 1048, 62, 1047, 63, 1045, 65, 1044, 66, 1043, 67, 1041, 68, 1040, 69, 1039, 71, 1037, 72, 1036, 73, 1035, 74, 1034, 75, 1032, 76, 1031, 78, 1030, 79, 1029, 80, 1027, 81, 1026, 82, 1025, 83, 1024, 84, 1023, 85, 1021, 86, 1020, 87, 1019, 88, 1018, 90, 1017, 91, 1016, 92, 1014, 93, 1013, 94, 1012, 95, 1011, 96, 1010, 97, 1009, 98, 1008, 99, 1007, 100, 1006, 100, 1005, 101, 1004, 102, 1003, 103, 1001, 104, 1000, 105, 999, 106, 998, 107, 997, 108, 996, 109, 995, 110, 994, 111, 993, 111, 992, 112, 992, 113, 991, 114, 990, 115, 989, 116, 988, 117, 987, 117, 986, 118, 985, 119, 984, 120, 983, 121, 982, 122, 981, 122, 980, 123, 979, 124, 979, 125, 978, 126, 977, 126, 976, 127, 975, 128, 974, 129, 973, 129, 972, 130, 972, 131, 971, 132, 970, 132, 969, 133, 968, 134, 967, 135, 967, 135, 966, 136, 965, 137, 964, 137, 963, 138, 963, 139, 962, 140, 961, 140, 960, 141, 959, 142, 959, 142, 958, 143, 957, 144, 956, 144, 955, 145, 955, 146, 954, 146, 953, 147, 952, 148, 952, 148, 951, 149, 950, 150, 949, 150, 948, 151, 948, 152, 947, 152, 946, 153, 945, 154, 945, 154, 944, 155, 943, 156, 942, 156, 942, 157, 941, 158, 940, 158, 939, 159, 939, 160, 938, 160, 937, 161, 936, 161, 936, 162, 935, 163, 934, 163, 933, 164, 933, 165, 932, 165, 931, 166, 930, 167, 930, 167, 929, 168, 928, 168, 927, 169, 927, 170, 926, 170, 925, 171, 924, 172, 924, 172, 923, 173, 922, 174, 921, 174, 921, 175, 920, 175, 919, 176, 918, 177, 917, 177, 917, 178, 916, 179, 915, 179, 914, 180, 914, 181, 913, 181, 912, 182, 911, 183, 910, 183, 910, 184, 909, 185, 908, 185, 907, 186, 906, 187, 906, 187, 905, 188, 904, 189, 903, 189, 902, 190, 901, 191, 901, 191, 900, 192, 899, 193, 898, 193, 897, 194, 896, 195, 895, 195, 895, 196, 894, 197, 893, 198, 892, 198, 891, 199, 890, 200, 889, 201, 888, 201, 887, 202, 886, 203, 886, 203, 885, 204, 884, 205, 883, 206, 882, 206, 881, 207, 880, 208, 879, 209, 878, 210, 877, 210, 876, 211, 875, 212, 874, 213, 873, 214, 872, 214, 871, 215, 870, 216, 869, 217, 868, 218, 867, 219, 866, 219, 865, 220, 864, 221, 863, 222, 862, 223, 860, 224, 859, 225, 858, 225, 857, 226, 856, 227, 855, 228, 854, 229, 853, 230, 851, 231, 850, 232, 849, 233, 848, 234, 847, 235, 846, 236, 844, 237, 843, 238, 842, 239, 841, 240, 839, 241, 838, 242, 837, 243, 836, 244, 834, 245, 833, 246, 832, 247, 830, 248, 829, 249, 828, 250, 826, 251, 825, 252, 824, 253, 822, 254, 821, 255], Source={ID=1, Name=Sorghum}, Destination={ID=3, Name=Fallow}, ID=12, Name=Arc 5}
          {SourceID=3, DestinationID=1, Conditions=[[Manager].Script.CanSowSorghum, [Manager].Script.daysSinceLastHarvest_gt_60, [FarmMachinery].MachineryAvailable("220kW FWA", "Planter")], Actions=[[Manager].Script.SowCrop("Sorghum");], BezierPoints=[820, 257, 821, 255, 822, 254, 824, 253, 825, 252, 826, 250, 828, 249, 829, 248, 830, 247, 832, 246, 833, 245, 834, 244, 836, 242, 837, 241, 838, 240, 839, 239, 841, 238, 842, 237, 843, 236, 844, 235, 846, 234, 847, 233, 848, 232, 849, 231, 850, 230, 851, 229, 853, 228, 854, 227, 855, 226, 856, 225, 857, 224, 858, 223, 859, 222, 860, 221, 862, 220, 863, 219, 864, 218, 865, 217, 866, 216, 867, 215, 868, 214, 869, 213, 870, 212, 871, 211, 872, 211, 873, 210, 874, 209, 875, 208, 876, 207, 877, 206, 878, 205, 879, 205, 880, 204, 881, 203, 882, 202, 883, 201, 884, 200, 885, 200, 886, 199, 886, 198, 887, 197, 888, 196, 889, 196, 890, 195, 891, 194, 892, 193, 893, 192, 894, 192, 895, 191, 895, 190, 896, 189, 897, 189, 898, 188, 899, 187, 900, 186, 901, 186, 901, 185, 902, 184, 903, 184, 904, 183, 905, 182, 906, 181, 906, 181, 907, 180, 908, 179, 909, 179, 910, 178, 910, 177, 911, 177, 912, 176, 913, 175, 914, 174, 914, 174, 915, 173, 916, 172, 917, 172, 917, 171, 918, 170, 919, 170, 920, 169, 921, 168, 921, 168, 922, 167, 923, 166, 924, 166, 924, 165, 925, 164, 926, 164, 927, 163, 927, 163, 928, 162, 929, 161, 930, 161, 930, 160, 931, 159, 932, 159, 933, 158, 933, 157, 934, 157, 935, 156, 936, 155, 936, 155, 937, 154, 938, 153, 939, 153, 939, 152, 940, 152, 941, 151, 942, 150, 942, 150, 943, 149, 944, 148, 945, 148, 945, 147, 946, 146, 947, 146, 948, 145, 948, 144, 949, 144, 950, 143, 951, 142, 952, 142, 952, 141, 953, 140, 954, 140, 955, 139, 955, 138, 956, 138, 957, 137, 958, 136, 959, 136, 959, 135, 960, 134, 961, 134, 962, 133, 963, 132, 963, 132, 964, 131, 965, 130, 966, 130, 967, 129, 967, 128, 968, 128, 969, 127, 970, 126, 971, 125, 972, 125, 972, 124, 973, 123, 974, 123, 975, 122, 976, 121, 977, 120, 978, 120, 979, 119, 979, 118, 980, 117, 981, 117, 982, 116, 983, 115, 984, 114, 985, 113, 986, 113, 987, 112, 988, 111, 989, 110, 990, 110, 991, 109, 992, 108, 992, 107, 993, 106, 994, 105, 995, 105, 996, 104, 997, 103, 998, 102, 999, 101, 1000, 100, 1001, 100, 1003, 99, 1004, 98, 1005, 97, 1006, 96, 1007, 95, 1008, 94, 1009, 93, 1010, 92, 1011, 91, 1012, 91, 1013, 90, 1014, 89, 1016, 88, 1017, 87, 1018, 86, 1019, 85, 1020, 84, 1021, 83, 1023, 82, 1024, 81, 1025, 80, 1026, 79, 1027, 78, 1029, 77, 1030, 76, 1031, 75, 1032, 74, 1034, 73, 1035, 71, 1036, 70, 1037, 69, 1039, 68, 1040, 67, 1041, 66, 1043, 65, 1044, 64, 1045, 63, 1047, 61, 1048, 60, 1050, 59, 1051, 58, 1052, 57, 1054, 56, 1055, 54, 1057, 53, 1058, 52, 1060, 51, 1061, 49, 1063, 48, 1064, 47, 1066, 46, 1067, 44, 1069, 43, 1070, 42, 1072, 40, 1073, 39, 1075, 38], Source={ID=3, Name=Fallow}, Destination={ID=1, Name=Sorghum}, ID=13, Name=Arc 6}
          {SourceID=2, DestinationID=3, Conditions=[[Manager].Script.CanHarvestMaize], Actions=[[Manager].Script.HarvestCrop("Maize");], BezierPoints=[1188, 445, 1186, 444, 1184, 443, 1183, 442, 1181, 441, 1180, 440, 1178, 439, 1177, 438, 1175, 437, 1174, 436, 1172, 435, 1171, 434, 1169, 433, 1168, 432, 1166, 431, 1165, 430, 1163, 430, 1162, 429, 1160, 428, 1159, 427, 1158, 426, 1156, 425, 1155, 424, 1153, 423, 1152, 423, 1151, 422, 1149, 421, 1148, 420, 1147, 419, 1145, 418, 1144, 418, 1143, 417, 1141, 416, 1140, 415, 1139, 414, 1137, 414, 1136, 413, 1135, 412, 1133, 411, 1132, 410, 1131, 410, 1130, 409, 1128, 408, 1127, 407, 1126, 407, 1125, 406, 1123, 405, 1122, 404, 1121, 403, 1120, 403, 1118, 402, 1117, 401, 1116, 401, 1115, 400, 1114, 399, 1112, 398, 1111, 398, 1110, 397, 1109, 396, 1108, 396, 1107, 395, 1106, 394, 1104, 393, 1103, 393, 1102, 392, 1101, 391, 1100, 391, 1099, 390, 1098, 389, 1097, 389, 1096, 388, 1094, 387, 1093, 387, 1092, 386, 1091, 385, 1090, 385, 1089, 384, 1088, 384, 1087, 383, 1086, 382, 1085, 382, 1084, 381, 1083, 380, 1082, 380, 1081, 379, 1080, 379, 1079, 378, 1078, 377, 1077, 377, 1076, 376, 1075, 376, 1074, 375, 1073, 374, 1072, 374, 1071, 373, 1070, 373, 1069, 372, 1068, 372, 1067, 371, 1066, 370, 1065, 370, 1064, 369, 1063, 369, 1062, 368, 1062, 368, 1061, 367, 1060, 367, 1059, 366, 1058, 366, 1057, 365, 1056, 365, 1055, 364, 1054, 363, 1053, 363, 1052, 362, 1052, 362, 1051, 361, 1050, 361, 1049, 360, 1048, 360, 1047, 359, 1046, 359, 1045, 358, 1045, 358, 1044, 357, 1043, 357, 1042, 356, 1041, 356, 1040, 355, 1040, 355, 1039, 354, 1038, 354, 1037, 354, 1036, 353, 1035, 353, 1035, 352, 1034, 352, 1033, 351, 1032, 351, 1031, 350, 1030, 350, 1030, 349, 1029, 349, 1028, 348, 1027, 348, 1026, 348, 1026, 347, 1025, 347, 1024, 346, 1023, 346, 1022, 345, 1022, 345, 1021, 345, 1020, 344, 1019, 344, 1019, 343, 1018, 343, 1017, 342, 1016, 342, 1015, 342, 1015, 341, 1014, 341, 1013, 340, 1012, 340, 1012, 339, 1011, 339, 1010, 339, 1009, 338, 1008, 338, 1008, 337, 1007, 337, 1006, 337, 1005, 336, 1005, 336, 1004, 335, 1003, 335, 1002, 335, 1002, 334, 1001, 334, 1000, 333, 999, 333, 999, 333, 998, 332, 997, 332, 996, 332, 996, 331, 995, 331, 994, 330, 993, 330, 993, 330, 992, 329, 991, 329, 990, 329, 990, 328, 989, 328, 988, 327, 987, 327, 987, 327, 986, 326, 985, 326, 984, 326, 984, 325, 983, 325, 982, 324, 981, 324, 981, 324, 980, 323, 979, 323, 978, 323, 978, 322, 977, 322, 976, 322, 975, 321, 975, 321, 974, 320, 973, 320, 972, 320, 972, 319, 971, 319, 970, 319, 969, 318, 968, 318, 968, 318, 967, 317, 966, 317, 965, 316, 965, 316, 964, 316, 963, 315, 962, 315, 961, 315, 961, 314, 960, 314, 959, 314, 958, 313, 958, 313, 957, 313, 956, 312, 955, 312, 954, 311, 954, 311, 953, 311, 952, 310, 951, 310, 950, 310, 950, 309, 949, 309, 948, 309, 947, 308, 946, 308, 945, 308, 945, 307, 944, 307, 943, 306, 942, 306, 941, 306, 940, 305, 940, 305, 939, 305, 938, 304, 937, 304, 936, 304, 935, 303, 934, 303, 934, 302, 933, 302, 932, 302, 931, 301, 930, 301, 929, 301, 928, 300, 927, 300, 927, 299, 926, 299, 925, 299, 924, 298, 923, 298, 922, 298, 921, 297, 920, 297, 919, 296, 918, 296, 918, 296, 917, 295, 916, 295, 915, 295, 914, 294, 913, 294, 912, 293, 911, 293, 910, 293, 909, 292, 908, 292, 907, 291, 906, 291, 905, 291, 904, 290, 903, 290, 902, 289, 901, 289, 900, 289, 899, 288, 898, 288, 897, 287, 896, 287, 895, 286, 894, 286, 893, 286, 892, 285, 891, 285, 890, 284, 889, 284, 888, 284, 887, 283, 885, 283, 884, 282, 883, 282, 882, 281, 881, 281, 880, 280, 879, 280, 878, 280, 877, 279, 876, 279, 874, 278, 873, 278, 872, 277, 871, 277, 870, 276, 869, 276, 867, 275, 866, 275, 865, 275, 864, 274, 863, 274, 862, 273, 860, 273, 859, 272, 858, 272, 857, 271, 855, 271, 854, 270, 853, 270, 852, 269, 850, 269, 849, 268, 848, 268, 847, 267, 845, 267, 844, 266, 843, 266, 841, 265, 840, 265, 839, 264, 837, 264, 836, 263, 835, 263, 833, 262, 832, 261, 831, 261, 829, 260, 828, 260, 827, 259, 825, 259, 824, 258, 822, 258, 821, 257], Source={ID=2, Name=Maize}, Destination={ID=3, Name=Fallow}, ID=14, Name=Arc 9}
          {SourceID=3, DestinationID=2, Conditions=[[Manager].Script.CanSowMaize, [Manager].Script.daysSinceLastHarvest_gt_60, [FarmMachinery].MachineryAvailable("220kW FWA", "Planter")], Actions=[[Manager].Script.SowCrop("Maize");], BezierPoints=[820, 257, 821, 257, 822, 258, 824, 259, 825, 260, 827, 261, 828, 262, 829, 263, 831, 264, 832, 265, 833, 266, 835, 267, 836, 268, 837, 268, 839, 269, 840, 270, 841, 271, 843, 272, 844, 273, 845, 274, 847, 274, 848, 275, 849, 276, 850, 277, 852, 278, 853, 279, 854, 279, 855, 280, 857, 281, 858, 282, 859, 283, 860, 284, 862, 284, 863, 285, 864, 286, 865, 287, 866, 287, 867, 288, 869, 289, 870, 290, 871, 291, 872, 291, 873, 292, 874, 293, 876, 294, 877, 294, 878, 295, 879, 296, 880, 296, 881, 297, 882, 298, 883, 299, 884, 299, 885, 300, 887, 301, 888, 301, 889, 302, 890, 303, 891, 304, 892, 304, 893, 305, 894, 306, 895, 306, 896, 307, 897, 308, 898, 308, 899, 309, 900, 310, 901, 310, 902, 311, 903, 312, 904, 312, 905, 313, 906, 313, 907, 314, 908, 315, 909, 315, 910, 316, 911, 317, 912, 317, 913, 318, 914, 318, 915, 319, 916, 320, 917, 320, 918, 321, 918, 321, 919, 322, 920, 323, 921, 323, 922, 324, 923, 324, 924, 325, 925, 325, 926, 326, 927, 327, 927, 327, 928, 328, 929, 328, 930, 329, 931, 329, 932, 330, 933, 330, 934, 331, 934, 331, 935, 332, 936, 333, 937, 333, 938, 334, 939, 334, 940, 335, 940, 335, 941, 336, 942, 336, 943, 337, 944, 337, 945, 338, 945, 338, 946, 339, 947, 339, 948, 340, 949, 340, 950, 341, 950, 341, 951, 342, 952, 342, 953, 343, 954, 343, 954, 344, 955, 344, 956, 344, 957, 345, 958, 345, 958, 346, 959, 346, 960, 347, 961, 347, 961, 348, 962, 348, 963, 349, 964, 349, 965, 349, 965, 350, 966, 350, 967, 351, 968, 351, 968, 352, 969, 352, 970, 353, 971, 353, 972, 353, 972, 354, 973, 354, 974, 355, 975, 355, 975, 356, 976, 356, 977, 356, 978, 357, 978, 357, 979, 358, 980, 358, 981, 358, 981, 359, 982, 359, 983, 360, 984, 360, 984, 361, 985, 361, 986, 361, 987, 362, 987, 362, 988, 363, 989, 363, 990, 363, 990, 364, 991, 364, 992, 364, 993, 365, 993, 365, 994, 366, 995, 366, 996, 366, 996, 367, 997, 367, 998, 368, 999, 368, 999, 368, 1000, 369, 1001, 369, 1002, 369, 1002, 370, 1003, 370, 1004, 371, 1005, 371, 1005, 371, 1006, 372, 1007, 372, 1008, 372, 1008, 373, 1009, 373, 1010, 374, 1011, 374, 1012, 374, 1012, 375, 1013, 375, 1014, 375, 1015, 376, 1015, 376, 1016, 377, 1017, 377, 1018, 377, 1019, 378, 1019, 378, 1020, 378, 1021, 379, 1022, 379, 1022, 379, 1023, 380, 1024, 380, 1025, 381, 1026, 381, 1026, 381, 1027, 382, 1028, 382, 1029, 382, 1030, 383, 1030, 383, 1031, 383, 1032, 384, 1033, 384, 1034, 385, 1035, 385, 1035, 385, 1036, 386, 1037, 386, 1038, 386, 1039, 387, 1040, 387, 1040, 387, 1041, 388, 1042, 388, 1043, 389, 1044, 389, 1045, 389, 1045, 390, 1046, 390, 1047, 390, 1048, 391, 1049, 391, 1050, 392, 1051, 392, 1052, 392, 1052, 393, 1053, 393, 1054, 393, 1055, 394, 1056, 394, 1057, 394, 1058, 395, 1059, 395, 1060, 396, 1061, 396, 1062, 396, 1062, 397, 1063, 397, 1064, 397, 1065, 398, 1066, 398, 1067, 399, 1068, 399, 1069, 399, 1070, 400, 1071, 400, 1072, 401, 1073, 401, 1074, 401, 1075, 402, 1076, 402, 1077, 403, 1078, 403, 1079, 403, 1080, 404, 1081, 404, 1082, 405, 1083, 405, 1084, 405, 1085, 406, 1086, 406, 1087, 407, 1088, 407, 1089, 407, 1090, 408, 1091, 408, 1092, 409, 1093, 409, 1094, 409, 1096, 410, 1097, 410, 1098, 411, 1099, 411, 1100, 412, 1101, 412, 1102, 412, 1103, 413, 1104, 413, 1106, 414, 1107, 414, 1108, 415, 1109, 415, 1110, 415, 1111, 416, 1112, 416, 1114, 417, 1115, 417, 1116, 418, 1117, 418, 1118, 419, 1120, 419, 1121, 420, 1122, 420, 1123, 420, 1125, 421, 1126, 421, 1127, 422, 1128, 422, 1130, 423, 1131, 423, 1132, 424, 1133, 424, 1135, 425, 1136, 425, 1137, 426, 1139, 426, 1140, 427, 1141, 427, 1143, 428, 1144, 428, 1145, 429, 1147, 429, 1148, 430, 1149, 430, 1151, 431, 1152, 431, 1153, 432, 1155, 432, 1156, 433, 1158, 433, 1159, 434, 1160, 434, 1162, 435, 1163, 435, 1165, 436, 1166, 437, 1168, 437, 1169, 438, 1171, 438, 1172, 439, 1174, 439, 1175, 440, 1177, 440, 1178, 441, 1180, 442, 1181, 442, 1183, 443, 1184, 443, 1186, 444], Source={ID=3, Name=Fallow}, Destination={ID=2, Name=Maize}, ID=15, Name=Arc 10}
          {SourceID=4, DestinationID=3, Conditions=[[Manager].Script.CanHarvestChickpea], Actions=[[Manager].Script.HarvestCrop("Chickpea");], BezierPoints=[1085, 603, 1084, 601, 1083, 600, 1082, 598, 1081, 597, 1080, 596, 1079, 594, 1078, 593, 1077, 591, 1077, 590, 1076, 589, 1075, 587, 1074, 586, 1073, 585, 1072, 583, 1072, 582, 1071, 581, 1070, 580, 1069, 578, 1068, 577, 1068, 576, 1067, 574, 1066, 573, 1065, 572, 1064, 571, 1064, 570, 1063, 568, 1062, 567, 1061, 566, 1061, 565, 1060, 563, 1059, 562, 1058, 561, 1058, 560, 1057, 559, 1056, 558, 1055, 556, 1055, 555, 1054, 554, 1053, 553, 1052, 552, 1052, 551, 1051, 550, 1050, 548, 1050, 547, 1049, 546, 1048, 545, 1047, 544, 1047, 543, 1046, 542, 1045, 541, 1045, 540, 1044, 539, 1043, 538, 1043, 537, 1042, 536, 1041, 535, 1041, 533, 1040, 532, 1039, 531, 1039, 530, 1038, 529, 1037, 528, 1037, 527, 1036, 526, 1035, 525, 1035, 524, 1034, 523, 1034, 522, 1033, 521, 1032, 521, 1032, 520, 1031, 519, 1030, 518, 1030, 517, 1029, 516, 1029, 515, 1028, 514, 1027, 513, 1027, 512, 1026, 511, 1026, 510, 1025, 509, 1024, 508, 1024, 507, 1023, 507, 1023, 506, 1022, 505, 1021, 504, 1021, 503, 1020, 502, 1020, 501, 1019, 500, 1018, 499, 1018, 499, 1017, 498, 1017, 497, 1016, 496, 1016, 495, 1015, 494, 1014, 493, 1014, 493, 1013, 492, 1013, 491, 1012, 490, 1012, 489, 1011, 488, 1010, 488, 1010, 487, 1009, 486, 1009, 485, 1008, 484, 1008, 483, 1007, 483, 1007, 482, 1006, 481, 1005, 480, 1005, 479, 1004, 479, 1004, 478, 1003, 477, 1003, 476, 1002, 475, 1002, 475, 1001, 474, 1001, 473, 1000, 472, 999, 471, 999, 471, 998, 470, 998, 469, 997, 468, 997, 468, 996, 467, 996, 466, 995, 465, 994, 465, 994, 464, 993, 463, 993, 462, 992, 461, 992, 461, 991, 460, 991, 459, 990, 458, 990, 458, 989, 457, 988, 456, 988, 455, 987, 455, 987, 454, 986, 453, 986, 452, 985, 452, 985, 451, 984, 450, 983, 449, 983, 449, 982, 448, 982, 447, 981, 446, 981, 446, 980, 445, 980, 444, 979, 443, 978, 443, 978, 442, 977, 441, 977, 440, 976, 440, 976, 439, 975, 438, 974, 437, 974, 437, 973, 436, 973, 435, 972, 434, 972, 434, 971, 433, 970, 432, 970, 431, 969, 431, 969, 430, 968, 429, 967, 428, 967, 428, 966, 427, 966, 426, 965, 425, 964, 424, 964, 424, 963, 423, 963, 422, 962, 421, 961, 421, 961, 420, 960, 419, 959, 418, 959, 418, 958, 417, 958, 416, 957, 415, 956, 414, 956, 414, 955, 413, 954, 412, 954, 411, 953, 410, 952, 410, 952, 409, 951, 408, 950, 407, 950, 406, 949, 406, 948, 405, 948, 404, 947, 403, 946, 402, 946, 401, 945, 401, 944, 400, 944, 399, 943, 398, 942, 397, 942, 396, 941, 396, 940, 395, 939, 394, 939, 393, 938, 392, 937, 391, 937, 390, 936, 390, 935, 389, 934, 388, 934, 387, 933, 386, 932, 385, 931, 384, 931, 383, 930, 382, 929, 382, 928, 381, 928, 380, 927, 379, 926, 378, 925, 377, 924, 376, 924, 375, 923, 374, 922, 373, 921, 372, 920, 371, 920, 370, 919, 369, 918, 368, 917, 368, 916, 367, 915, 366, 915, 365, 914, 364, 913, 363, 912, 362, 911, 361, 910, 360, 909, 359, 908, 358, 908, 357, 907, 356, 906, 354, 905, 353, 904, 352, 903, 351, 902, 350, 901, 349, 900, 348, 899, 347, 898, 346, 897, 345, 897, 344, 896, 343, 895, 342, 894, 341, 893, 339, 892, 338, 891, 337, 890, 336, 889, 335, 888, 334, 887, 333, 886, 331, 885, 330, 884, 329, 883, 328, 882, 327, 881, 326, 879, 324, 878, 323, 877, 322, 876, 321, 875, 320, 874, 318, 873, 317, 872, 316, 871, 315, 870, 313, 869, 312, 867, 311, 866, 309, 865, 308, 864, 307, 863, 306, 862, 304, 861, 303, 859, 302, 858, 300, 857, 299, 856, 298, 855, 296, 853, 295, 852, 294, 851, 292, 850, 291, 849, 289, 847, 288, 846, 287, 845, 285, 844, 284, 842, 282, 841, 281, 840, 279, 838, 278, 837, 276, 836, 275, 835, 273, 833, 272, 832, 270, 831, 269, 829, 267, 828, 266, 826, 264, 825, 263, 824, 261, 822, 260, 821, 258], Source={ID=4, Name=Chickpea}, Destination={ID=3, Name=Fallow}, ID=16, Name=Arc 11}
          {SourceID=3, DestinationID=4, Conditions=[[Manager].Script.CanSowChickpea, [Manager].Script.daysSinceLastHarvest_gt_60, [FarmMachinery].MachineryAvailable("220kW FWA", "Planter")], Actions=[[Manager].Script.SowCrop("Chickpea");], BezierPoints=[820, 257, 821, 258, 822, 260, 823, 262, 824, 264, 825, 265, 826, 267, 827, 269, 828, 271, 829, 272, 830, 274, 831, 276, 832, 277, 833, 279, 834, 281, 835, 282, 836, 284, 837, 286, 838, 287, 839, 289, 840, 290, 840, 292, 841, 294, 842, 295, 843, 297, 844, 298, 845, 300, 846, 301, 847, 303, 848, 305, 849, 306, 850, 308, 851, 309, 851, 311, 852, 312, 853, 313, 854, 315, 855, 316, 856, 318, 857, 319, 857, 321, 858, 322, 859, 324, 860, 325, 861, 326, 862, 328, 862, 329, 863, 330, 864, 332, 865, 333, 866, 335, 866, 336, 867, 337, 868, 338, 869, 340, 870, 341, 870, 342, 871, 344, 872, 345, 873, 346, 873, 348, 874, 349, 875, 350, 876, 351, 876, 353, 877, 354, 878, 355, 879, 356, 879, 357, 880, 359, 881, 360, 882, 361, 882, 362, 883, 363, 884, 365, 884, 366, 885, 367, 886, 368, 887, 369, 887, 370, 888, 371, 889, 373, 889, 374, 890, 375, 891, 376, 891, 377, 892, 378, 893, 379, 893, 380, 894, 381, 895, 382, 895, 383, 896, 385, 897, 386, 897, 387, 898, 388, 899, 389, 899, 390, 900, 391, 901, 392, 901, 393, 902, 394, 903, 395, 903, 396, 904, 397, 904, 398, 905, 399, 906, 400, 906, 401, 907, 402, 908, 403, 908, 404, 909, 404, 909, 405, 910, 406, 911, 407, 911, 408, 912, 409, 912, 410, 913, 411, 914, 412, 914, 413, 915, 414, 915, 415, 916, 416, 917, 416, 917, 417, 918, 418, 918, 419, 919, 420, 920, 421, 920, 422, 921, 423, 921, 423, 922, 424, 923, 425, 923, 426, 924, 427, 924, 428, 925, 429, 925, 429, 926, 430, 927, 431, 927, 432, 928, 433, 928, 433, 929, 434, 929, 435, 930, 436, 931, 437, 931, 438, 932, 438, 932, 439, 933, 440, 934, 441, 934, 442, 935, 442, 935, 443, 936, 444, 936, 445, 937, 445, 938, 446, 938, 447, 939, 448, 939, 449, 940, 449, 940, 450, 941, 451, 942, 452, 942, 452, 943, 453, 943, 454, 944, 455, 944, 455, 945, 456, 946, 457, 946, 458, 947, 458, 947, 459, 948, 460, 948, 461, 949, 461, 950, 462, 950, 463, 951, 464, 951, 464, 952, 465, 953, 466, 953, 466, 954, 467, 954, 468, 955, 469, 956, 469, 956, 470, 957, 471, 957, 472, 958, 472, 958, 473, 959, 474, 960, 474, 960, 475, 961, 476, 962, 477, 962, 477, 963, 478, 963, 479, 964, 480, 965, 480, 965, 481, 966, 482, 966, 482, 967, 483, 968, 484, 968, 485, 969, 485, 970, 486, 970, 487, 971, 488, 971, 488, 972, 489, 973, 490, 973, 490, 974, 491, 975, 492, 975, 493, 976, 493, 977, 494, 977, 495, 978, 496, 979, 496, 979, 497, 980, 498, 981, 498, 981, 499, 982, 500, 983, 501, 983, 501, 984, 502, 985, 503, 986, 504, 986, 504, 987, 505, 988, 506, 988, 507, 989, 507, 990, 508, 990, 509, 991, 510, 992, 511, 993, 511, 993, 512, 994, 513, 995, 514, 996, 514, 996, 515, 997, 516, 998, 517, 999, 518, 999, 518, 1000, 519, 1001, 520, 1002, 521, 1002, 521, 1003, 522, 1004, 523, 1005, 524, 1006, 525, 1006, 526, 1007, 526, 1008, 527, 1009, 528, 1010, 529, 1010, 530, 1011, 530, 1012, 531, 1013, 532, 1014, 533, 1015, 534, 1015, 535, 1016, 536, 1017, 536, 1018, 537, 1019, 538, 1020, 539, 1021, 540, 1021, 541, 1022, 542, 1023, 543, 1024, 543, 1025, 544, 1026, 545, 1027, 546, 1028, 547, 1029, 548, 1030, 549, 1031, 550, 1031, 551, 1032, 552, 1033, 553, 1034, 553, 1035, 554, 1036, 555, 1037, 556, 1038, 557, 1039, 558, 1040, 559, 1041, 560, 1042, 561, 1043, 562, 1044, 563, 1045, 564, 1046, 565, 1047, 566, 1048, 567, 1049, 568, 1050, 569, 1051, 570, 1052, 571, 1053, 572, 1054, 573, 1056, 574, 1057, 575, 1058, 576, 1059, 578, 1060, 579, 1061, 580, 1062, 581, 1063, 582, 1064, 583, 1066, 584, 1067, 585, 1068, 586, 1069, 587, 1070, 588, 1071, 590, 1072, 591, 1074, 592, 1075, 593, 1076, 594, 1077, 595, 1078, 597, 1080, 598, 1081, 599, 1082, 600, 1083, 601], Source={ID=3, Name=Fallow}, Destination={ID=4, Name=Chickpea}, ID=17, Name=Arc 12}
          {SourceID=5, DestinationID=3, Conditions=[[Manager].Script.CanHarvestWheat], Actions=[[Manager].Script.HarvestCrop("Wheat");], BezierPoints=[834, 654, 833, 652, 833, 651, 833, 650, 833, 649, 833, 647, 833, 646, 833, 645, 833, 644, 832, 643, 832, 642, 832, 640, 832, 639, 832, 638, 832, 637, 832, 636, 832, 635, 832, 634, 831, 632, 831, 631, 831, 630, 831, 629, 831, 628, 831, 627, 831, 626, 831, 625, 831, 624, 830, 622, 830, 621, 830, 620, 830, 619, 830, 618, 830, 617, 830, 616, 830, 615, 830, 614, 830, 613, 829, 612, 829, 611, 829, 610, 829, 609, 829, 608, 829, 607, 829, 606, 829, 605, 829, 604, 829, 603, 828, 602, 828, 601, 828, 600, 828, 599, 828, 598, 828, 597, 828, 596, 828, 595, 828, 594, 828, 593, 828, 592, 827, 591, 827, 591, 827, 590, 827, 589, 827, 588, 827, 587, 827, 586, 827, 585, 827, 584, 827, 583, 827, 582, 827, 581, 826, 581, 826, 580, 826, 579, 826, 578, 826, 577, 826, 576, 826, 575, 826, 574, 826, 574, 826, 573, 826, 572, 826, 571, 825, 570, 825, 569, 825, 568, 825, 568, 825, 567, 825, 566, 825, 565, 825, 564, 825, 563, 825, 563, 825, 562, 825, 561, 825, 560, 825, 559, 824, 559, 824, 558, 824, 557, 824, 556, 824, 555, 824, 555, 824, 554, 824, 553, 824, 552, 824, 551, 824, 551, 824, 550, 824, 549, 824, 548, 824, 547, 824, 547, 823, 546, 823, 545, 823, 544, 823, 544, 823, 543, 823, 542, 823, 541, 823, 541, 823, 540, 823, 539, 823, 538, 823, 538, 823, 537, 823, 536, 823, 535, 823, 535, 823, 534, 822, 533, 822, 532, 822, 532, 822, 531, 822, 530, 822, 529, 822, 529, 822, 528, 822, 527, 822, 526, 822, 526, 822, 525, 822, 524, 822, 523, 822, 523, 822, 522, 822, 521, 822, 520, 822, 520, 822, 519, 821, 518, 821, 518, 821, 517, 821, 516, 821, 515, 821, 515, 821, 514, 821, 513, 821, 512, 821, 512, 821, 511, 821, 510, 821, 510, 821, 509, 821, 508, 821, 507, 821, 507, 821, 506, 821, 505, 821, 504, 821, 504, 821, 503, 821, 502, 821, 502, 821, 501, 820, 500, 820, 499, 820, 499, 820, 498, 820, 497, 820, 496, 820, 496, 820, 495, 820, 494, 820, 494, 820, 493, 820, 492, 820, 491, 820, 491, 820, 490, 820, 489, 820, 488, 820, 488, 820, 487, 820, 486, 820, 485, 820, 485, 820, 484, 820, 483, 820, 482, 820, 482, 820, 481, 820, 480, 820, 479, 820, 479, 820, 478, 820, 477, 820, 476, 820, 476, 820, 475, 819, 474, 819, 473, 819, 472, 819, 472, 819, 471, 819, 470, 819, 469, 819, 469, 819, 468, 819, 467, 819, 466, 819, 465, 819, 465, 819, 464, 819, 463, 819, 462, 819, 461, 819, 461, 819, 460, 819, 459, 819, 458, 819, 457, 819, 457, 819, 456, 819, 455, 819, 454, 819, 453, 819, 452, 819, 452, 819, 451, 819, 450, 819, 449, 819, 448, 819, 447, 819, 447, 819, 446, 819, 445, 819, 444, 819, 443, 819, 442, 819, 441, 819, 440, 819, 440, 819, 439, 819, 438, 819, 437, 819, 436, 819, 435, 819, 434, 819, 433, 819, 432, 819, 432, 819, 431, 819, 430, 819, 429, 819, 428, 819, 427, 819, 426, 819, 425, 819, 424, 819, 423, 819, 422, 819, 421, 819, 420, 819, 419, 819, 418, 819, 417, 819, 416, 819, 415, 819, 414, 819, 413, 819, 412, 819, 412, 819, 410, 819, 409, 819, 408, 819, 407, 819, 406, 819, 405, 819, 404, 819, 403, 819, 402, 819, 401, 819, 400, 819, 399, 819, 398, 819, 397, 819, 396, 819, 395, 819, 394, 819, 393, 819, 392, 819, 391, 819, 389, 819, 388, 819, 387, 819, 386, 819, 385, 819, 384, 819, 383, 819, 382, 819, 380, 819, 379, 819, 378, 819, 377, 819, 376, 819, 375, 819, 373, 819, 372, 819, 371, 819, 370, 819, 369, 819, 367, 819, 366, 819, 365, 819, 364, 819, 363, 819, 361, 819, 360, 819, 359, 819, 358, 819, 356, 819, 355, 819, 354, 819, 352, 819, 351, 819, 350, 819, 349, 819, 347, 819, 346, 819, 345, 819, 343, 819, 342, 819, 341, 819, 339, 819, 338, 819, 336, 819, 335, 819, 334, 819, 332, 819, 331, 819, 330, 819, 328, 819, 327, 819, 325, 819, 324, 819, 322, 819, 321, 819, 319, 819, 318, 819, 317, 819, 315, 819, 314, 819, 312, 819, 311, 819, 309, 819, 308, 819, 306, 819, 305, 819, 303, 819, 301, 819, 300, 819, 298, 819, 297, 819, 295, 819, 294, 819, 292, 819, 290, 819, 289, 819, 287, 819, 285, 819, 284, 819, 282, 819, 281, 819, 279, 819, 277, 819, 276, 819, 274, 819, 272, 819, 270, 819, 269, 819, 267, 819, 265, 819, 264, 819, 262, 819, 260, 819, 258], Source={ID=5, Name=Wheat}, Destination={ID=3, Name=Fallow}, ID=18, Name=Arc 13}
          {SourceID=3, DestinationID=5, Conditions=[[Manager].Script.CanSowWheat, [Manager].Script.daysSinceLastHarvest_gt_60, [FarmMachinery].MachineryAvailable("220kW FWA", "Planter")], Actions=[[Manager].Script.SowCrop("Wheat");], BezierPoints=[820, 257, 819, 258, 819, 260, 819, 262, 819, 264, 819, 266, 819, 268, 819, 270, 819, 272, 819, 274, 819, 275, 819, 277, 819, 279, 819, 281, 819, 283, 819, 285, 819, 286, 819, 288, 819, 290, 819, 292, 819, 294, 819, 295, 819, 297, 819, 299, 819, 300, 819, 302, 819, 304, 819, 306, 819, 307, 819, 309, 819, 311, 819, 312, 819, 314, 819, 316, 819, 317, 819, 319, 819, 321, 819, 322, 819, 324, 819, 325, 819, 327, 819, 329, 819, 330, 819, 332, 819, 333, 819, 335, 819, 336, 819, 338, 819, 339, 819, 341, 819, 342, 819, 344, 819, 345, 819, 347, 819, 348, 819, 350, 819, 351, 819, 353, 819, 354, 819, 356, 819, 357, 819, 358, 819, 360, 819, 361, 819, 363, 819, 364, 819, 365, 819, 367, 819, 368, 819, 370, 819, 371, 819, 372, 819, 374, 819, 375, 819, 376, 819, 378, 819, 379, 819, 380, 819, 381, 819, 383, 819, 384, 819, 385, 819, 387, 819, 388, 819, 389, 819, 390, 819, 392, 819, 393, 819, 394, 819, 395, 819, 397, 819, 398, 819, 399, 819, 400, 819, 401, 819, 403, 819, 404, 819, 405, 819, 406, 819, 407, 819, 408, 819, 410, 819, 411, 819, 412, 819, 413, 819, 414, 819, 415, 819, 416, 819, 417, 819, 419, 819, 420, 819, 421, 819, 422, 819, 423, 819, 424, 819, 425, 819, 426, 819, 427, 819, 428, 819, 429, 819, 430, 819, 431, 819, 432, 819, 433, 819, 435, 819, 436, 819, 437, 819, 438, 819, 439, 819, 440, 819, 441, 819, 442, 819, 443, 819, 444, 819, 444, 819, 445, 819, 446, 819, 447, 819, 448, 819, 449, 819, 450, 819, 451, 819, 452, 819, 453, 819, 454, 819, 455, 819, 456, 819, 457, 819, 458, 819, 459, 819, 459, 819, 460, 819, 461, 819, 462, 819, 463, 819, 464, 819, 465, 819, 466, 819, 467, 819, 467, 819, 468, 819, 469, 819, 470, 819, 471, 819, 472, 819, 473, 819, 473, 819, 474, 819, 475, 819, 476, 819, 477, 819, 478, 819, 478, 819, 479, 819, 480, 819, 481, 819, 482, 819, 483, 819, 483, 819, 484, 819, 485, 819, 486, 819, 487, 819, 487, 819, 488, 819, 489, 819, 490, 819, 490, 820, 491, 820, 492, 820, 493, 820, 494, 820, 494, 820, 495, 820, 496, 820, 497, 820, 497, 820, 498, 820, 499, 820, 500, 820, 500, 820, 501, 820, 502, 820, 503, 820, 503, 820, 504, 820, 505, 820, 506, 820, 506, 820, 507, 820, 508, 820, 508, 820, 509, 820, 510, 820, 511, 820, 511, 820, 512, 820, 513, 820, 514, 820, 514, 820, 515, 820, 516, 820, 516, 821, 517, 821, 518, 821, 518, 821, 519, 821, 520, 821, 521, 821, 521, 821, 522, 821, 523, 821, 523, 821, 524, 821, 525, 821, 525, 821, 526, 821, 527, 821, 528, 821, 528, 821, 529, 821, 530, 821, 530, 821, 531, 821, 532, 821, 532, 821, 533, 821, 534, 822, 534, 822, 535, 822, 536, 822, 537, 822, 537, 822, 538, 822, 539, 822, 539, 822, 540, 822, 541, 822, 541, 822, 542, 822, 543, 822, 543, 822, 544, 822, 545, 822, 545, 822, 546, 822, 547, 822, 548, 823, 548, 823, 549, 823, 550, 823, 550, 823, 551, 823, 552, 823, 552, 823, 553, 823, 554, 823, 554, 823, 555, 823, 556, 823, 557, 823, 557, 823, 558, 823, 559, 823, 559, 824, 560, 824, 561, 824, 561, 824, 562, 824, 563, 824, 564, 824, 564, 824, 565, 824, 566, 824, 566, 824, 567, 824, 568, 824, 569, 824, 569, 824, 570, 824, 571, 825, 571, 825, 572, 825, 573, 825, 574, 825, 574, 825, 575, 825, 576, 825, 577, 825, 577, 825, 578, 825, 579, 825, 580, 825, 580, 825, 581, 826, 582, 826, 583, 826, 583, 826, 584, 826, 585, 826, 586, 826, 586, 826, 587, 826, 588, 826, 589, 826, 589, 826, 590, 827, 591, 827, 592, 827, 593, 827, 593, 827, 594, 827, 595, 827, 596, 827, 597, 827, 597, 827, 598, 827, 599, 827, 600, 828, 601, 828, 601, 828, 602, 828, 603, 828, 604, 828, 605, 828, 606, 828, 606, 828, 607, 828, 608, 828, 609, 829, 610, 829, 611, 829, 611, 829, 612, 829, 613, 829, 614, 829, 615, 829, 616, 829, 617, 829, 618, 830, 618, 830, 619, 830, 620, 830, 621, 830, 622, 830, 623, 830, 624, 830, 625, 830, 626, 830, 627, 831, 628, 831, 629, 831, 629, 831, 630, 831, 631, 831, 632, 831, 633, 831, 634, 831, 635, 832, 636, 832, 637, 832, 638, 832, 639, 832, 640, 832, 641, 832, 642, 832, 643, 832, 644, 833, 645, 833, 646, 833, 647, 833, 648, 833, 649, 833, 650, 833, 651, 833, 652], Source={ID=3, Name=Fallow}, Destination={ID=5, Name=Wheat}, ID=19, Name=Arc 14}
          {SourceID=6, DestinationID=3, Conditions=[[Manager].Script.CanHarvestSoybean], Actions=[[Manager].Script.HarvestCrop("Soybean");], BezierPoints=[1259, 158, 1257, 158, 1255, 158, 1254, 158, 1252, 158, 1251, 158, 1249, 159, 1248, 159, 1246, 159, 1245, 159, 1243, 159, 1242, 160, 1240, 160, 1239, 160, 1237, 160, 1236, 160, 1234, 160, 1233, 161, 1231, 161, 1230, 161, 1228, 161, 1227, 161, 1225, 162, 1224, 162, 1223, 162, 1221, 162, 1220, 162, 1218, 162, 1217, 163, 1216, 163, 1214, 163, 1213, 163, 1211, 163, 1210, 163, 1209, 164, 1207, 164, 1206, 164, 1205, 164, 1203, 164, 1202, 164, 1201, 165, 1199, 165, 1198, 165, 1197, 165, 1195, 165, 1194, 165, 1193, 166, 1192, 166, 1190, 166, 1189, 166, 1188, 166, 1187, 166, 1185, 166, 1184, 167, 1183, 167, 1182, 167, 1180, 167, 1179, 167, 1178, 167, 1177, 168, 1175, 168, 1174, 168, 1173, 168, 1172, 168, 1171, 168, 1169, 168, 1168, 169, 1167, 169, 1166, 169, 1165, 169, 1164, 169, 1163, 169, 1161, 169, 1160, 170, 1159, 170, 1158, 170, 1157, 170, 1156, 170, 1155, 170, 1153, 170, 1152, 171, 1151, 171, 1150, 171, 1149, 171, 1148, 171, 1147, 171, 1146, 172, 1145, 172, 1144, 172, 1143, 172, 1142, 172, 1140, 172, 1139, 172, 1138, 172, 1137, 173, 1136, 173, 1135, 173, 1134, 173, 1133, 173, 1132, 173, 1131, 173, 1130, 174, 1129, 174, 1128, 174, 1127, 174, 1126, 174, 1125, 174, 1124, 174, 1123, 175, 1122, 175, 1121, 175, 1120, 175, 1119, 175, 1118, 175, 1117, 175, 1116, 176, 1115, 176, 1114, 176, 1114, 176, 1113, 176, 1112, 176, 1111, 176, 1110, 177, 1109, 177, 1108, 177, 1107, 177, 1106, 177, 1105, 177, 1104, 177, 1103, 177, 1102, 178, 1101, 178, 1101, 178, 1100, 178, 1099, 178, 1098, 178, 1097, 178, 1096, 179, 1095, 179, 1094, 179, 1093, 179, 1093, 179, 1092, 179, 1091, 179, 1090, 180, 1089, 180, 1088, 180, 1087, 180, 1087, 180, 1086, 180, 1085, 180, 1084, 181, 1083, 181, 1082, 181, 1081, 181, 1081, 181, 1080, 181, 1079, 181, 1078, 182, 1077, 182, 1076, 182, 1076, 182, 1075, 182, 1074, 182, 1073, 182, 1072, 183, 1071, 183, 1071, 183, 1070, 183, 1069, 183, 1068, 183, 1067, 183, 1067, 184, 1066, 184, 1065, 184, 1064, 184, 1063, 184, 1063, 184, 1062, 184, 1061, 185, 1060, 185, 1059, 185, 1059, 185, 1058, 185, 1057, 185, 1056, 185, 1056, 186, 1055, 186, 1054, 186, 1053, 186, 1052, 186, 1052, 186, 1051, 187, 1050, 187, 1049, 187, 1049, 187, 1048, 187, 1047, 187, 1046, 187, 1046, 188, 1045, 188, 1044, 188, 1043, 188, 1042, 188, 1042, 188, 1041, 189, 1040, 189, 1039, 189, 1039, 189, 1038, 189, 1037, 189, 1036, 190, 1036, 190, 1035, 190, 1034, 190, 1033, 190, 1033, 190, 1032, 191, 1031, 191, 1030, 191, 1030, 191, 1029, 191, 1028, 191, 1027, 192, 1027, 192, 1026, 192, 1025, 192, 1024, 192, 1024, 192, 1023, 193, 1022, 193, 1021, 193, 1021, 193, 1020, 193, 1019, 193, 1018, 194, 1018, 194, 1017, 194, 1016, 194, 1015, 194, 1015, 195, 1014, 195, 1013, 195, 1012, 195, 1012, 195, 1011, 196, 1010, 196, 1009, 196, 1009, 196, 1008, 196, 1007, 196, 1006, 197, 1006, 197, 1005, 197, 1004, 197, 1003, 197, 1003, 198, 1002, 198, 1001, 198, 1000, 198, 999, 198, 999, 199, 998, 199, 997, 199, 996, 199, 996, 199, 995, 200, 994, 200, 993, 200, 993, 200, 992, 201, 991, 201, 990, 201, 989, 201, 989, 201, 988, 202, 987, 202, 986, 202, 986, 202, 985, 203, 984, 203, 983, 203, 982, 203, 982, 203, 981, 204, 980, 204, 979, 204, 978, 204, 978, 205, 977, 205, 976, 205, 975, 205, 974, 205, 974, 206, 973, 206, 972, 206, 971, 206, 970, 207, 970, 207, 969, 207, 968, 207, 967, 208, 966, 208, 965, 208, 965, 208, 964, 209, 963, 209, 962, 209, 961, 209, 960, 210, 960, 210, 959, 210, 958, 210, 957, 211, 956, 211, 955, 211, 954, 212, 954, 212, 953, 212, 952, 212, 951, 213, 950, 213, 949, 213, 948, 213, 947, 214, 946, 214, 946, 214, 945, 215, 944, 215, 943, 215, 942, 215, 941, 216, 940, 216, 939, 216, 938, 217, 937, 217, 937, 217, 936, 217, 935, 218, 934, 218, 933, 218, 932, 219, 931, 219, 930, 219, 929, 220, 928, 220, 927, 220, 926, 221, 925, 221, 924, 221, 923, 222, 922, 222, 921, 222, 920, 222, 919, 223, 918, 223, 917, 223, 916, 224, 915, 224, 914, 224, 913, 225, 912, 225, 911, 225, 910, 226, 909, 226, 908, 226, 907, 227, 906, 227, 905, 227, 904, 228, 903, 228, 902, 229, 901, 229, 900, 229, 899, 230, 898, 230, 897, 230, 895, 231, 894, 231, 893, 231, 892, 232, 891, 232, 890, 233, 889, 233, 888, 233, 887, 234, 886, 234, 884, 234, 883, 235, 882, 235, 881, 236, 880, 236, 879, 236, 877, 237, 876, 237, 875, 238, 874, 238, 873, 238, 872, 239, 870, 239, 869, 240, 868, 240, 867, 240, 866, 241, 864, 241, 863, 242, 862, 242, 861, 242, 859, 243, 858, 243, 857, 244, 856, 244, 854, 245, 853, 245, 852, 245, 851, 246, 849, 246, 848, 247, 847, 247, 845, 248, 844, 248, 843, 249, 841, 249, 840, 249, 839, 250, 837, 250, 836, 251, 835, 251, 833, 252, 832, 252, 831, 253, 829, 253, 828, 254, 827, 254, 825, 255, 824, 255, 822, 256, 821, 256], Source={ID=6, Name=Soybean}, Destination={ID=3, Name=Fallow}, ID=20, Name=Arc 15}
          {SourceID=3, DestinationID=6, Conditions=[[Manager].Script.CanSowSoybean, [Manager].Script.daysSinceLastHarvest_gt_60, [FarmMachinery].MachineryAvailable("220kW FWA", "Planter")], Actions=[[Manager].Script.SowCrop("Soybean");], BezierPoints=[820, 257, 821, 256, 822, 256, 824, 256, 825, 256, 827, 255, 828, 255, 829, 255, 831, 255, 832, 255, 833, 254, 835, 254, 836, 254, 837, 254, 839, 253, 840, 253, 841, 253, 843, 253, 844, 253, 845, 252, 847, 252, 848, 252, 849, 252, 851, 252, 852, 251, 853, 251, 854, 251, 856, 251, 857, 251, 858, 250, 859, 250, 861, 250, 862, 250, 863, 250, 864, 249, 866, 249, 867, 249, 868, 249, 869, 249, 870, 248, 872, 248, 873, 248, 874, 248, 875, 248, 876, 247, 877, 247, 879, 247, 880, 247, 881, 247, 882, 247, 883, 246, 884, 246, 886, 246, 887, 246, 888, 246, 889, 245, 890, 245, 891, 245, 892, 245, 893, 245, 894, 245, 895, 244, 897, 244, 898, 244, 899, 244, 900, 244, 901, 243, 902, 243, 903, 243, 904, 243, 905, 243, 906, 243, 907, 242, 908, 242, 909, 242, 910, 242, 911, 242, 912, 242, 913, 241, 914, 241, 915, 241, 916, 241, 917, 241, 918, 241, 919, 240, 920, 240, 921, 240, 922, 240, 923, 240, 924, 240, 925, 239, 926, 239, 927, 239, 928, 239, 929, 239, 930, 239, 931, 239, 932, 238, 933, 238, 934, 238, 935, 238, 936, 238, 937, 238, 937, 237, 938, 237, 939, 237, 940, 237, 941, 237, 942, 237, 943, 236, 944, 236, 945, 236, 946, 236, 946, 236, 947, 236, 948, 236, 949, 235, 950, 235, 951, 235, 952, 235, 953, 235, 954, 235, 954, 234, 955, 234, 956, 234, 957, 234, 958, 234, 959, 234, 960, 234, 960, 233, 961, 233, 962, 233, 963, 233, 964, 233, 965, 233, 965, 232, 966, 232, 967, 232, 968, 232, 969, 232, 970, 232, 970, 232, 971, 231, 972, 231, 973, 231, 974, 231, 974, 231, 975, 231, 976, 231, 977, 230, 978, 230, 978, 230, 979, 230, 980, 230, 981, 230, 982, 229, 982, 229, 983, 229, 984, 229, 985, 229, 986, 229, 986, 229, 987, 228, 988, 228, 989, 228, 989, 228, 990, 228, 991, 228, 992, 228, 993, 227, 993, 227, 994, 227, 995, 227, 996, 227, 996, 227, 997, 226, 998, 226, 999, 226, 999, 226, 1000, 226, 1001, 226, 1002, 226, 1003, 225, 1003, 225, 1004, 225, 1005, 225, 1006, 225, 1006, 225, 1007, 224, 1008, 224, 1009, 224, 1009, 224, 1010, 224, 1011, 224, 1012, 223, 1012, 223, 1013, 223, 1014, 223, 1015, 223, 1015, 223, 1016, 223, 1017, 222, 1018, 222, 1018, 222, 1019, 222, 1020, 222, 1021, 222, 1021, 221, 1022, 221, 1023, 221, 1024, 221, 1024, 221, 1025, 221, 1026, 220, 1027, 220, 1027, 220, 1028, 220, 1029, 220, 1030, 220, 1030, 219, 1031, 219, 1032, 219, 1033, 219, 1033, 219, 1034, 219, 1035, 218, 1036, 218, 1036, 218, 1037, 218, 1038, 218, 1039, 217, 1039, 217, 1040, 217, 1041, 217, 1042, 217, 1042, 217, 1043, 216, 1044, 216, 1045, 216, 1046, 216, 1046, 216, 1047, 216, 1048, 215, 1049, 215, 1049, 215, 1050, 215, 1051, 215, 1052, 214, 1052, 214, 1053, 214, 1054, 214, 1055, 214, 1056, 213, 1056, 213, 1057, 213, 1058, 213, 1059, 213, 1059, 212, 1060, 212, 1061, 212, 1062, 212, 1063, 212, 1063, 212, 1064, 211, 1065, 211, 1066, 211, 1067, 211, 1067, 211, 1068, 210, 1069, 210, 1070, 210, 1071, 210, 1071, 209, 1072, 209, 1073, 209, 1074, 209, 1075, 209, 1076, 208, 1076, 208, 1077, 208, 1078, 208, 1079, 208, 1080, 207, 1081, 207, 1081, 207, 1082, 207, 1083, 207, 1084, 206, 1085, 206, 1086, 206, 1087, 206, 1087, 205, 1088, 205, 1089, 205, 1090, 205, 1091, 204, 1092, 204, 1093, 204, 1093, 204, 1094, 204, 1095, 203, 1096, 203, 1097, 203, 1098, 203, 1099, 202, 1100, 202, 1101, 202, 1101, 202, 1102, 201, 1103, 201, 1104, 201, 1105, 201, 1106, 200, 1107, 200, 1108, 200, 1109, 200, 1110, 199, 1111, 199, 1112, 199, 1113, 199, 1114, 198, 1114, 198, 1115, 198, 1116, 198, 1117, 197, 1118, 197, 1119, 197, 1120, 197, 1121, 196, 1122, 196, 1123, 196, 1124, 195, 1125, 195, 1126, 195, 1127, 195, 1128, 194, 1129, 194, 1130, 194, 1131, 194, 1132, 193, 1133, 193, 1134, 193, 1135, 192, 1136, 192, 1137, 192, 1138, 192, 1139, 191, 1140, 191, 1142, 191, 1143, 190, 1144, 190, 1145, 190, 1146, 189, 1147, 189, 1148, 189, 1149, 189, 1150, 188, 1151, 188, 1152, 188, 1153, 187, 1155, 187, 1156, 187, 1157, 186, 1158, 186, 1159, 186, 1160, 185, 1161, 185, 1163, 185, 1164, 184, 1165, 184, 1166, 184, 1167, 184, 1168, 183, 1169, 183, 1171, 183, 1172, 182, 1173, 182, 1174, 182, 1175, 181, 1177, 181, 1178, 180, 1179, 180, 1180, 180, 1182, 179, 1183, 179, 1184, 179, 1185, 178, 1187, 178, 1188, 178, 1189, 177, 1190, 177, 1192, 177, 1193, 176, 1194, 176, 1195, 175, 1197, 175, 1198, 175, 1199, 174, 1201, 174, 1202, 174, 1203, 173, 1205, 173, 1206, 172, 1207, 172, 1209, 172, 1210, 171, 1211, 171, 1213, 171, 1214, 170, 1216, 170, 1217, 169, 1218, 169, 1220, 169, 1221, 168, 1223, 168, 1224, 167, 1225, 167, 1227, 167, 1228, 166, 1230, 166, 1231, 165, 1233, 165, 1234, 164, 1236, 164, 1237, 164, 1239, 163, 1240, 163, 1242, 162, 1243, 162, 1245, 161, 1246, 161, 1248, 161, 1249, 160, 1251, 160, 1252, 159, 1254, 159, 1255, 158, 1257, 158], Source={ID=3, Name=Fallow}, Destination={ID=6, Name=Soybean}, ID=21, Name=Arc 16}
          {SourceID=7, DestinationID=3, Conditions=[[Manager].Script.CanHarvestMungbean], Actions=[[Manager].Script.HarvestCrop("Mungbean");], BezierPoints=[522, 591, 523, 589, 524, 588, 525, 587, 527, 585, 528, 584, 529, 583, 530, 582, 532, 580, 533, 579, 534, 578, 535, 577, 537, 575, 538, 574, 539, 573, 540, 572, 541, 571, 542, 569, 544, 568, 545, 567, 546, 566, 547, 565, 548, 564, 549, 562, 551, 561, 552, 560, 553, 559, 554, 558, 555, 557, 556, 556, 557, 555, 558, 554, 559, 552, 560, 551, 561, 550, 562, 549, 564, 548, 565, 547, 566, 546, 567, 545, 568, 544, 569, 543, 570, 542, 571, 541, 572, 540, 573, 539, 574, 538, 575, 537, 576, 536, 577, 535, 578, 534, 579, 533, 580, 532, 581, 531, 581, 530, 582, 529, 583, 528, 584, 527, 585, 526, 586, 525, 587, 524, 588, 523, 589, 522, 590, 522, 591, 521, 592, 520, 592, 519, 593, 518, 594, 517, 595, 516, 596, 515, 597, 514, 598, 513, 599, 513, 599, 512, 600, 511, 601, 510, 602, 509, 603, 508, 604, 507, 604, 506, 605, 506, 606, 505, 607, 504, 608, 503, 609, 502, 609, 501, 610, 501, 611, 500, 612, 499, 613, 498, 613, 497, 614, 496, 615, 496, 616, 495, 617, 494, 617, 493, 618, 492, 619, 492, 620, 491, 620, 490, 621, 489, 622, 488, 623, 488, 623, 487, 624, 486, 625, 485, 626, 485, 626, 484, 627, 483, 628, 482, 629, 481, 629, 481, 630, 480, 631, 479, 631, 478, 632, 478, 633, 477, 634, 476, 634, 475, 635, 475, 636, 474, 636, 473, 637, 472, 638, 472, 639, 471, 639, 470, 640, 469, 641, 469, 641, 468, 642, 467, 643, 466, 643, 466, 644, 465, 645, 464, 645, 463, 646, 463, 647, 462, 648, 461, 648, 460, 649, 460, 650, 459, 650, 458, 651, 457, 652, 457, 652, 456, 653, 455, 654, 455, 654, 454, 655, 453, 656, 452, 656, 452, 657, 451, 658, 450, 658, 449, 659, 449, 660, 448, 660, 447, 661, 446, 662, 446, 662, 445, 663, 444, 664, 443, 664, 443, 665, 442, 666, 441, 666, 440, 667, 440, 668, 439, 668, 438, 669, 437, 670, 437, 670, 436, 671, 435, 672, 434, 672, 434, 673, 433, 674, 432, 674, 431, 675, 430, 676, 430, 677, 429, 677, 428, 678, 427, 679, 427, 679, 426, 680, 425, 681, 424, 681, 423, 682, 423, 683, 422, 683, 421, 684, 420, 685, 419, 685, 419, 686, 418, 687, 417, 688, 416, 688, 415, 689, 415, 690, 414, 690, 413, 691, 412, 692, 411, 693, 410, 693, 410, 694, 409, 695, 408, 695, 407, 696, 406, 697, 405, 698, 405, 698, 404, 699, 403, 700, 402, 701, 401, 701, 400, 702, 399, 703, 398, 704, 398, 704, 397, 705, 396, 706, 395, 707, 394, 707, 393, 708, 392, 709, 391, 710, 390, 710, 389, 711, 388, 712, 388, 713, 387, 714, 386, 714, 385, 715, 384, 716, 383, 717, 382, 718, 381, 718, 380, 719, 379, 720, 378, 721, 377, 722, 376, 722, 375, 723, 374, 724, 373, 725, 372, 726, 371, 727, 370, 728, 369, 728, 368, 729, 367, 730, 366, 731, 365, 732, 364, 733, 362, 734, 361, 735, 360, 735, 359, 736, 358, 737, 357, 738, 356, 739, 355, 740, 354, 741, 353, 742, 351, 743, 350, 744, 349, 745, 348, 746, 347, 747, 346, 748, 345, 749, 343, 750, 342, 750, 341, 751, 340, 752, 339, 753, 337, 754, 336, 755, 335, 756, 334, 757, 332, 759, 331, 760, 330, 761, 329, 762, 327, 763, 326, 764, 325, 765, 324, 766, 322, 767, 321, 768, 320, 769, 318, 770, 317, 771, 316, 772, 314, 773, 313, 775, 312, 776, 310, 777, 309, 778, 307, 779, 306, 780, 305, 781, 303, 783, 302, 784, 300, 785, 299, 786, 297, 787, 296, 788, 295, 790, 293, 791, 292, 792, 290, 793, 289, 795, 287, 796, 286, 797, 284, 798, 282, 800, 281, 801, 279, 802, 278, 803, 276, 805, 275, 806, 273, 807, 271, 809, 270, 810, 268, 811, 267, 813, 265, 814, 263, 815, 262, 817, 260, 818, 258], Source={ID=7, Name=Mungbean}, Destination={ID=3, Name=Fallow}, ID=22, Name=Arc 17}
          {SourceID=3, DestinationID=7, Conditions=[[Manager].Script.CanSowMungbean, [Manager].Script.daysSinceLastHarvest_gt_60, [FarmMachinery].MachineryAvailable("220kW FWA", "Planter")], Actions=[[Manager].Script.SowCrop("Mungbean");], BezierPoints=[820, 257, 818, 259, 817, 261, 815, 263, 814, 265, 813, 267, 811, 269, 810, 271, 809, 272, 807, 274, 806, 276, 805, 278, 803, 280, 802, 282, 801, 284, 800, 286, 798, 288, 797, 290, 796, 291, 795, 293, 793, 295, 792, 297, 791, 299, 790, 300, 788, 302, 787, 304, 786, 306, 785, 307, 784, 309, 783, 311, 781, 313, 780, 314, 779, 316, 778, 318, 777, 319, 776, 321, 775, 323, 773, 324, 772, 326, 771, 327, 770, 329, 769, 331, 768, 332, 767, 334, 766, 335, 765, 337, 764, 338, 763, 340, 762, 342, 761, 343, 760, 345, 759, 346, 757, 348, 756, 349, 755, 350, 754, 352, 753, 353, 752, 355, 751, 356, 750, 358, 750, 359, 749, 360, 748, 362, 747, 363, 746, 365, 745, 366, 744, 367, 743, 369, 742, 370, 741, 371, 740, 373, 739, 374, 738, 375, 737, 377, 736, 378, 735, 379, 735, 380, 734, 382, 733, 383, 732, 384, 731, 385, 730, 387, 729, 388, 728, 389, 728, 390, 727, 392, 726, 393, 725, 394, 724, 395, 723, 396, 722, 397, 722, 399, 721, 400, 720, 401, 719, 402, 718, 403, 718, 404, 717, 405, 716, 406, 715, 408, 714, 409, 714, 410, 713, 411, 712, 412, 711, 413, 710, 414, 710, 415, 709, 416, 708, 417, 707, 418, 707, 419, 706, 420, 705, 421, 704, 422, 704, 423, 703, 424, 702, 425, 701, 426, 701, 427, 700, 428, 699, 429, 698, 430, 698, 431, 697, 432, 696, 433, 695, 434, 695, 435, 694, 436, 693, 437, 693, 438, 692, 438, 691, 439, 690, 440, 690, 441, 689, 442, 688, 443, 688, 444, 687, 445, 686, 446, 685, 446, 685, 447, 684, 448, 683, 449, 683, 450, 682, 451, 681, 451, 681, 452, 680, 453, 679, 454, 679, 455, 678, 456, 677, 456, 677, 457, 676, 458, 675, 459, 674, 460, 674, 460, 673, 461, 672, 462, 672, 463, 671, 464, 670, 464, 670, 465, 669, 466, 668, 467, 668, 467, 667, 468, 666, 469, 666, 470, 665, 470, 664, 471, 664, 472, 663, 473, 662, 473, 662, 474, 661, 475, 660, 476, 660, 476, 659, 477, 658, 478, 658, 478, 657, 479, 656, 480, 656, 481, 655, 481, 654, 482, 654, 483, 653, 483, 652, 484, 652, 485, 651, 485, 650, 486, 650, 487, 649, 487, 648, 488, 648, 489, 647, 490, 646, 490, 645, 491, 645, 492, 644, 492, 643, 493, 643, 494, 642, 494, 641, 495, 641, 496, 640, 496, 639, 497, 639, 498, 638, 498, 637, 499, 636, 500, 636, 500, 635, 501, 634, 502, 634, 502, 633, 503, 632, 504, 631, 504, 631, 505, 630, 505, 629, 506, 629, 507, 628, 507, 627, 508, 626, 509, 626, 509, 625, 510, 624, 511, 623, 511, 623, 512, 622, 513, 621, 513, 620, 514, 620, 515, 619, 515, 618, 516, 617, 517, 617, 517, 616, 518, 615, 519, 614, 519, 613, 520, 613, 521, 612, 521, 611, 522, 610, 523, 609, 523, 609, 524, 608, 525, 607, 525, 606, 526, 605, 527, 604, 527, 604, 528, 603, 529, 602, 529, 601, 530, 600, 531, 599, 531, 599, 532, 598, 533, 597, 533, 596, 534, 595, 535, 594, 535, 593, 536, 592, 537, 592, 538, 591, 538, 590, 539, 589, 540, 588, 540, 587, 541, 586, 542, 585, 543, 584, 543, 583, 544, 582, 545, 581, 545, 581, 546, 580, 547, 579, 548, 578, 548, 577, 549, 576, 550, 575, 551, 574, 551, 573, 552, 572, 553, 571, 554, 570, 554, 569, 555, 568, 556, 567, 557, 566, 558, 565, 558, 564, 559, 562, 560, 561, 561, 560, 562, 559, 562, 558, 563, 557, 564, 556, 565, 555, 566, 554, 566, 553, 567, 552, 568, 551, 569, 549, 570, 548, 571, 547, 571, 546, 572, 545, 573, 544, 574, 542, 575, 541, 576, 540, 577, 539, 578, 538, 578, 537, 579, 535, 580, 534, 581, 533, 582, 532, 583, 530, 584, 529, 585, 528, 586, 527, 587, 525, 588, 524, 589, 523, 590], Source={ID=3, Name=Fallow}, Destination={ID=7, Name=Mungbean}, ID=23, Name=Arc 18}
          {SourceID=9, DestinationID=3, Conditions=[[Manager].Script.CanHarvestSpringSorghum], Actions=[[Manager].Script.HarvestCrop("SpringSorghum");], BezierPoints=[713, 28, 713, 29, 714, 31, 714, 33, 715, 35, 715, 36, 716, 38, 716, 40, 717, 41, 718, 43, 718, 45, 719, 46, 719, 48, 720, 50, 720, 51, 721, 53, 721, 54, 722, 56, 722, 57, 723, 59, 723, 61, 724, 62, 724, 64, 725, 65, 725, 66, 726, 68, 726, 69, 726, 71, 727, 72, 727, 74, 728, 75, 728, 76, 729, 78, 729, 79, 730, 80, 730, 82, 730, 83, 731, 84, 731, 86, 732, 87, 732, 88, 733, 89, 733, 91, 733, 92, 734, 93, 734, 94, 735, 96, 735, 97, 735, 98, 736, 99, 736, 100, 737, 101, 737, 103, 737, 104, 738, 105, 738, 106, 739, 107, 739, 108, 739, 109, 740, 110, 740, 111, 740, 112, 741, 113, 741, 115, 742, 116, 742, 117, 742, 118, 743, 119, 743, 120, 743, 121, 744, 122, 744, 123, 744, 124, 745, 124, 745, 125, 745, 126, 746, 127, 746, 128, 746, 129, 747, 130, 747, 131, 748, 132, 748, 133, 748, 134, 749, 135, 749, 135, 749, 136, 750, 137, 750, 138, 750, 139, 751, 140, 751, 141, 751, 141, 752, 142, 752, 143, 752, 144, 753, 145, 753, 146, 753, 146, 754, 147, 754, 148, 754, 149, 755, 150, 755, 150, 755, 151, 756, 152, 756, 153, 756, 154, 757, 154, 757, 155, 757, 156, 758, 157, 758, 157, 759, 158, 759, 159, 759, 160, 760, 160, 760, 161, 760, 162, 761, 163, 761, 163, 761, 164, 762, 165, 762, 166, 762, 166, 763, 167, 763, 168, 764, 168, 764, 169, 764, 170, 765, 171, 765, 171, 765, 172, 766, 173, 766, 174, 767, 174, 767, 175, 767, 176, 768, 176, 768, 177, 769, 178, 769, 179, 769, 179, 770, 180, 770, 181, 771, 182, 771, 182, 771, 183, 772, 184, 772, 184, 773, 185, 773, 186, 774, 187, 774, 187, 774, 188, 775, 189, 775, 190, 776, 190, 776, 191, 777, 192, 777, 193, 778, 193, 778, 194, 779, 195, 779, 196, 779, 196, 780, 197, 780, 198, 781, 199, 781, 200, 782, 200, 782, 201, 783, 202, 783, 203, 784, 204, 784, 204, 785, 205, 785, 206, 786, 207, 787, 208, 787, 208, 788, 209, 788, 210, 789, 211, 789, 212, 790, 213, 790, 214, 791, 214, 792, 215, 792, 216, 793, 217, 793, 218, 794, 219, 795, 220, 795, 221, 796, 222, 796, 223, 797, 224, 798, 224, 798, 225, 799, 226, 800, 227, 800, 228, 801, 229, 802, 230, 802, 231, 803, 232, 804, 233, 804, 234, 805, 235, 806, 236, 806, 237, 807, 238, 808, 239, 809, 241, 809, 242, 810, 243, 811, 244, 812, 245, 812, 246, 813, 247, 814, 248, 815, 249, 815, 251, 816, 252, 817, 253, 818, 254, 819, 255], Source={ID=9, Name=SpringSorghum}, Destination={ID=3, Name=Fallow}, ID=24, Name=Arc 1}
          {SourceID=8, DestinationID=3, Conditions=[[Manager].Script.CanHarvestLateSorghum], Actions=[[Manager].Script.HarvestCrop("LateSorghum");], BezierPoints=[873, 31, 872, 32, 872, 34, 871, 36, 871, 37, 870, 39, 870, 41, 869, 42, 869, 44, 868, 45, 868, 47, 868, 49, 867, 50, 867, 52, 866, 53, 866, 55, 866, 56, 865, 58, 865, 59, 864, 61, 864, 62, 864, 64, 863, 65, 863, 67, 862, 68, 862, 69, 862, 71, 861, 72, 861, 73, 861, 75, 860, 76, 860, 77, 860, 79, 859, 80, 859, 81, 859, 83, 858, 84, 858, 85, 858, 86, 857, 88, 857, 89, 857, 90, 856, 91, 856, 92, 856, 94, 855, 95, 855, 96, 855, 97, 854, 98, 854, 99, 854, 100, 853, 101, 853, 103, 853, 104, 853, 105, 852, 106, 852, 107, 852, 108, 852, 109, 851, 110, 851, 111, 851, 112, 850, 113, 850, 114, 850, 115, 850, 116, 849, 117, 849, 118, 849, 119, 849, 120, 848, 121, 848, 122, 848, 123, 848, 124, 847, 125, 847, 126, 847, 126, 847, 127, 847, 128, 846, 129, 846, 130, 846, 131, 846, 132, 845, 133, 845, 134, 845, 134, 845, 135, 845, 136, 844, 137, 844, 138, 844, 139, 844, 139, 843, 140, 843, 141, 843, 142, 843, 143, 843, 143, 843, 144, 842, 145, 842, 146, 842, 147, 842, 147, 842, 148, 841, 149, 841, 150, 841, 151, 841, 151, 841, 152, 840, 153, 840, 154, 840, 154, 840, 155, 840, 156, 840, 157, 839, 157, 839, 158, 839, 159, 839, 160, 839, 160, 838, 161, 838, 162, 838, 163, 838, 163, 838, 164, 838, 165, 837, 166, 837, 166, 837, 167, 837, 168, 837, 168, 837, 169, 836, 170, 836, 171, 836, 171, 836, 172, 836, 173, 836, 174, 836, 174, 835, 175, 835, 176, 835, 177, 835, 177, 835, 178, 835, 179, 834, 180, 834, 180, 834, 181, 834, 182, 834, 183, 834, 183, 833, 184, 833, 185, 833, 186, 833, 186, 833, 187, 833, 188, 833, 189, 832, 190, 832, 190, 832, 191, 832, 192, 832, 193, 832, 193, 831, 194, 831, 195, 831, 196, 831, 197, 831, 198, 831, 198, 830, 199, 830, 200, 830, 201, 830, 202, 830, 203, 830, 203, 829, 204, 829, 205, 829, 206, 829, 207, 829, 208, 829, 209, 828, 210, 828, 210, 828, 211, 828, 212, 828, 213, 828, 214, 827, 215, 827, 216, 827, 217, 827, 218, 827, 219, 826, 220, 826, 221, 826, 222, 826, 223, 826, 224, 825, 225, 825, 226, 825, 227, 825, 228, 825, 229, 825, 230, 824, 231, 824, 232, 824, 233, 824, 234, 824, 235, 823, 236, 823, 237, 823, 239, 823, 240, 822, 241, 822, 242, 822, 243, 822, 244, 822, 245, 821, 247, 821, 248, 821, 249, 821, 250, 820, 251, 820, 253, 820, 254, 820, 255], Source={ID=8, Name=LateSorghum}, Destination={ID=3, Name=Fallow}, ID=25, Name=Arc 2}
          {SourceID=10, DestinationID=3, Conditions=[[Manager].Script.CanHarvestEarlySorghum], Actions=[[Manager].Script.HarvestCrop("EarlySorghum");], BezierPoints=[427, 170, 428, 170, 429, 170, 431, 171, 432, 171, 434, 172, 435, 172, 436, 173, 438, 173, 439, 173, 441, 174, 442, 174, 443, 175, 445, 175, 446, 175, 447, 176, 449, 176, 450, 177, 452, 177, 453, 178, 454, 178, 455, 178, 457, 179, 458, 179, 459, 180, 461, 180, 462, 180, 463, 181, 464, 181, 466, 181, 467, 182, 468, 182, 469, 183, 471, 183, 472, 183, 473, 184, 474, 184, 476, 184, 477, 185, 478, 185, 479, 186, 480, 186, 482, 186, 483, 187, 484, 187, 485, 187, 486, 188, 487, 188, 488, 188, 490, 189, 491, 189, 492, 189, 493, 190, 494, 190, 495, 190, 496, 191, 497, 191, 499, 191, 500, 192, 501, 192, 502, 192, 503, 193, 504, 193, 505, 193, 506, 194, 507, 194, 508, 194, 509, 195, 510, 195, 511, 195, 512, 196, 513, 196, 514, 196, 515, 196, 516, 197, 517, 197, 518, 197, 519, 198, 520, 198, 521, 198, 522, 199, 523, 199, 524, 199, 525, 199, 526, 200, 527, 200, 528, 200, 529, 200, 530, 201, 531, 201, 532, 201, 533, 202, 534, 202, 535, 202, 536, 202, 537, 203, 538, 203, 539, 203, 540, 203, 540, 204, 541, 204, 542, 204, 543, 205, 544, 205, 545, 205, 546, 205, 547, 206, 548, 206, 548, 206, 549, 206, 550, 207, 551, 207, 552, 207, 553, 207, 554, 208, 555, 208, 555, 208, 556, 208, 557, 208, 558, 209, 559, 209, 560, 209, 561, 209, 561, 210, 562, 210, 563, 210, 564, 210, 565, 211, 566, 211, 566, 211, 567, 211, 568, 211, 569, 212, 570, 212, 570, 212, 571, 212, 572, 213, 573, 213, 574, 213, 574, 213, 575, 213, 576, 214, 577, 214, 578, 214, 578, 214, 579, 214, 580, 215, 581, 215, 582, 215, 582, 215, 583, 215, 584, 216, 585, 216, 586, 216, 586, 216, 587, 216, 588, 217, 589, 217, 589, 217, 590, 217, 591, 217, 592, 218, 592, 218, 593, 218, 594, 218, 595, 218, 596, 219, 596, 219, 597, 219, 598, 219, 599, 219, 599, 220, 600, 220, 601, 220, 602, 220, 602, 220, 603, 220, 604, 221, 605, 221, 605, 221, 606, 221, 607, 221, 608, 221, 608, 222, 609, 222, 610, 222, 611, 222, 611, 222, 612, 223, 613, 223, 614, 223, 614, 223, 615, 223, 616, 223, 617, 224, 617, 224, 618, 224, 619, 224, 620, 224, 620, 224, 621, 225, 622, 225, 623, 225, 623, 225, 624, 225, 625, 225, 626, 226, 626, 226, 627, 226, 628, 226, 629, 226, 629, 226, 630, 226, 631, 227, 632, 227, 633, 227, 633, 227, 634, 227, 635, 227, 636, 228, 636, 228, 637, 228, 638, 228, 639, 228, 639, 228, 640, 228, 641, 229, 642, 229, 643, 229, 643, 229, 644, 229, 645, 229, 646, 230, 646, 230, 647, 230, 648, 230, 649, 230, 650, 230, 650, 230, 651, 231, 652, 231, 653, 231, 654, 231, 654, 231, 655, 231, 656, 232, 657, 232, 658, 232, 658, 232, 659, 232, 660, 232, 661, 232, 662, 233, 663, 233, 663, 233, 664, 233, 665, 233, 666, 233, 667, 233, 668, 234, 668, 234, 669, 234, 670, 234, 671, 234, 672, 234, 673, 234, 674, 235, 674, 235, 675, 235, 676, 235, 677, 235, 678, 235, 679, 236, 680, 236, 681, 236, 682, 236, 682, 236, 683, 236, 684, 236, 685, 237, 686, 237, 687, 237, 688, 237, 689, 237, 690, 237, 691, 237, 692, 238, 693, 238, 693, 238, 694, 238, 695, 238, 696, 238, 697, 239, 698, 239, 699, 239, 700, 239, 701, 239, 702, 239, 703, 239, 704, 240, 705, 240, 706, 240, 707, 240, 708, 240, 709, 240, 710, 241, 711, 241, 712, 241, 713, 241, 714, 241, 715, 241, 716, 241, 717, 242, 718, 242, 719, 242, 720, 242, 721, 242, 723, 242, 724, 243, 725, 243, 726, 243, 727, 243, 728, 243, 729, 243, 730, 244, 731, 244, 732, 244, 733, 244, 735, 244, 736, 244, 737, 245, 738, 245, 739, 245, 740, 245, 741, 245, 743, 245, 744, 246, 745, 246, 746, 246, 747, 246, 749, 246, 750, 246, 751, 247, 752, 247, 753, 247, 755, 247, 756, 247, 757, 248, 758, 248, 760, 248, 761, 248, 762, 248, 763, 248, 765, 249, 766, 249, 767, 249, 768, 249, 770, 249, 771, 250, 772, 250, 774, 250, 775, 250, 776, 250, 778, 251, 779, 251, 780, 251, 782, 251, 783, 251, 784, 251, 786, 252, 787, 252, 789, 252, 790, 252, 791, 252, 793, 253, 794, 253, 796, 253, 797, 253, 799, 253, 800, 254, 801, 254, 803, 254, 804, 254, 806, 255, 807, 255, 809, 255, 810, 255, 812, 255, 813, 256, 815, 256, 816, 256, 818, 256], Source={ID=10, Name=EarlySorghum}, Destination={ID=3, Name=Fallow}, ID=26, Name=Arc 3}
          {SourceID=3, DestinationID=9, Conditions=[[Manager].Script.CanSowSpringSorghum, [Manager].Script.daysSinceLastHarvest_gt_60, [FarmMachinery].MachineryAvailable("220kW FWA", "Planter")], Actions=[[Manager].Script.SowCrop("SpringSorghum");], BezierPoints=[820, 257, 819, 255, 818, 253, 817, 252, 816, 250, 815, 248, 815, 247, 814, 245, 813, 243, 812, 242, 812, 240, 811, 239, 810, 237, 809, 236, 809, 234, 808, 233, 807, 231, 806, 230, 806, 228, 805, 227, 804, 226, 804, 224, 803, 223, 802, 221, 802, 220, 801, 219, 800, 217, 800, 216, 799, 215, 798, 213, 798, 212, 797, 211, 796, 210, 796, 208, 795, 207, 795, 206, 794, 205, 793, 203, 793, 202, 792, 201, 792, 200, 791, 199, 790, 197, 790, 196, 789, 195, 789, 194, 788, 193, 788, 192, 787, 191, 787, 189, 786, 188, 785, 187, 785, 186, 784, 185, 784, 184, 783, 183, 783, 182, 782, 181, 782, 180, 781, 179, 781, 178, 780, 177, 780, 176, 779, 175, 779, 174, 779, 173, 778, 172, 778, 171, 777, 170, 777, 169, 776, 168, 776, 167, 775, 166, 775, 165, 774, 164, 774, 164, 774, 163, 773, 162, 773, 161, 772, 160, 772, 159, 771, 158, 771, 157, 771, 157, 770, 156, 770, 155, 769, 154, 769, 153, 769, 152, 768, 151, 768, 151, 767, 150, 767, 149, 767, 148, 766, 147, 766, 147, 765, 146, 765, 145, 765, 144, 764, 143, 764, 143, 764, 142, 763, 141, 763, 140, 762, 140, 762, 139, 762, 138, 761, 137, 761, 136, 761, 136, 760, 135, 760, 134, 760, 133, 759, 133, 759, 132, 759, 131, 758, 130, 758, 130, 757, 129, 757, 128, 757, 127, 756, 127, 756, 126, 756, 125, 755, 124, 755, 124, 755, 123, 754, 122, 754, 121, 754, 121, 753, 120, 753, 119, 753, 118, 752, 118, 752, 117, 752, 116, 751, 115, 751, 115, 751, 114, 750, 113, 750, 112, 750, 112, 749, 111, 749, 110, 749, 109, 748, 109, 748, 108, 748, 107, 747, 106, 747, 106, 746, 105, 746, 104, 746, 103, 745, 103, 745, 102, 745, 101, 744, 100, 744, 99, 744, 99, 743, 98, 743, 97, 743, 96, 742, 95, 742, 95, 742, 94, 741, 93, 741, 92, 740, 91, 740, 90, 740, 90, 739, 89, 739, 88, 739, 87, 738, 86, 738, 85, 737, 84, 737, 84, 737, 83, 736, 82, 736, 81, 735, 80, 735, 79, 735, 78, 734, 77, 734, 76, 733, 75, 733, 74, 733, 74, 732, 73, 732, 72, 731, 71, 731, 70, 730, 69, 730, 68, 730, 67, 729, 66, 729, 65, 728, 64, 728, 63, 727, 62, 727, 61, 726, 60, 726, 58, 726, 57, 725, 56, 725, 55, 724, 54, 724, 53, 723, 52, 723, 51, 722, 50, 722, 49, 721, 47, 721, 46, 720, 45, 720, 44, 719, 43, 719, 41, 718, 40, 718, 39, 717, 38, 716, 37, 716, 35, 715, 34, 715, 33, 714, 31, 714, 30, 713, 29], Source={ID=3, Name=Fallow}, Destination={ID=9, Name=SpringSorghum}, ID=27, Name=Arc 4}
          {SourceID=3, DestinationID=8, Conditions=[[Manager].Script.CanSowLateSorghum, [Manager].Script.daysSinceLastHarvest_gt_60, [FarmMachinery].MachineryAvailable("220kW FWA", "Planter")], Actions=[[Manager].Script.SowCrop("LateSorghum");], BezierPoints=[820, 257, 820, 255, 820, 253, 820, 251, 820, 250, 821, 248, 821, 246, 821, 245, 821, 243, 822, 242, 822, 240, 822, 238, 822, 237, 822, 235, 823, 234, 823, 232, 823, 231, 823, 229, 824, 228, 824, 226, 824, 225, 824, 223, 824, 222, 825, 220, 825, 219, 825, 218, 825, 216, 825, 215, 825, 214, 826, 212, 826, 211, 826, 210, 826, 208, 826, 207, 827, 206, 827, 204, 827, 203, 827, 202, 827, 201, 828, 199, 828, 198, 828, 197, 828, 196, 828, 195, 828, 193, 829, 192, 829, 191, 829, 190, 829, 189, 829, 188, 829, 187, 830, 186, 830, 184, 830, 183, 830, 182, 830, 181, 830, 180, 831, 179, 831, 178, 831, 177, 831, 176, 831, 175, 831, 174, 832, 173, 832, 172, 832, 171, 832, 170, 832, 169, 832, 168, 833, 167, 833, 166, 833, 165, 833, 164, 833, 163, 833, 162, 833, 161, 834, 161, 834, 160, 834, 159, 834, 158, 834, 157, 834, 156, 835, 155, 835, 154, 835, 153, 835, 153, 835, 152, 835, 151, 836, 150, 836, 149, 836, 148, 836, 148, 836, 147, 836, 146, 836, 145, 837, 144, 837, 144, 837, 143, 837, 142, 837, 141, 837, 140, 838, 140, 838, 139, 838, 138, 838, 137, 838, 136, 838, 136, 839, 135, 839, 134, 839, 133, 839, 133, 839, 132, 840, 131, 840, 130, 840, 130, 840, 129, 840, 128, 840, 127, 841, 127, 841, 126, 841, 125, 841, 124, 841, 124, 842, 123, 842, 122, 842, 121, 842, 121, 842, 120, 843, 119, 843, 119, 843, 118, 843, 117, 843, 116, 843, 116, 844, 115, 844, 114, 844, 113, 844, 113, 845, 112, 845, 111, 845, 110, 845, 110, 845, 109, 846, 108, 846, 107, 846, 107, 846, 106, 847, 105, 847, 104, 847, 104, 847, 103, 847, 102, 848, 101, 848, 101, 848, 100, 848, 99, 849, 98, 849, 97, 849, 97, 849, 96, 850, 95, 850, 94, 850, 94, 850, 93, 851, 92, 851, 91, 851, 90, 852, 89, 852, 89, 852, 88, 852, 87, 853, 86, 853, 85, 853, 84, 853, 84, 854, 83, 854, 82, 854, 81, 855, 80, 855, 79, 855, 78, 856, 77, 856, 77, 856, 76, 857, 75, 857, 74, 857, 73, 858, 72, 858, 71, 858, 70, 859, 69, 859, 68, 859, 67, 860, 66, 860, 65, 860, 64, 861, 63, 861, 62, 861, 61, 862, 60, 862, 59, 862, 58, 863, 57, 863, 56, 864, 55, 864, 54, 864, 53, 865, 52, 865, 51, 866, 50, 866, 48, 866, 47, 867, 46, 867, 45, 868, 44, 868, 43, 868, 42, 869, 40, 869, 39, 870, 38, 870, 37, 871, 36, 871, 34, 872, 33, 872, 32], Source={ID=3, Name=Fallow}, Destination={ID=8, Name=LateSorghum}, ID=28, Name=Arc 7}
          {SourceID=3, DestinationID=10, Conditions=[[Manager].Script.CanSowEarlySorghum, [Manager].Script.daysSinceLastHarvest_gt_60, [FarmMachinery].MachineryAvailable("220kW FWA", "Planter")], Actions=[[Manager].Script.SowCrop("EarlySorghum");], BezierPoints=[820, 257, 818, 256, 816, 255, 815, 255, 813, 254, 812, 254, 810, 253, 809, 253, 807, 252, 806, 252, 804, 251, 803, 251, 801, 250, 800, 249, 799, 249, 797, 248, 796, 248, 794, 247, 793, 247, 791, 246, 790, 246, 789, 245, 787, 245, 786, 244, 784, 244, 783, 243, 782, 243, 780, 242, 779, 242, 778, 241, 776, 241, 775, 241, 774, 240, 772, 240, 771, 239, 770, 239, 768, 238, 767, 238, 766, 237, 765, 237, 763, 236, 762, 236, 761, 235, 760, 235, 758, 235, 757, 234, 756, 234, 755, 233, 753, 233, 752, 232, 751, 232, 750, 232, 749, 231, 747, 231, 746, 230, 745, 230, 744, 229, 743, 229, 741, 229, 740, 228, 739, 228, 738, 227, 737, 227, 736, 227, 735, 226, 733, 226, 732, 225, 731, 225, 730, 225, 729, 224, 728, 224, 727, 224, 726, 223, 725, 223, 724, 222, 723, 222, 721, 222, 720, 221, 719, 221, 718, 221, 717, 220, 716, 220, 715, 219, 714, 219, 713, 219, 712, 218, 711, 218, 710, 218, 709, 217, 708, 217, 707, 217, 706, 216, 705, 216, 704, 216, 703, 215, 702, 215, 701, 215, 700, 214, 699, 214, 698, 214, 697, 213, 696, 213, 695, 213, 694, 212, 693, 212, 693, 212, 692, 212, 691, 211, 690, 211, 689, 211, 688, 210, 687, 210, 686, 210, 685, 209, 684, 209, 683, 209, 682, 209, 682, 208, 681, 208, 680, 208, 679, 207, 678, 207, 677, 207, 676, 207, 675, 206, 674, 206, 674, 206, 673, 206, 672, 205, 671, 205, 670, 205, 669, 205, 668, 204, 668, 204, 667, 204, 666, 203, 665, 203, 664, 203, 663, 203, 663, 203, 662, 202, 661, 202, 660, 202, 659, 202, 658, 201, 658, 201, 657, 201, 656, 201, 655, 200, 654, 200, 654, 200, 653, 200, 652, 199, 651, 199, 650, 199, 650, 199, 649, 199, 648, 198, 647, 198, 646, 198, 646, 198, 645, 197, 644, 197, 643, 197, 643, 197, 642, 197, 641, 196, 640, 196, 639, 196, 639, 196, 638, 196, 637, 195, 636, 195, 636, 195, 635, 195, 634, 195, 633, 194, 633, 194, 632, 194, 631, 194, 630, 194, 629, 194, 629, 193, 628, 193, 627, 193, 626, 193, 626, 193, 625, 192, 624, 192, 623, 192, 623, 192, 622, 192, 621, 192, 620, 191, 620, 191, 619, 191, 618, 191, 617, 191, 617, 191, 616, 190, 615, 190, 614, 190, 614, 190, 613, 190, 612, 190, 611, 189, 611, 189, 610, 189, 609, 189, 608, 189, 608, 189, 607, 189, 606, 188, 605, 188, 605, 188, 604, 188, 603, 188, 602, 188, 602, 187, 601, 187, 600, 187, 599, 187, 599, 187, 598, 187, 597, 187, 596, 186, 596, 186, 595, 186, 594, 186, 593, 186, 592, 186, 592, 186, 591, 186, 590, 185, 589, 185, 589, 185, 588, 185, 587, 185, 586, 185, 586, 185, 585, 185, 584, 184, 583, 184, 582, 184, 582, 184, 581, 184, 580, 184, 579, 184, 578, 184, 578, 183, 577, 183, 576, 183, 575, 183, 574, 183, 574, 183, 573, 183, 572, 183, 571, 183, 570, 182, 570, 182, 569, 182, 568, 182, 567, 182, 566, 182, 566, 182, 565, 182, 564, 182, 563, 181, 562, 181, 561, 181, 561, 181, 560, 181, 559, 181, 558, 181, 557, 181, 556, 181, 555, 181, 555, 180, 554, 180, 553, 180, 552, 180, 551, 180, 550, 180, 549, 180, 548, 180, 548, 180, 547, 180, 546, 179, 545, 179, 544, 179, 543, 179, 542, 179, 541, 179, 540, 179, 540, 179, 539, 179, 538, 179, 537, 178, 536, 178, 535, 178, 534, 178, 533, 178, 532, 178, 531, 178, 530, 178, 529, 178, 528, 178, 527, 178, 526, 177, 525, 177, 524, 177, 523, 177, 522, 177, 521, 177, 520, 177, 519, 177, 518, 177, 517, 177, 516, 177, 515, 176, 514, 176, 513, 176, 512, 176, 511, 176, 510, 176, 509, 176, 508, 176, 507, 176, 506, 176, 505, 176, 504, 175, 503, 175, 502, 175, 501, 175, 500, 175, 499, 175, 497, 175, 496, 175, 495, 175, 494, 175, 493, 175, 492, 174, 491, 174, 490, 174, 488, 174, 487, 174, 486, 174, 485, 174, 484, 174, 483, 174, 482, 174, 480, 174, 479, 173, 478, 173, 477, 173, 476, 173, 474, 173, 473, 173, 472, 173, 471, 173, 469, 173, 468, 173, 467, 173, 466, 172, 464, 172, 463, 172, 462, 172, 461, 172, 459, 172, 458, 172, 457, 172, 455, 172, 454, 172, 453, 171, 452, 171, 450, 171, 449, 171, 447, 171, 446, 171, 445, 171, 443, 171, 442, 171, 441, 171, 439, 170, 438, 170, 436, 170, 435, 170, 434, 170, 432, 170, 431, 170, 429, 170, 428, 170], Source={ID=3, Name=Fallow}, Destination={ID=10, Name=EarlySorghum}, ID=29, Name=Arc 8}
          {SourceID=11, DestinationID=3, Conditions=[[Manager].Script.CanHarvestCovercrop], Actions=[[Manager].Script.HarvestCrop("Covercrop");], BezierPoints=[384, 453, 385, 452, 386, 451, 388, 450, 389, 449, 391, 448, 392, 448, 394, 447, 395, 446, 397, 445, 398, 444, 399, 443, 401, 443, 402, 442, 404, 441, 405, 440, 406, 440, 408, 439, 409, 438, 411, 437, 412, 436, 413, 436, 415, 435, 416, 434, 417, 433, 419, 433, 420, 432, 421, 431, 423, 430, 424, 430, 425, 429, 427, 428, 428, 427, 429, 427, 430, 426, 432, 425, 433, 425, 434, 424, 435, 423, 437, 422, 438, 422, 439, 421, 440, 420, 442, 420, 443, 419, 444, 418, 445, 418, 446, 417, 448, 416, 449, 416, 450, 415, 451, 414, 452, 414, 454, 413, 455, 412, 456, 412, 457, 411, 458, 410, 459, 410, 461, 409, 462, 408, 463, 408, 464, 407, 465, 407, 466, 406, 467, 405, 468, 405, 470, 404, 471, 403, 472, 403, 473, 402, 474, 402, 475, 401, 476, 400, 477, 400, 478, 399, 479, 399, 480, 398, 481, 398, 482, 397, 483, 396, 485, 396, 486, 395, 487, 395, 488, 394, 489, 393, 490, 393, 491, 392, 492, 392, 493, 391, 494, 391, 495, 390, 496, 390, 497, 389, 498, 389, 499, 388, 500, 387, 501, 387, 502, 386, 503, 386, 504, 385, 504, 385, 505, 384, 506, 384, 507, 383, 508, 383, 509, 382, 510, 382, 511, 381, 512, 381, 513, 380, 514, 380, 515, 379, 516, 379, 517, 378, 518, 378, 518, 377, 519, 377, 520, 376, 521, 376, 522, 375, 523, 375, 524, 374, 525, 374, 526, 373, 527, 373, 527, 372, 528, 372, 529, 371, 530, 371, 531, 371, 532, 370, 533, 370, 534, 369, 534, 369, 535, 368, 536, 368, 537, 367, 538, 367, 539, 367, 539, 366, 540, 366, 541, 365, 542, 365, 543, 364, 544, 364, 544, 363, 545, 363, 546, 363, 547, 362, 548, 362, 549, 361, 549, 361, 550, 361, 551, 360, 552, 360, 553, 359, 553, 359, 554, 358, 555, 358, 556, 358, 557, 357, 557, 357, 558, 356, 559, 356, 560, 356, 561, 355, 561, 355, 562, 354, 563, 354, 564, 354, 565, 353, 565, 353, 566, 353, 567, 352, 568, 352, 568, 351, 569, 351, 570, 351, 571, 350, 572, 350, 572, 349, 573, 349, 574, 349, 575, 348, 575, 348, 576, 348, 577, 347, 578, 347, 578, 346, 579, 346, 580, 346, 581, 345, 582, 345, 582, 345, 583, 344, 584, 344, 585, 344, 585, 343, 586, 343, 587, 343, 588, 342, 588, 342, 589, 341, 590, 341, 591, 341, 591, 340, 592, 340, 593, 340, 594, 339, 594, 339, 595, 339, 596, 338, 597, 338, 597, 338, 598, 337, 599, 337, 600, 337, 600, 336, 601, 336, 602, 336, 603, 335, 603, 335, 604, 335, 605, 334, 606, 334, 606, 334, 607, 333, 608, 333, 609, 333, 609, 332, 610, 332, 611, 332, 612, 331, 612, 331, 613, 331, 614, 330, 615, 330, 615, 330, 616, 329, 617, 329, 618, 329, 619, 328, 619, 328, 620, 328, 621, 327, 622, 327, 622, 327, 623, 326, 624, 326, 625, 326, 625, 326, 626, 325, 627, 325, 628, 325, 629, 324, 629, 324, 630, 324, 631, 323, 632, 323, 632, 323, 633, 322, 634, 322, 635, 322, 636, 321, 636, 321, 637, 321, 638, 320, 639, 320, 640, 320, 640, 319, 641, 319, 642, 319, 643, 319, 644, 318, 644, 318, 645, 318, 646, 317, 647, 317, 648, 317, 648, 316, 649, 316, 650, 316, 651, 315, 652, 315, 653, 315, 653, 314, 654, 314, 655, 314, 656, 313, 657, 313, 658, 313, 658, 312, 659, 312, 660, 312, 661, 311, 662, 311, 663, 311, 663, 311, 664, 310, 665, 310, 666, 310, 667, 309, 668, 309, 669, 309, 670, 308, 670, 308, 671, 308, 672, 307, 673, 307, 674, 307, 675, 306, 676, 306, 677, 306, 678, 305, 679, 305, 679, 305, 680, 304, 681, 304, 682, 304, 683, 303, 684, 303, 685, 303, 686, 302, 687, 302, 688, 302, 689, 301, 690, 301, 691, 301, 692, 300, 693, 300, 693, 300, 694, 299, 695, 299, 696, 299, 697, 298, 698, 298, 699, 297, 700, 297, 701, 297, 702, 296, 703, 296, 704, 296, 705, 295, 706, 295, 707, 295, 708, 294, 709, 294, 710, 294, 711, 293, 712, 293, 714, 293, 715, 292, 716, 292, 717, 291, 718, 291, 719, 291, 720, 290, 721, 290, 722, 290, 723, 289, 724, 289, 725, 288, 726, 288, 727, 288, 729, 287, 730, 287, 731, 287, 732, 286, 733, 286, 734, 285, 735, 285, 736, 285, 738, 284, 739, 284, 740, 283, 741, 283, 742, 283, 743, 282, 745, 282, 746, 281, 747, 281, 748, 281, 749, 280, 750, 280, 752, 279, 753, 279, 754, 279, 755, 278, 757, 278, 758, 277, 759, 277, 760, 276, 762, 276, 763, 276, 764, 275, 765, 275, 767, 274, 768, 274, 769, 273, 770, 273, 772, 273, 773, 272, 774, 272, 776, 271, 777, 271, 778, 270, 780, 270, 781, 269, 782, 269, 784, 269, 785, 268, 786, 268, 788, 267, 789, 267, 791, 266, 792, 266, 793, 265, 795, 265, 796, 264, 798, 264, 799, 263, 800, 263, 802, 262, 803, 262, 805, 261, 806, 261, 808, 261, 809, 260, 811, 260, 812, 259, 813, 259, 815, 258, 816, 258, 818, 257], Source={ID=11, Name=Covercrop}, Destination={ID=3, Name=Fallow}, ID=30, Name=Arc 19}
          {SourceID=3, DestinationID=11, Conditions=[[Manager].Script.CanSowCovercrop, [FarmMachinery].MachineryAvailable("220kW FWA", "Planter")], Actions=[[Manager].Script.SowCrop("Covercrop");], BezierPoints=[820, 257, 818, 257, 816, 258, 815, 259, 813, 260, 812, 260, 811, 261, 809, 262, 808, 263, 806, 264, 805, 264, 803, 265, 802, 266, 800, 267, 799, 267, 798, 268, 796, 269, 795, 270, 793, 270, 792, 271, 791, 272, 789, 273, 788, 273, 786, 274, 785, 275, 784, 276, 782, 276, 781, 277, 780, 278, 778, 278, 777, 279, 776, 280, 774, 280, 773, 281, 772, 282, 770, 283, 769, 283, 768, 284, 767, 285, 765, 285, 764, 286, 763, 287, 762, 287, 760, 288, 759, 289, 758, 289, 757, 290, 755, 291, 754, 291, 753, 292, 752, 293, 750, 293, 749, 294, 748, 294, 747, 295, 746, 296, 745, 296, 743, 297, 742, 298, 741, 298, 740, 299, 739, 299, 738, 300, 736, 301, 735, 301, 734, 302, 733, 302, 732, 303, 731, 304, 730, 304, 729, 305, 727, 305, 726, 306, 725, 306, 724, 307, 723, 308, 722, 308, 721, 309, 720, 309, 719, 310, 718, 310, 717, 311, 716, 312, 715, 312, 714, 313, 712, 313, 711, 314, 710, 314, 709, 315, 708, 315, 707, 316, 706, 316, 705, 317, 704, 317, 703, 318, 702, 318, 701, 319, 700, 319, 699, 320, 698, 321, 697, 321, 696, 322, 695, 322, 694, 323, 693, 323, 693, 324, 692, 324, 691, 325, 690, 325, 689, 325, 688, 326, 687, 326, 686, 327, 685, 327, 684, 328, 683, 328, 682, 329, 681, 329, 680, 330, 679, 330, 679, 331, 678, 331, 677, 332, 676, 332, 675, 333, 674, 333, 673, 333, 672, 334, 671, 334, 670, 335, 670, 335, 669, 336, 668, 336, 667, 337, 666, 337, 665, 337, 664, 338, 663, 338, 663, 339, 662, 339, 661, 340, 660, 340, 659, 340, 658, 341, 658, 341, 657, 342, 656, 342, 655, 343, 654, 343, 653, 343, 653, 344, 652, 344, 651, 345, 650, 345, 649, 345, 648, 346, 648, 346, 647, 347, 646, 347, 645, 347, 644, 348, 644, 348, 643, 349, 642, 349, 641, 349, 640, 350, 640, 350, 639, 351, 638, 351, 637, 351, 636, 352, 636, 352, 635, 353, 634, 353, 633, 353, 632, 354, 632, 354, 631, 354, 630, 355, 629, 355, 629, 356, 628, 356, 627, 356, 626, 357, 625, 357, 625, 357, 624, 358, 623, 358, 622, 358, 622, 359, 621, 359, 620, 360, 619, 360, 619, 360, 618, 361, 617, 361, 616, 361, 615, 362, 615, 362, 614, 362, 613, 363, 612, 363, 612, 363, 611, 364, 610, 364, 609, 364, 609, 365, 608, 365, 607, 366, 606, 366, 606, 366, 605, 367, 604, 367, 603, 367, 603, 368, 602, 368, 601, 368, 600, 369, 600, 369, 599, 369, 598, 370, 597, 370, 597, 370, 596, 371, 595, 371, 594, 371, 594, 372, 593, 372, 592, 372, 591, 373, 591, 373, 590, 373, 589, 374, 588, 374, 588, 374, 587, 375, 586, 375, 585, 375, 585, 376, 584, 376, 583, 376, 582, 377, 582, 377, 581, 377, 580, 378, 579, 378, 578, 378, 578, 379, 577, 379, 576, 379, 575, 379, 575, 380, 574, 380, 573, 380, 572, 381, 572, 381, 571, 381, 570, 382, 569, 382, 568, 382, 568, 383, 567, 383, 566, 383, 565, 384, 565, 384, 564, 384, 563, 385, 562, 385, 561, 385, 561, 386, 560, 386, 559, 386, 558, 387, 557, 387, 557, 387, 556, 388, 555, 388, 554, 388, 553, 389, 553, 389, 552, 389, 551, 390, 550, 390, 549, 390, 549, 391, 548, 391, 547, 391, 546, 392, 545, 392, 544, 392, 544, 393, 543, 393, 542, 393, 541, 394, 540, 394, 539, 394, 539, 395, 538, 395, 537, 395, 536, 396, 535, 396, 534, 396, 534, 397, 533, 397, 532, 397, 531, 398, 530, 398, 529, 398, 528, 399, 527, 399, 527, 399, 526, 400, 525, 400, 524, 400, 523, 401, 522, 401, 521, 401, 520, 402, 519, 402, 518, 402, 518, 403, 517, 403, 516, 403, 515, 404, 514, 404, 513, 405, 512, 405, 511, 405, 510, 406, 509, 406, 508, 406, 507, 407, 506, 407, 505, 407, 504, 408, 504, 408, 503, 409, 502, 409, 501, 409, 500, 410, 499, 410, 498, 410, 497, 411, 496, 411, 495, 411, 494, 412, 493, 412, 492, 413, 491, 413, 490, 413, 489, 414, 488, 414, 487, 415, 486, 415, 485, 415, 483, 416, 482, 416, 481, 416, 480, 417, 479, 417, 478, 418, 477, 418, 476, 418, 475, 419, 474, 419, 473, 420, 472, 420, 471, 420, 470, 421, 468, 421, 467, 422, 466, 422, 465, 423, 464, 423, 463, 423, 462, 424, 461, 424, 459, 425, 458, 425, 457, 425, 456, 426, 455, 426, 454, 427, 452, 427, 451, 428, 450, 428, 449, 429, 448, 429, 446, 429, 445, 430, 444, 430, 443, 431, 442, 431, 440, 432, 439, 432, 438, 433, 437, 433, 435, 433, 434, 434, 433, 434, 432, 435, 430, 435, 429, 436, 428, 436, 427, 437, 425, 437, 424, 438, 423, 438, 421, 439, 420, 439, 419, 440, 417, 440, 416, 441, 415, 441, 413, 442, 412, 442, 411, 443, 409, 443, 408, 444, 406, 444, 405, 445, 404, 445, 402, 446, 401, 446, 399, 447, 398, 447, 397, 448, 395, 448, 394, 449, 392, 449, 391, 450, 389, 450, 388, 451, 386, 451, 385, 452], Source={ID=3, Name=Fallow}, Destination={ID=11, Name=Covercrop}, ID=31, Name=Arc 20}
          {SourceID=8, DestinationID=3, Conditions=[[Manager].Script.Biomass0LateSorghum], BezierPoints=[873, 31, 872, 31, 872, 32, 871, 33, 871, 34, 870, 35, 870, 36, 869, 37, 869, 37, 868, 38, 868, 39, 868, 40, 867, 41, 867, 41, 866, 42, 866, 43, 866, 44, 865, 45, 865, 45, 864, 46, 864, 47, 864, 48, 863, 48, 863, 49, 862, 50, 862, 51, 862, 51, 861, 52, 861, 53, 861, 54, 860, 54, 860, 55, 860, 56, 859, 56, 859, 57, 859, 58, 858, 58, 858, 59, 858, 60, 857, 60, 857, 61, 857, 62, 856, 62, 856, 63, 856, 64, 855, 64, 855, 65, 855, 66, 854, 66, 854, 67, 854, 68, 853, 68, 853, 69, 853, 70, 853, 70, 852, 71, 852, 72, 852, 72, 852, 73, 851, 73, 851, 74, 851, 75, 850, 75, 850, 76, 850, 77, 850, 77, 849, 78, 849, 78, 849, 79, 849, 80, 848, 80, 848, 81, 848, 82, 848, 82, 847, 83, 847, 84, 847, 84, 847, 85, 847, 85, 846, 86, 846, 87, 846, 87, 846, 88, 845, 89, 845, 89, 845, 90, 845, 91, 845, 91, 844, 92, 844, 93, 844, 93, 844, 94, 843, 95, 843, 95, 843, 96, 843, 97, 843, 97, 843, 98, 842, 99, 842, 99, 842, 100, 842, 101, 842, 101, 841, 102, 841, 103, 841, 103, 841, 104, 841, 105, 840, 106, 840, 106, 840, 107, 840, 108, 840, 109, 840, 109, 839, 110, 839, 111, 839, 112, 839, 112, 839, 113, 838, 114, 838, 115, 838, 116, 838, 116, 838, 117, 838, 118, 837, 119, 837, 120, 837, 121, 837, 121, 837, 122, 837, 123, 836, 124, 836, 125, 836, 126, 836, 127, 836, 128, 836, 128, 836, 129, 835, 130, 835, 131, 835, 132, 835, 133, 835, 134, 835, 135, 834, 136, 834, 137, 834, 138, 834, 139, 834, 140, 834, 141, 833, 142, 833, 143, 833, 144, 833, 145, 833, 146, 833, 147, 833, 149, 832, 150, 832, 151, 832, 152, 832, 153, 832, 154, 832, 155, 831, 157, 831, 158, 831, 159, 831, 160, 831, 161, 831, 163, 830, 164, 830, 165, 830, 166, 830, 168, 830, 169, 830, 170, 829, 172, 829, 173, 829, 174, 829, 176, 829, 177, 829, 178, 828, 180, 828, 181, 828, 183, 828, 184, 828, 186, 828, 187, 827, 188, 827, 190, 827, 191, 827, 193, 827, 195, 826, 196, 826, 198, 826, 199, 826, 201, 826, 202, 825, 204, 825, 206, 825, 207, 825, 209, 825, 211, 825, 212, 824, 214, 824, 216, 824, 218, 824, 219, 824, 221, 823, 223, 823, 225, 823, 227, 823, 229, 822, 230, 822, 232, 822, 234, 822, 236, 822, 238, 821, 240, 821, 242, 821, 244, 821, 246, 820, 248, 820, 250, 820, 252, 820, 254], Source={ID=8, Name=LateSorghum}, Destination={ID=3, Name=Fallow}, ID=32, Name=Arc 21}
          {SourceID=1, DestinationID=3, Conditions=[[Manager].Script.Biomass0Sorghum], BezierPoints=[1077, 37, 1075, 38, 1073, 39, 1072, 40, 1070, 41, 1069, 43, 1067, 44, 1066, 45, 1064, 46, 1063, 47, 1061, 49, 1060, 50, 1058, 51, 1057, 52, 1055, 53, 1054, 54, 1052, 55, 1051, 56, 1050, 58, 1048, 59, 1047, 60, 1045, 61, 1044, 62, 1043, 63, 1041, 64, 1040, 65, 1039, 66, 1037, 67, 1036, 68, 1035, 69, 1034, 70, 1032, 71, 1031, 72, 1030, 73, 1029, 74, 1027, 75, 1026, 76, 1025, 77, 1024, 78, 1023, 79, 1021, 80, 1020, 81, 1019, 81, 1018, 82, 1017, 83, 1016, 84, 1014, 85, 1013, 86, 1012, 87, 1011, 88, 1010, 89, 1009, 89, 1008, 90, 1007, 91, 1006, 92, 1005, 93, 1004, 94, 1003, 94, 1001, 95, 1000, 96, 999, 97, 998, 98, 997, 99, 996, 99, 995, 100, 994, 101, 993, 102, 992, 102, 992, 103, 991, 104, 990, 105, 989, 106, 988, 106, 987, 107, 986, 108, 985, 109, 984, 109, 983, 110, 982, 111, 981, 111, 980, 112, 979, 113, 979, 114, 978, 114, 977, 115, 976, 116, 975, 116, 974, 117, 973, 118, 972, 119, 972, 119, 971, 120, 970, 121, 969, 121, 968, 122, 967, 123, 967, 123, 966, 124, 965, 125, 964, 125, 963, 126, 963, 127, 962, 127, 961, 128, 960, 129, 959, 129, 959, 130, 958, 131, 957, 131, 956, 132, 955, 133, 955, 133, 954, 134, 953, 135, 952, 135, 952, 136, 951, 137, 950, 137, 949, 138, 948, 138, 948, 139, 947, 140, 946, 140, 945, 141, 945, 142, 944, 142, 943, 143, 942, 144, 942, 144, 941, 145, 940, 146, 939, 146, 939, 147, 938, 147, 937, 148, 936, 149, 936, 149, 935, 150, 934, 151, 933, 151, 933, 152, 932, 153, 931, 153, 930, 154, 930, 155, 929, 155, 928, 156, 927, 157, 927, 157, 926, 158, 925, 159, 924, 159, 924, 160, 923, 161, 922, 161, 921, 162, 921, 163, 920, 163, 919, 164, 918, 165, 917, 165, 917, 166, 916, 167, 915, 168, 914, 168, 914, 169, 913, 170, 912, 170, 911, 171, 910, 172, 910, 173, 909, 173, 908, 174, 907, 175, 906, 175, 906, 176, 905, 177, 904, 178, 903, 178, 902, 179, 901, 180, 901, 181, 900, 182, 899, 182, 898, 183, 897, 184, 896, 185, 895, 185, 895, 186, 894, 187, 893, 188, 892, 189, 891, 190, 890, 190, 889, 191, 888, 192, 887, 193, 886, 194, 886, 195, 885, 195, 884, 196, 883, 197, 882, 198, 881, 199, 880, 200, 879, 201, 878, 202, 877, 202, 876, 203, 875, 204, 874, 205, 873, 206, 872, 207, 871, 208, 870, 209, 869, 210, 868, 211, 867, 212, 866, 213, 865, 214, 864, 215, 863, 216, 862, 217, 860, 218, 859, 219, 858, 220, 857, 221, 856, 222, 855, 223, 854, 224, 853, 225, 851, 226, 850, 228, 849, 229, 848, 230, 847, 231, 846, 232, 844, 233, 843, 234, 842, 235, 841, 237, 839, 238, 838, 239, 837, 240, 836, 241, 834, 243, 833, 244, 832, 245, 830, 246, 829, 247, 828, 249, 826, 250, 825, 251, 824, 253, 822, 254, 821, 255], Source={ID=1, Name=Sorghum}, Destination={ID=3, Name=Fallow}, ID=33, Name=Arc 22}
          {SourceID=10, DestinationID=3, Conditions=[[Manager].Script.Biomass0EarlySorghum], BezierPoints=[427, 170, 428, 170, 429, 171, 431, 171, 432, 172, 434, 173, 435, 173, 436, 174, 438, 174, 439, 175, 441, 176, 442, 176, 443, 177, 445, 177, 446, 178, 447, 179, 449, 179, 450, 180, 452, 180, 453, 181, 454, 182, 455, 182, 457, 183, 458, 183, 459, 184, 461, 184, 462, 185, 463, 185, 464, 186, 466, 187, 467, 187, 468, 188, 469, 188, 471, 189, 472, 189, 473, 190, 474, 190, 476, 191, 477, 191, 478, 192, 479, 192, 480, 193, 482, 193, 483, 194, 484, 194, 485, 195, 486, 195, 487, 196, 488, 196, 490, 197, 491, 197, 492, 198, 493, 198, 494, 199, 495, 199, 496, 200, 497, 200, 499, 201, 500, 201, 501, 202, 502, 202, 503, 203, 504, 203, 505, 203, 506, 204, 507, 204, 508, 205, 509, 205, 510, 206, 511, 206, 512, 207, 513, 207, 514, 207, 515, 208, 516, 208, 517, 209, 518, 209, 519, 209, 520, 210, 521, 210, 522, 211, 523, 211, 524, 211, 525, 212, 526, 212, 527, 213, 528, 213, 529, 213, 530, 214, 531, 214, 532, 215, 533, 215, 534, 215, 535, 216, 536, 216, 537, 216, 538, 217, 539, 217, 540, 218, 540, 218, 541, 218, 542, 219, 543, 219, 544, 219, 545, 220, 546, 220, 547, 220, 548, 221, 548, 221, 549, 221, 550, 222, 551, 222, 552, 222, 553, 223, 554, 223, 555, 223, 555, 224, 556, 224, 557, 224, 558, 225, 559, 225, 560, 225, 561, 225, 561, 226, 562, 226, 563, 226, 564, 227, 565, 227, 566, 227, 566, 228, 567, 228, 568, 228, 569, 228, 570, 229, 570, 229, 571, 229, 572, 230, 573, 230, 574, 230, 574, 230, 575, 231, 576, 231, 577, 231, 578, 231, 578, 232, 579, 232, 580, 232, 581, 232, 582, 233, 582, 233, 583, 233, 584, 233, 585, 234, 586, 234, 586, 234, 587, 234, 588, 235, 589, 235, 589, 235, 590, 235, 591, 236, 592, 236, 592, 236, 593, 236, 594, 236, 595, 237, 596, 237, 596, 237, 597, 237, 598, 238, 599, 238, 599, 238, 600, 238, 601, 238, 602, 239, 602, 239, 603, 239, 604, 239, 605, 239, 605, 240, 606, 240, 607, 240, 608, 240, 608, 240, 609, 241, 610, 241, 611, 241, 611, 241, 612, 241, 613, 241, 614, 242, 614, 242, 615, 242, 616, 242, 617, 242, 617, 242, 618, 243, 619, 243, 620, 243, 620, 243, 621, 243, 622, 243, 623, 244, 623, 244, 624, 244, 625, 244, 626, 244, 626, 244, 627, 245, 628, 245, 629, 245, 629, 245, 630, 245, 631, 245, 632, 245, 633, 246, 633, 246, 634, 246, 635, 246, 636, 246, 636, 246, 637, 246, 638, 246, 639, 247, 639, 247, 640, 247, 641, 247, 642, 247, 643, 247, 643, 247, 644, 247, 645, 248, 646, 248, 646, 248, 647, 248, 648, 248, 649, 248, 650, 248, 650, 248, 651, 248, 652, 249, 653, 249, 654, 249, 654, 249, 655, 249, 656, 249, 657, 249, 658, 249, 658, 249, 659, 249, 660, 250, 661, 250, 662, 250, 663, 250, 663, 250, 664, 250, 665, 250, 666, 250, 667, 250, 668, 250, 668, 250, 669, 251, 670, 251, 671, 251, 672, 251, 673, 251, 674, 251, 674, 251, 675, 251, 676, 251, 677, 251, 678, 251, 679, 251, 680, 252, 681, 252, 682, 252, 682, 252, 683, 252, 684, 252, 685, 252, 686, 252, 687, 252, 688, 252, 689, 252, 690, 252, 691, 252, 692, 252, 693, 252, 693, 253, 694, 253, 695, 253, 696, 253, 697, 253, 698, 253, 699, 253, 700, 253, 701, 253, 702, 253, 703, 253, 704, 253, 705, 253, 706, 253, 707, 253, 708, 253, 709, 253, 710, 253, 711, 254, 712, 254, 713, 254, 714, 254, 715, 254, 716, 254, 717, 254, 718, 254, 719, 254, 720, 254, 721, 254, 723, 254, 724, 254, 725, 254, 726, 254, 727, 254, 728, 254, 729, 254, 730, 254, 731, 254, 732, 254, 733, 254, 735, 254, 736, 255, 737, 255, 738, 255, 739, 255, 740, 255, 741, 255, 743, 255, 744, 255, 745, 255, 746, 255, 747, 255, 749, 255, 750, 255, 751, 255, 752, 255, 753, 255, 755, 255, 756, 255, 757, 255, 758, 255, 760, 255, 761, 255, 762, 255, 763, 255, 765, 255, 766, 255, 767, 255, 768, 255, 770, 255, 771, 255, 772, 256, 774, 256, 775, 256, 776, 256, 778, 256, 779, 256, 780, 256, 782, 256, 783, 256, 784, 256, 786, 256, 787, 256, 789, 256, 790, 256, 791, 256, 793, 256, 794, 256, 796, 256, 797, 256, 799, 256, 800, 256, 801, 256, 803, 256, 804, 256, 806, 256, 807, 256, 809, 256, 810, 256, 812, 256, 813, 256, 815, 256, 816, 256, 818, 256], Source={ID=10, Name=EarlySorghum}, Destination={ID=3, Name=Fallow}, ID=34, Name=Arc 23}
          {SourceID=9, DestinationID=3, Conditions=[[Manager].Script.Biomass0SpringSorghum], BezierPoints=[713, 28, 713, 29, 714, 31, 714, 33, 715, 34, 715, 36, 716, 38, 716, 39, 717, 41, 718, 43, 718, 44, 719, 46, 719, 48, 720, 49, 720, 51, 721, 52, 721, 54, 722, 55, 722, 57, 723, 58, 723, 60, 724, 61, 724, 63, 725, 64, 725, 66, 726, 67, 726, 68, 726, 70, 727, 71, 727, 73, 728, 74, 728, 75, 729, 77, 729, 78, 730, 79, 730, 81, 730, 82, 731, 83, 731, 84, 732, 86, 732, 87, 733, 88, 733, 89, 733, 91, 734, 92, 734, 93, 735, 94, 735, 95, 735, 96, 736, 98, 736, 99, 737, 100, 737, 101, 737, 102, 738, 103, 738, 104, 739, 105, 739, 106, 739, 108, 740, 109, 740, 110, 740, 111, 741, 112, 741, 113, 742, 114, 742, 115, 742, 116, 743, 117, 743, 118, 743, 119, 744, 120, 744, 121, 744, 122, 745, 123, 745, 123, 745, 124, 746, 125, 746, 126, 746, 127, 747, 128, 747, 129, 748, 130, 748, 131, 748, 132, 749, 132, 749, 133, 749, 134, 750, 135, 750, 136, 750, 137, 751, 138, 751, 138, 751, 139, 752, 140, 752, 141, 752, 142, 753, 143, 753, 143, 753, 144, 754, 145, 754, 146, 754, 147, 755, 147, 755, 148, 755, 149, 756, 150, 756, 151, 756, 151, 757, 152, 757, 153, 757, 154, 758, 154, 758, 155, 759, 156, 759, 157, 759, 157, 760, 158, 760, 159, 760, 160, 761, 160, 761, 161, 761, 162, 762, 163, 762, 163, 762, 164, 763, 165, 763, 166, 764, 166, 764, 167, 764, 168, 765, 168, 765, 169, 765, 170, 766, 171, 766, 171, 767, 172, 767, 173, 767, 174, 768, 174, 768, 175, 769, 176, 769, 177, 769, 177, 770, 178, 770, 179, 771, 179, 771, 180, 771, 181, 772, 182, 772, 182, 773, 183, 773, 184, 774, 185, 774, 185, 774, 186, 775, 187, 775, 188, 776, 188, 776, 189, 777, 190, 777, 191, 778, 192, 778, 192, 779, 193, 779, 194, 779, 195, 780, 195, 780, 196, 781, 197, 781, 198, 782, 199, 782, 199, 783, 200, 783, 201, 784, 202, 784, 203, 785, 204, 785, 204, 786, 205, 787, 206, 787, 207, 788, 208, 788, 209, 789, 210, 789, 210, 790, 211, 790, 212, 791, 213, 792, 214, 792, 215, 793, 216, 793, 217, 794, 218, 795, 219, 795, 220, 796, 221, 796, 221, 797, 222, 798, 223, 798, 224, 799, 225, 800, 226, 800, 227, 801, 228, 802, 229, 802, 230, 803, 231, 804, 232, 804, 234, 805, 235, 806, 236, 806, 237, 807, 238, 808, 239, 809, 240, 809, 241, 810, 242, 811, 243, 812, 245, 812, 246, 813, 247, 814, 248, 815, 249, 815, 250, 816, 252, 817, 253, 818, 254, 819, 255], Source={ID=9, Name=SpringSorghum}, Destination={ID=3, Name=Fallow}, ID=35, Name=Arc 24}
        RotationRugplot: SimulationName=StandardSiteDalby; CurrentPaddockString=[Manager].Script.currentPaddock
  Memo
    **Long term simulations**

    4 sites, 3 fert levels.

    Soil is reset at sowing (rainfall criteria), starts with 50KgN
