Simulations: Version=174
  DataStore
  Experiment Standard
    Factors
      Permutation
        Factor Site
          CompositeFactor Dalby
            Specifications:
              [Soil]
              [Weather]
              [Clock]
            Soil Black Vertosol-Bongeen (Dalby No027): ASCOrder=Vertosol; ASCSubOrder=Black; SoilType=Black Vertosol; Site=Dalby; NearestTown=Dalby, Q 4405; Region=Darling Downs and Granite Belt; State=Queensland; Country=Australia; ApsoilNumber=27; Latitude=-27.123; Longitude=151.305; LocationAccuracy=+/- 20m; YearOfSampling=0; DataSource=CSIRO Sustainable Ecosystems, Toowoomba
              Comments=Clay - Toowoomba - Wheat ll,xf copied from sorghum. Wheat kl is just default apsim kl values for wheat.
              Physical
                Thickness  ParticleSizeClay  ParticleSizeSand  ParticleSizeSilt  Rocks  BD    AirDry  LL15  DUL   SAT
                150        30                5                 65                0      1.25  0.115   0.23  0.45  0.5
                150        30                5                 65                0      1.31  0.184   0.23  0.43  0.48
                300        30                5                 65                0      1.23  0.23    0.23  0.46  0.51
                300        30                5                 65                0      1.24  0.23    0.23  0.45  0.5
                300        30                5                 65                0      1.25  0.23    0.23  0.45  0.5
                300        30                5                 65                0      1.26  0.23    0.23  0.44  0.49
                300        30                5                 65                0      1.29  0.23    0.23  0.43  0.48
                BD, DUL source: Field measured and checked for sensibility
                AirDry, LL15 source: Estimated based on local knowledge
                SAT source: Calculated from measured, estimated or calculated BD
                Rocks, ParticleSizeSand, ParticleSizeSilt, ParticleSizeClay source: Calculated
                SoilCrop wheatSoil: LL=[0.23, 0.24, 0.29, 0.34, 0.37, 0.38, 0.39]; KL=[0.06, 0.06, 0.06, 0.04, 0.04, 0.02, 0.01]; XF=[1, 1, 1, 1, 1, 1, 1]
                  LL source: Estimated based on local knowledge
                SoilCrop sorghumSoil: LL=[0.23, 0.24, 0.29, 0.34, 0.37, 0.38, 0.39]; KL=[0.07, 0.07, 0.07, 0.05, 0.05, 0.04, 0.03]; XF=[1, 1, 1, 1, 1, 1, 1]
                  LL source: Field measured and checked for sensibility
                SoilCrop chickpeaSoil: same as Standard.Factors.Permutation.Site.Dalby.Black Vertosol-Bongeen (Dalby No027).Physical.sorghumSoil
                SoilCrop MungbeanSoil: same as Standard.Factors.Permutation.Site.Dalby.Black Vertosol-Bongeen (Dalby No027).Physical.wheatSoil
                SoilCrop maizeSoil: same as Standard.Factors.Permutation.Site.Dalby.Black Vertosol-Bongeen (Dalby No027).Physical.sorghumSoil
                SoilCrop SoybeanSoil: same as Standard.Factors.Permutation.Site.Dalby.Black Vertosol-Bongeen (Dalby No027).Physical.wheatSoil
                SoilCrop RedcloverSoil: same as Standard.Factors.Permutation.Site.Dalby.Black Vertosol-Bongeen (Dalby No027).Physical.sorghumSoil
                SoilCrop CottonSoil: LL=[0.23, 0.23, 0.23, 0.30285, 0.3276, 0.34628, 0.3655]; KL=[0.1, 0.1, 0.1, 0.1, 0.09, 0.07, 0.05]; XF=[1, 1, 1, 1, 1, 1, 1]
                  LL, KL, XF source: Estimated
              WaterBalance SoilWater: SummerDate=1-Nov; SummerU=6; SummerCona=3.5; WinterDate=1-Apr; WinterU=4; WinterCona=2.5; DiffusConst=40; DiffusSlope=16; Salb=0.12; CN2Bare=73; CNRed=20; CNCov=0.8; PSIDul=-100; Thickness=[150, 150, 300, 300, 300, 300, 300]; SWCON=[0.3, 0.3, 0.3, 0.3, 0.3, 0.3, 0.3]
              Organic: FOMCNRatio=40; CarbonUnits=WalkleyBlack
                Thickness  Carbon  SoilCNRatio  FBiom  FInert  FOM
                150        0.915   12           0.04   0.4     347.129
                150        0.777   12           0.02   0.6     270.344
                300        0.346   12           0.02   0.8     163.972
                300        0.231   12           0.02   1       99.454
                300        0.154   12           0.01   1       60.322
                300        0.123   12           0.01   1       36.587
                300        0.131   12           0.01   1       22.191
              Chemical: Thickness=[150, 150, 300, 300, 300, 300, 300]; PH=[8.2, 8.5, 8.6, 8.6, 7.4, 5.3, 5.3]; PHUnits=Water
                PH source: Estimated based on local knowledge
              Nutrient
              Solute NO3: Thickness=[300, 1500]; InitialValues=[100, 0]; InitialValuesUnits=kg/ha; WaterTableConcentration=0; D0=0; DepthConstant=0; MaxDepthSoluteAccessible=0; RunoffEffectivenessAtMovingSolute=0; MaxEffectiveRunoff=0
              Solute NH4: Thickness=[600, 1200]; InitialValues=[0, 0]; InitialValuesUnits=ppm; WaterTableConcentration=0; D0=0; DepthConstant=0; MaxDepthSoluteAccessible=0; RunoffEffectivenessAtMovingSolute=0; MaxEffectiveRunoff=0
              Solute Urea: Thickness=[150, 150, 300, 300, 300, 300, 300]; InitialValues=[0, 0, 0, 0, 0, 0, 0]; InitialValuesUnits=kg/ha; WaterTableConcentration=0; D0=0; DepthConstant=0; MaxDepthSoluteAccessible=0; RunoffEffectivenessAtMovingSolute=0; MaxEffectiveRunoff=0
              Water: Thickness=[150, 150, 300, 300, 300, 300, 300]; InitialValues=[0.275, 0.271, 0.278, 0.275, 0.275, 0.273, 0.271]; InitialPAWmm=79.5; RelativeTo=LL15; FilledFromTop=false
              CERESSoilTemperature Temperature
              SoilTemperature (disabled): CONSTANT_TEMPdepth=10
            Weather Dalby met
              FileName=C:\Users\uqztan6\OneDrive - The University of Queensland\Documents\APSFARM model\Moonggoo\climate\baseline\Dalby_baseline.met
            Clock: Start=1970-01-01; End=2019-12-31
          CompositeFactor Capella
            Specifications:
              [Soil]
              [Weather]
              [Clock]
            Weather Capella met
              FileName=C:\Users\uqztan6\OneDrive - The University of Queensland\Documents\APSFARM model\Moonggoo\climate\Capella\Capella_baseline.met
            Clock: Start=1970-01-01; End=2019-12-31
            Soil Black Vertosol (Capella No1272): ASCOrder=Vertosol; ASCSubOrder=Black; SoilType=Black Vertosol; Site=Capella; NearestTown=Capella; Region=Central Highlands; State=Queensland; Country=Australia; ApsoilNumber=1272; Latitude=-23.159917; Longitude=148.048517; LocationAccuracy=+/- 20m; YearOfSampling=2015; DataSource=Brett Cocks  CSIRO Agriculture
              Comments=Shallow Vertosol Black Self-Mulching Epicalcareous over decaying basalt  - Collected as a part of GRDC Measuring an manageing soil water
              Physical
                Thickness  ParticleSizeClay  ParticleSizeSand  ParticleSizeSilt  Rocks  BD    AirDry  LL15  DUL    SAT
                150        30                5                 65                0      1.15  0.15    0.3   0.487  0.537
                150        30                5                 65                0      1.16  0.24    0.3   0.481  0.531
                300        30                5                 65                0      1.17  0.3     0.3   0.48   0.53
                300        30                5                 65                0      1.17  0.3     0.3   0.48   0.53
                BD, DUL, SAT source: Field measured and checked for sensibility
                AirDry, LL15 source: Estimated based on local knowledge
                Rocks, ParticleSizeSand, ParticleSizeSilt, ParticleSizeClay source: Calculated
                SoilCrop maizeSoil: LL=[0.28, 0.28, 0.3, 0.3]; KL=[0.06, 0.06, 0.06, 0.04]; XF=[1, 1, 1, 1]
                  LL source: Field measured and checked for sensibility
                SoilCrop sorghumSoil: same as Standard.Factors.Permutation.Site.Capella.Black Vertosol (Capella No1272).Physical.maizeSoil
                SoilCrop chickpeaSoil: same as Standard.Factors.Permutation.Site.Capella.Black Vertosol (Capella No1272).Physical.maizeSoil
                SoilCrop wheatSoil: same as Standard.Factors.Permutation.Site.Capella.Black Vertosol (Capella No1272).Physical.maizeSoil
                SoilCrop MungbeanSoil: LL=[0.261, 0.248, 0.3, 0.306]; KL=[0.06, 0.06, 0.06, 0.04]; XF=[1, 1, 1, 1]
                SoilCrop SoybeanSoil: LL=[0.261, 0.248, 0.3, 0.306]; KL=[0.06, 0.06, 0.06, 0.04]; XF=[1, 1, 1, 1]
                SoilCrop RedcloverSoil: LL=[0.28, 0.28, 0.3, 0.3]; KL=[0.06, 0.06, 0.06, 0.04]; XF=[1, 1, 1, 1]
                SoilCrop CottonSoil: LL=[0.3, 0.3, 0.3, 0.313]; KL=[0.1, 0.1, 0.1, 0.1]; XF=[1, 1, 1, 1]
                  LL, KL, XF source: Estimated
              WaterBalance SoilWater: SummerDate=1-nov; SummerU=6; SummerCona=3.5; WinterDate=1-apr; WinterU=4; WinterCona=2.5; DiffusConst=40; DiffusSlope=16; Salb=0.12; CN2Bare=73; CNRed=20; CNCov=0.08; PSIDul=-100; Thickness=[150, 150, 300, 300]; SWCON=[0.3, 0.3, 0.3, 0.3]
              Organic: FOMCNRatio=40; CarbonUnits=WalkleyBlack
                Thickness  Carbon  SoilCNRatio  FBiom  FInert  FOM
                150        0.75    12           0.04   0.4     523.082
                150        0.6     12           0.02   0.6     317.265
                300        0.375   12           0.01   0.8     116.715
                300        0.188   12           0.01   0.95    42.937
              Chemical: PHUnits=Water
                Thickness  PH   EC    ESP    CEC
                150        8.1  0.06  0.005  76
                150        8.2  0.05  0.007  76
                300        8.4  0.07  0.011  71
                300        8.3  0.07  0.017  70
                EC, CL, PH source: Measured
                ESP source: C
              Nutrient
              Solute NO3: Thickness=[300]; InitialValues=[50]; InitialValuesUnits=kg/ha; WaterTableConcentration=0; D0=0; DepthConstant=0; MaxDepthSoluteAccessible=0; RunoffEffectivenessAtMovingSolute=0; MaxEffectiveRunoff=0
              Solute NH4: InitialValuesUnits=ppm; WaterTableConcentration=0; D0=0; DepthConstant=0; MaxDepthSoluteAccessible=0; RunoffEffectivenessAtMovingSolute=0; MaxEffectiveRunoff=0
              Solute Urea: Thickness=[150, 150, 300, 300]; InitialValues=[0, 0, 0, 0]; InitialValuesUnits=kg/ha; WaterTableConcentration=0; D0=0; DepthConstant=0; MaxDepthSoluteAccessible=0; RunoffEffectivenessAtMovingSolute=0; MaxEffectiveRunoff=0
              Water: Thickness=[150, 150, 300, 300]; InitialValues=[0.45, 0.445, 0.444, 0.444]; InitialPAWmm=130.65; RelativeTo=LL15; FilledFromTop=false
              CERESSoilTemperature Temperature
              CERESSoilTemperature SoilTemperature
          CompositeFactor Georgetown
            Specifications:
              [Soil]
              [Weather]
              [Clock]
            Weather Georgetown met
              FileName=C:\Users\uqztan6\OneDrive - The University of Queensland\Documents\APSFARM model\Moonggoo\climate\baseline\Gilbert_baseline.met
            Clock: Start=1970-01-01; End=2019-12-31
            Soil Synthetic Soil Derived from the SLGA: ASCOrder=NA; ASCSubOrder=NA; SoilType=Loam over Clay Loam; Site=9947_36660; NearestTown=GEORGETOWN; Region=Einasleigh Uplands; State=Queensland; ApsoilNumber=9999; Latitude=-18.2899; Longitude=143.55; LocationAccuracy=+- 90m; YearOfSampling=2024; Comments=Landuse is Grazing natural vegetation
              NaturalVegetation=Arid and semi-arid acacia low open woodlands and shrublands with hummock grass
              DataSource=Soil and Landscape Grid of Australia. This soil parameter file was automatically generated from the GSM National Surfaces using pedotransfer functions.
              Water: Thickness=[150, 150, 150, 150, 200, 200]; InitialValues=[0.22, 0.229, 0.242, 0.248, 0.249, 0.248]; InitialPAWmm=96.5; RelativeTo=LL15; FilledFromTop=false
              Physical
                Thickness  ParticleSizeClay  ParticleSizeSand  ParticleSizeSilt  Rocks  BD     AirDry  LL15   DUL    SAT    KS
                150        30                5                 65                0      1.494  0.039   0.116  0.22   0.375  65.943
                150        30                5                 65                0      1.536  0.043   0.13   0.229  0.367  38.13
                150        30                5                 65                0      1.542  0.048   0.144  0.242  0.369  25.177
                150        30                5                 65                0      1.544  0.05    0.151  0.248  0.37   20.459
                200        30                5                 65                0      1.559  0.052   0.155  0.249  0.367  17.558
                200        30                5                 65                0      1.578  0.053   0.158  0.248  0.361  15.737
                Rocks, ParticleSizeSand, ParticleSizeSilt, ParticleSizeClay source: Calculated
                SoilCrop MaizeSoil: LL=[0.122, 0.136, 0.15, 0.156, 0.159, 0.161]; KL=[0.06, 0.06, 0.059, 0.053, 0.044, 0.032]; XF=[1, 0.946, 0.911, 0.903, 0.871, 0.826]
                SoilCrop SorghumSoil: LL=[0.123, 0.137, 0.151, 0.157, 0.16, 0.162]; KL=[0.07, 0.07, 0.069, 0.064, 0.056, 0.046]; XF=[1, 0.946, 0.911, 0.903, 0.871, 0.826]
                SoilCrop ChickpeaSoil: LL=[0.122, 0.136, 0.15, 0.157, 0.16, 0.161]; KL=[0.06, 0.06, 0.06, 0.059, 0.051, 0.037]; XF=[1, 0.946, 0.911, 0.903, 0.871, 0.826]
                SoilCrop WheatSoil: LL=[0.122, 0.136, 0.15, 0.156, 0.159, 0.161]; KL=[0.06, 0.06, 0.059, 0.053, 0.044, 0.032]; XF=[1, 0.946, 0.911, 0.903, 0.871, 0.826]
                SoilCrop MungbeanSoil: LL=[0.122, 0.136, 0.15, 0.156, 0.159, 0.16]; KL=[0.06, 0.06, 0.06, 0.055, 0.042, 0.025]; XF=[1, 0.946, 0.911, 0.903, 0.871, 0.826]
                SoilCrop SoybeanSoil: LL=[0.122, 0.136, 0.15, 0.156, 0.159, 0.161]; KL=[0.06, 0.06, 0.059, 0.053, 0.044, 0.032]; XF=[1, 0.946, 0.911, 0.903, 0.871, 0.826]
                SoilCrop RedcloverSoil: LL=[0.123, 0.137, 0.151, 0.157, 0.16, 0.162]; KL=[0.07, 0.07, 0.069, 0.064, 0.056, 0.046]; XF=[1, 0.946, 0.911, 0.903, 0.871, 0.826]
              WaterBalance SoilWater: SummerDate=1-nov; SummerU=6; SummerCona=6; WinterDate=1-apr; WinterU=4; WinterCona=2.5; DiffusConst=124.373; DiffusSlope=41.6961; Salb=0.13; CN2Bare=78; CNRed=20; CNCov=0; DischargeWidth=10; CatchmentArea=4590.63; PSIDul=-100; Thickness=[150, 150, 150, 150, 200, 200]; SWCON=[0.51097, 0.460319, 0.417846, 0.395004, 0.329609, 0.320335]
              Organic: FOMCNRatio=40; CarbonUnits=Total
                Thickness  Carbon    SoilCNRatio  FBiom    FInert    FOM
                150        0.900074  14           0.04     0.323991  475.475
                150        0.527478  14           0.03106  0.549705  303.176
                150        0.382413  14           0.01404  0.753966  193.314
                150        0.327676  14           0.01     0.880237  123.262
                200        0.276817  14           0.01     0.992121  67.6477
                200        0.232864  14           0.01     1         37.1259
              Chemical: Thickness=[150, 150, 150, 150, 200, 200]; PH=[5.82003, 5.93881, 6.09601, 6.17339, 6.17453, 6.17256]; PHUnits=Water
              Solute NO3: Thickness=[150, 150, 150, 150, 200, 200]; InitialValues=[0, 0, 0, 0, 0, 0]; InitialValuesUnits=ppm; WaterTableConcentration=0; D0=0; DepthConstant=0; MaxDepthSoluteAccessible=0; RunoffEffectivenessAtMovingSolute=0; MaxEffectiveRunoff=0
              Solute NH4: same as Standard.Factors.Permutation.Site.Georgetown.Synthetic Soil Derived from the SLGA.NO3
              Solute Urea: same as Standard.Factors.Permutation.Site.Georgetown.Synthetic Soil Derived from the SLGA.NO3
              CERESSoilTemperature Temperature
              Nutrient
              CERESSoilTemperature SoilTemperature
    Simulation Farm
      Clock: Start=1970-01-01; End=2019-12-31
      Summary SummaryFile
      Weather
        FileName=C:\Users\uqztan6\OneDrive - The University of Queensland\Documents\APSFARM model\Moonggoo\climate\baseline\Capella_baseline.met
      SoilArbitrator Soil Arbitrator
      Zone Field 1: Area=1; Slope=0; AspectAngle=0; Altitude=50
        Fertiliser
        SurfaceOrganicMatter: InitialResidueName=wheat_stubble; InitialResidueType=wheat; InitialResidueMass=500; InitialStandingFraction=0; InitialCPR=0; InitialCNR=100
        MicroClimate: a_interception=0; b_interception=1; c_interception=0; d_interception=0; SoilHeatFluxFraction=0.4; MinimumHeightDiffForNewLayer=0; NightInterceptionFraction=0.5; ReferenceHeight=2
        Plant Maize
        Plant Wheat
        Plant Sorghum
        Plant Mungbean
        Plant Soybean
        Plant Chickpea
        Soil Black Vertosol-Bongeen (Dalby No027): same as Standard.Factors.Permutation.Site.Dalby.Black Vertosol-Bongeen (Dalby No027)
      Zone Field 2: same as Standard.Farm.Field 1
      Zone Field 3: same as Standard.Farm.Field 1
      Zone Field 4: same as Standard.Farm.Field 1
      Zone Field 5: same as Standard.Farm.Field 1
      Zone Field 6: same as Standard.Farm.Field 1
      Zone Field 7: same as Standard.Farm.Field 1
      Zone Field 8: same as Standard.Farm.Field 1
      Zone Field 9: same as Standard.Farm.Field 1
      Zone Field 10: Area=1; Slope=0; AspectAngle=0; Altitude=50
        Fertiliser
        SurfaceOrganicMatter: InitialResidueName=wheat_stubble; InitialResidueType=wheat; InitialResidueMass=500; InitialStandingFraction=0; InitialCPR=0; InitialCNR=100
        MicroClimate: a_interception=0; b_interception=1; c_interception=0; d_interception=0; SoilHeatFluxFraction=0.4; MinimumHeightDiffForNewLayer=0; NightInterceptionFraction=0.5; ReferenceHeight=2
        Plant Maize
        Plant Wheat
        Plant Sorghum
        Plant Mungbean
        Plant Soybean
        Plant Chickpea
        Report: EventNames=[Clock].EndOfDay
          VariableNames:
            [Clock].Today
            [Wheat].Phenology.Zadok.Stage
            [Wheat].Phenology.CurrentStageName
            [Wheat].IsAlive
            [Wheat].IsReadyForHarvesting
            [Wheat].AboveGround.Wt
            [Wheat].AboveGround.N
            [Wheat].Grain.Total.Wt*10 as WheatYield
            [Maize].Grain.Total.Wt*10 as MaizeYield
            [Wheat].Grain.Protein
            [Wheat].Grain.Size
            [Wheat].Grain.Number
            [Wheat].Grain.Total.Wt
            [Wheat].Grain.Total.N
            [Wheat].Total.Wt
            Sum([Soil].SoilWater.ESW) as ESW
            [Soil].SoilWater.Es as ESoil
        Soil Black Vertosol-Bongeen (Dalby No027): same as Standard.Factors.Permutation.Site.Dalby.Black Vertosol-Bongeen (Dalby No027)
      FarmEconomics: InitialBalance=0; Balance=0
        CostPriceInfo Wheat: VariableCost=47; Price=314
        CostPriceInfo Maize: VariableCost=132; Price=314
        CostPriceInfo Sorghum: VariableCost=33; Price=311
        CostPriceInfo Chickpea: VariableCost=83; Price=796
        CostPriceInfo Mungbean: VariableCost=57; Price=1103
        CostPriceInfo Soybean: VariableCost=40; Price=537
        CostInfo Urea: Cost=1.4
        CostInfo Roundup: Cost=12
        CostInfo Manure: Cost=0.425
          Memo
            $425/t from https://tgrm.com.au/_products//Products/ORGANICPRODUCTS/KATEK1TONBAGSTANDARDPOULTRYMANUREPELLETSSUPERBOOSTER103-8115-16126-.aspx
        CostInfo Pesticide: Cost=62.4
      FarmMachinery: FuelCost=1.85; WorkRates=[18, 0, 0, 70, 18, 0]; FuelConsRates=[46, 0, 0, 46, 46, 0]; FuelConsumption=0
        TractorNames=[220kW FWA, 220kW FWA, SprayRig, SprayRig, 220kW FWA, SprayRig]
        ImplementNames=[Planter, Sprayer, Planter, Sprayer, Manure Spreader, Manure Spreader]
        FarmMachineryItem 220kW FWA: MachineryType=0; MaxHours=12; NewPrice=0; TradeInValue=0; LifeOfEquipment=0; OilTyreCost=1; RepairsMaintenance=0
        FarmMachineryItem Planter: MachineryType=1; MaxHours=12; NewPrice=0; TradeInValue=0; LifeOfEquipment=0; OilTyreCost=0; RepairsMaintenance=0
        FarmMachineryItem SprayRig: MachineryType=0; MaxHours=8; NewPrice=0; TradeInValue=0; LifeOfEquipment=0; OilTyreCost=0.5; RepairsMaintenance=0
        FarmMachineryItem Sprayer: MachineryType=1; MaxHours=8; NewPrice=0; TradeInValue=0; LifeOfEquipment=0; OilTyreCost=0; RepairsMaintenance=0
          Memo
            https://www.deere.com/en/sprayers/see-spray-ultimate/
        FarmMachineryItem Manure Spreader: MachineryType=1; MaxHours=12; NewPrice=0; TradeInValue=0; LifeOfEquipment=0; OilTyreCost=0; RepairsMaintenance=0
      RotationManager: TopLevel=false; InitialState=Fallow; Verbose=false
        Nodes:
          Description  ID  Name
          c            1   Chickpea
          -            2   Fallow
          -            3   ShortEarlyWheat
          -            4   LongEarlyWheat
          -            5   ShortWheat
          -            6   LongWheat
          -            7   LongSorghum
          -            8   ShortSorghum
        Arcs:
          {SourceID=1, DestinationID=2, Conditions=[[Manager].MScript.CanHarvestChickpea], Actions=[[Manager].MScript.HarvestCrop("Chickpea");], BezierPoints=[1558, 96, 1557, 97, 1557, 98, 1557, 100, 1556, 101, 1556, 102, 1556, 104, 1555, 105, 1555, 106, 1555, 108, 1554, 109, 1554, 110, 1554, 112, 1553, 113, 1553, 114, 1553, 115, 1553, 117, 1552, 118, 1552, 119, 1552, 120, 1551, 121, 1551, 122, 1551, 124, 1551, 125, 1550, 126, 1550, 127, 1550, 128, 1550, 129, 1549, 130, 1549, 131, 1549, 132, 1549, 133, 1548, 134, 1548, 136, 1548, 137, 1548, 138, 1548, 139, 1547, 140, 1547, 141, 1547, 142, 1547, 142, 1547, 143, 1546, 144, 1546, 145, 1546, 146, 1546, 147, 1546, 148, 1545, 149, 1545, 150, 1545, 151, 1545, 152, 1545, 153, 1545, 154, 1544, 154, 1544, 155, 1544, 156, 1544, 157, 1544, 158, 1544, 159, 1544, 160, 1543, 160, 1543, 161, 1543, 162, 1543, 163, 1543, 164, 1543, 165, 1543, 165, 1543, 166, 1543, 167, 1542, 168, 1542, 169, 1542, 169, 1542, 170, 1542, 171, 1542, 172, 1542, 172, 1542, 173, 1542, 174, 1542, 175, 1542, 176, 1541, 176, 1541, 177, 1541, 178, 1541, 179, 1541, 179, 1541, 180, 1541, 181, 1541, 182, 1541, 182, 1541, 183, 1541, 184, 1541, 185, 1541, 185, 1541, 186, 1541, 187, 1541, 188, 1541, 188, 1541, 189, 1541, 190, 1541, 191, 1541, 191, 1541, 192, 1541, 193, 1541, 194, 1541, 194, 1541, 195, 1541, 196, 1541, 197, 1541, 197, 1541, 198, 1541, 199, 1541, 200, 1541, 201, 1541, 201, 1541, 202, 1541, 203, 1541, 204, 1541, 205, 1541, 205, 1542, 206, 1542, 207, 1542, 208, 1542, 209, 1542, 209, 1542, 210, 1542, 211, 1542, 212, 1542, 213, 1542, 214, 1542, 214, 1542, 215, 1543, 216, 1543, 217, 1543, 218, 1543, 219, 1543, 220, 1543, 221, 1543, 221, 1543, 222, 1544, 223, 1544, 224, 1544, 225, 1544, 226, 1544, 227, 1544, 228, 1544, 229, 1545, 230, 1545, 231, 1545, 232, 1545, 233, 1545, 234, 1545, 235, 1546, 236, 1546, 237, 1546, 238, 1546, 239, 1546, 240, 1546, 241, 1547, 242, 1547, 243, 1547, 244, 1547, 246, 1547, 247, 1548, 248, 1548, 249, 1548, 250, 1548, 251, 1549, 253, 1549, 254, 1549, 255, 1549, 256, 1549, 257, 1550, 259, 1550, 260, 1550, 261, 1550, 262, 1551, 264, 1551, 265, 1551, 266, 1552, 268, 1552, 269, 1552, 270, 1552, 272, 1553, 273, 1553, 275, 1553, 276, 1553, 277, 1554, 279, 1554, 280, 1554, 282, 1555, 283, 1555, 285, 1555, 286, 1556, 288, 1556, 289, 1556, 291], Source={Description=c, ID=1, Name=Chickpea}, Destination={ID=2, Name=Fallow}, ID=9, Name=Arc 1}
          {SourceID=2, DestinationID=4, Conditions=[[Manager].MScript.CanSowLongEarlyWheat, [Manager].MScript.AreaPlantedOk("LongEarlyWheat")], Actions=[[Manager].MScript.SowCrop("LongEarlyWheat");], BezierPoints=[1557, 293, 1556, 294, 1555, 295, 1555, 297, 1554, 298, 1554, 299, 1553, 300, 1552, 302, 1552, 303, 1551, 304, 1551, 305, 1550, 307, 1550, 308, 1549, 309, 1549, 310, 1548, 311, 1548, 313, 1547, 314, 1547, 315, 1546, 316, 1546, 317, 1545, 318, 1545, 319, 1544, 320, 1544, 321, 1543, 323, 1543, 324, 1542, 325, 1542, 326, 1541, 327, 1541, 328, 1541, 329, 1540, 330, 1540, 331, 1539, 332, 1539, 333, 1538, 334, 1538, 335, 1538, 335, 1537, 336, 1537, 337, 1536, 338, 1536, 339, 1536, 340, 1535, 341, 1535, 342, 1535, 343, 1534, 344, 1534, 344, 1533, 345, 1533, 346, 1533, 347, 1532, 348, 1532, 349, 1532, 350, 1531, 350, 1531, 351, 1531, 352, 1530, 353, 1530, 354, 1530, 354, 1529, 355, 1529, 356, 1529, 357, 1528, 358, 1528, 358, 1528, 359, 1527, 360, 1527, 361, 1527, 362, 1526, 362, 1526, 363, 1526, 364, 1526, 365, 1525, 365, 1525, 366, 1525, 367, 1524, 368, 1524, 368, 1524, 369, 1524, 370, 1523, 371, 1523, 371, 1523, 372, 1522, 373, 1522, 374, 1522, 374, 1522, 375, 1521, 376, 1521, 377, 1521, 377, 1520, 378, 1520, 379, 1520, 380, 1520, 380, 1519, 381, 1519, 382, 1519, 383, 1519, 383, 1518, 384, 1518, 385, 1518, 386, 1517, 386, 1517, 387, 1517, 388, 1517, 389, 1516, 390, 1516, 390, 1516, 391, 1516, 392, 1515, 393, 1515, 394, 1515, 394, 1515, 395, 1514, 396, 1514, 397, 1514, 398, 1513, 398, 1513, 399, 1513, 400, 1513, 401, 1512, 402, 1512, 403, 1512, 404, 1512, 404, 1511, 405, 1511, 406, 1511, 407, 1510, 408, 1510, 409, 1510, 410, 1510, 411, 1509, 412, 1509, 413, 1509, 413, 1508, 414, 1508, 415, 1508, 416, 1508, 417, 1507, 418, 1507, 419, 1507, 420, 1506, 421, 1506, 422, 1506, 423, 1505, 424, 1505, 425, 1505, 426, 1504, 428, 1504, 429, 1504, 430, 1504, 431, 1503, 432, 1503, 433, 1503, 434, 1502, 435, 1502, 437, 1501, 438, 1501, 439, 1501, 440, 1500, 441, 1500, 443, 1500, 444, 1499, 445, 1499, 446, 1499, 448, 1498, 449, 1498, 450, 1497, 451, 1497, 453, 1497, 454, 1496, 455, 1496, 457, 1496, 458, 1495, 460, 1495, 461, 1494, 462, 1494, 464, 1493, 465, 1493, 467, 1493, 468, 1492, 470, 1492, 471, 1491, 473, 1491, 474, 1490, 476, 1490, 478, 1489, 479, 1489, 481], Source={ID=2, Name=Fallow}, Destination={ID=4, Name=LongEarlyWheat}, ID=10, Name=Arc 3}
          {SourceID=2, DestinationID=5, Conditions=[[Manager].MScript.CanSowShortWheat, [Manager].MScript.AreaPlantedOk("ShortWheat")], Actions=[[Manager].MScript.SowCrop("ShortWheat");], BezierPoints=[1557, 293, 1558, 294, 1559, 295, 1561, 296, 1562, 297, 1563, 299, 1565, 300, 1566, 301, 1567, 302, 1569, 303, 1570, 304, 1571, 306, 1572, 307, 1574, 308, 1575, 309, 1576, 310, 1577, 311, 1579, 312, 1580, 313, 1581, 314, 1582, 315, 1583, 316, 1584, 317, 1585, 318, 1586, 319, 1588, 320, 1589, 321, 1590, 322, 1591, 323, 1592, 324, 1593, 325, 1594, 326, 1595, 327, 1596, 328, 1597, 329, 1598, 329, 1599, 330, 1600, 331, 1600, 332, 1601, 333, 1602, 334, 1603, 335, 1604, 336, 1605, 336, 1606, 337, 1607, 338, 1607, 339, 1608, 340, 1609, 341, 1610, 341, 1611, 342, 1611, 343, 1612, 344, 1613, 345, 1614, 345, 1615, 346, 1615, 347, 1616, 348, 1617, 348, 1617, 349, 1618, 350, 1619, 351, 1620, 351, 1620, 352, 1621, 353, 1622, 354, 1622, 354, 1623, 355, 1624, 356, 1624, 357, 1625, 357, 1625, 358, 1626, 359, 1627, 360, 1627, 360, 1628, 361, 1628, 362, 1629, 363, 1630, 363, 1630, 364, 1631, 365, 1631, 365, 1632, 366, 1632, 367, 1633, 368, 1633, 368, 1634, 369, 1634, 370, 1635, 371, 1635, 371, 1636, 372, 1636, 373, 1637, 374, 1637, 374, 1638, 375, 1638, 376, 1639, 377, 1639, 377, 1640, 378, 1640, 379, 1641, 380, 1641, 381, 1642, 381, 1642, 382, 1642, 383, 1643, 384, 1643, 384, 1644, 385, 1644, 386, 1644, 387, 1645, 388, 1645, 389, 1646, 389, 1646, 390, 1647, 391, 1647, 392, 1647, 393, 1648, 394, 1648, 395, 1649, 395, 1649, 396, 1649, 397, 1650, 398, 1650, 399, 1650, 400, 1651, 401, 1651, 402, 1652, 403, 1652, 404, 1652, 405, 1653, 406, 1653, 407, 1653, 408, 1654, 409, 1654, 410, 1655, 411, 1655, 412, 1655, 413, 1656, 414, 1656, 415, 1656, 416, 1657, 417, 1657, 418, 1658, 419, 1658, 420, 1658, 421, 1659, 422, 1659, 424, 1659, 425, 1660, 426, 1660, 427, 1661, 428, 1661, 430, 1661, 431, 1662, 432, 1662, 433, 1662, 434, 1663, 436, 1663, 437, 1664, 438, 1664, 440, 1664, 441, 1665, 442, 1665, 444, 1666, 445, 1666, 446, 1666, 448, 1667, 449, 1667, 451, 1668, 452, 1668, 454, 1669, 455, 1669, 457, 1669, 458, 1670, 460, 1670, 461, 1671, 463, 1671, 464, 1672, 466, 1672, 468, 1673, 469, 1673, 471, 1674, 473, 1674, 474, 1675, 476, 1675, 478], Source={ID=2, Name=Fallow}, Destination={ID=5, Name=ShortWheat}, ID=11, Name=Arc 4}
          {SourceID=2, DestinationID=6, Conditions=[[Manager].MScript.CanSowLongWheat, [Manager].MScript.AreaPlantedOk("LongWheat")], Actions=[[Manager].MScript.SowCrop("LongWheat");], BezierPoints=[1557, 293, 1559, 292, 1561, 292, 1563, 292, 1565, 292, 1567, 292, 1569, 292, 1572, 292, 1574, 292, 1576, 292, 1578, 292, 1580, 292, 1582, 292, 1584, 292, 1586, 292, 1588, 292, 1590, 292, 1592, 292, 1594, 292, 1596, 292, 1598, 292, 1599, 292, 1601, 291, 1603, 291, 1605, 291, 1607, 291, 1609, 291, 1611, 291, 1612, 291, 1614, 291, 1616, 291, 1618, 291, 1620, 291, 1621, 291, 1623, 291, 1625, 291, 1626, 291, 1628, 291, 1630, 291, 1631, 291, 1633, 291, 1635, 291, 1636, 291, 1638, 291, 1640, 291, 1641, 291, 1643, 291, 1644, 291, 1646, 291, 1648, 291, 1649, 291, 1651, 291, 1652, 291, 1654, 291, 1655, 291, 1657, 291, 1658, 291, 1660, 291, 1661, 291, 1662, 291, 1664, 291, 1665, 291, 1667, 291, 1668, 291, 1669, 291, 1671, 291, 1672, 291, 1674, 291, 1675, 291, 1676, 291, 1678, 291, 1679, 291, 1680, 291, 1681, 291, 1683, 291, 1684, 291, 1685, 291, 1687, 291, 1688, 291, 1689, 291, 1690, 291, 1691, 291, 1693, 291, 1694, 291, 1695, 291, 1696, 291, 1697, 291, 1699, 291, 1700, 291, 1701, 291, 1702, 291, 1703, 291, 1704, 291, 1705, 291, 1706, 291, 1708, 291, 1709, 292, 1710, 292, 1711, 292, 1712, 292, 1713, 292, 1714, 292, 1715, 292, 1716, 292, 1717, 292, 1718, 292, 1719, 292, 1720, 292, 1721, 292, 1722, 292, 1723, 293, 1724, 293, 1725, 293, 1726, 293, 1727, 293, 1728, 293, 1729, 293, 1730, 293, 1730, 293, 1731, 293, 1732, 293, 1733, 294, 1734, 294, 1735, 294, 1736, 294, 1737, 294, 1738, 294, 1738, 294, 1739, 294, 1740, 294, 1741, 295, 1742, 295, 1743, 295, 1743, 295, 1744, 295, 1745, 295, 1746, 295, 1747, 296, 1747, 296, 1748, 296, 1749, 296, 1750, 296, 1751, 296, 1751, 297, 1752, 297, 1753, 297, 1754, 297, 1754, 297, 1755, 297, 1756, 298, 1757, 298, 1757, 298, 1758, 298, 1759, 298, 1759, 298, 1760, 299, 1761, 299, 1762, 299, 1762, 299, 1763, 299, 1764, 300, 1764, 300, 1765, 300, 1766, 300, 1766, 301, 1767, 301, 1768, 301, 1768, 301, 1769, 301, 1770, 302, 1770, 302, 1771, 302, 1772, 302, 1772, 303, 1773, 303, 1774, 303, 1774, 303, 1775, 304, 1776, 304, 1776, 304, 1777, 304, 1778, 305, 1778, 305, 1779, 305, 1779, 306, 1780, 306, 1781, 306, 1781, 306, 1782, 307, 1783, 307, 1783, 307, 1784, 308, 1784, 308, 1785, 308, 1786, 309, 1786, 309, 1787, 309, 1787, 309, 1788, 310, 1789, 310, 1789, 310, 1790, 311, 1790, 311, 1791, 311, 1792, 312, 1792, 312, 1793, 313, 1793, 313, 1794, 313, 1795, 314, 1795, 314, 1796, 314, 1796, 315, 1797, 315, 1798, 316, 1798, 316, 1799, 316, 1799, 317, 1800, 317, 1800, 318, 1801, 318, 1802, 318, 1802, 319, 1803, 319, 1803, 320, 1804, 320, 1805, 320, 1805, 321, 1806, 321, 1806, 322, 1807, 322, 1808, 323, 1808, 323, 1809, 324, 1809, 324, 1810, 325, 1811, 325, 1811, 325, 1812, 326, 1813, 326, 1813, 327, 1814, 327, 1814, 328, 1815, 328, 1816, 329, 1816, 329, 1817, 330, 1818, 330, 1818, 331, 1819, 332, 1819, 332, 1820, 333, 1821, 333, 1821, 334, 1822, 334, 1823, 335, 1823, 335, 1824, 336, 1825, 336, 1825, 337, 1826, 338, 1827, 338, 1827, 339, 1828, 339, 1829, 340, 1829, 341, 1830, 341, 1831, 342, 1831, 342, 1832, 343, 1833, 344, 1834, 344, 1834, 345, 1835, 346, 1836, 346, 1836, 347, 1837, 347, 1838, 348, 1839, 349, 1839, 349, 1840, 350, 1841, 351, 1842, 351, 1842, 352, 1843, 353, 1844, 354, 1845, 354, 1846, 355, 1846, 356, 1847, 356, 1848, 357, 1849, 358], Source={ID=2, Name=Fallow}, Destination={ID=6, Name=LongWheat}, ID=12, Name=Arc 5}
          {SourceID=2, DestinationID=3, Conditions=[[Manager].MScript.CanSowShortEarlyWheat, [Manager].MScript.AreaPlantedOk("ShortEarlyWheat")], Actions=[[Manager].MScript.SowCrop("ShortEarlyWheat");], BezierPoints=[1557, 293, 1555, 294, 1553, 295, 1551, 296, 1550, 297, 1548, 298, 1547, 299, 1545, 300, 1543, 302, 1542, 303, 1540, 304, 1539, 305, 1537, 306, 1536, 307, 1534, 308, 1533, 309, 1531, 310, 1530, 311, 1528, 312, 1527, 313, 1525, 314, 1524, 315, 1522, 316, 1521, 317, 1520, 318, 1518, 319, 1517, 320, 1516, 321, 1514, 321, 1513, 322, 1512, 323, 1510, 324, 1509, 325, 1508, 326, 1506, 327, 1505, 328, 1504, 329, 1503, 329, 1501, 330, 1500, 331, 1499, 332, 1498, 333, 1497, 334, 1495, 334, 1494, 335, 1493, 336, 1492, 337, 1491, 338, 1490, 338, 1488, 339, 1487, 340, 1486, 341, 1485, 341, 1484, 342, 1483, 343, 1482, 343, 1481, 344, 1480, 345, 1479, 346, 1478, 346, 1477, 347, 1476, 348, 1475, 348, 1474, 349, 1473, 350, 1472, 350, 1471, 351, 1470, 352, 1469, 352, 1468, 353, 1467, 354, 1466, 354, 1465, 355, 1464, 356, 1463, 356, 1462, 357, 1461, 357, 1460, 358, 1459, 359, 1458, 359, 1457, 360, 1457, 360, 1456, 361, 1455, 362, 1454, 362, 1453, 363, 1452, 363, 1451, 364, 1450, 364, 1450, 365, 1449, 365, 1448, 366, 1447, 367, 1446, 367, 1445, 368, 1445, 368, 1444, 369, 1443, 369, 1442, 370, 1441, 370, 1441, 371, 1440, 371, 1439, 372, 1438, 372, 1437, 373, 1437, 373, 1436, 374, 1435, 374, 1434, 375, 1433, 375, 1433, 376, 1432, 376, 1431, 377, 1430, 377, 1430, 378, 1429, 378, 1428, 378, 1427, 379, 1427, 379, 1426, 380, 1425, 380, 1424, 381, 1424, 381, 1423, 382, 1422, 382, 1421, 383, 1421, 383, 1420, 383, 1419, 384, 1418, 384, 1418, 385, 1417, 385, 1416, 386, 1415, 386, 1415, 387, 1414, 387, 1413, 387, 1412, 388, 1412, 388, 1411, 389, 1410, 389, 1410, 390, 1409, 390, 1408, 390, 1407, 391, 1407, 391, 1406, 392, 1405, 392, 1404, 393, 1404, 393, 1403, 393, 1402, 394, 1401, 394, 1400, 395, 1400, 395, 1399, 396, 1398, 396, 1397, 396, 1397, 397, 1396, 397, 1395, 398, 1394, 398, 1394, 399, 1393, 399, 1392, 399, 1391, 400, 1390, 400, 1390, 401, 1389, 401, 1388, 402, 1387, 402, 1386, 402, 1386, 403, 1385, 403, 1384, 404, 1383, 404, 1382, 405, 1381, 405, 1381, 406, 1380, 406, 1379, 406, 1378, 407, 1377, 407, 1376, 408, 1375, 408, 1374, 409, 1374, 409, 1373, 410, 1372, 410, 1371, 411, 1370, 411, 1369, 412, 1368, 412, 1367, 413, 1366, 413, 1365, 414, 1364, 414, 1363, 414, 1362, 415, 1361, 415, 1361, 416, 1360, 417, 1359, 417, 1358, 418, 1357, 418, 1356, 419, 1355, 419, 1353, 420, 1352, 420, 1351, 421, 1350, 421, 1349, 422, 1348, 422, 1347, 423, 1346, 423, 1345, 424, 1344, 425, 1343, 425, 1342, 426, 1341, 426, 1339, 427, 1338, 427, 1337, 428, 1336, 429, 1335, 429, 1334, 430, 1332, 430, 1331, 431, 1330, 432, 1329, 432, 1327, 433, 1326, 434, 1325, 434, 1324, 435, 1322, 436, 1321, 436, 1320, 437], Source={ID=2, Name=Fallow}, Destination={ID=3, Name=ShortEarlyWheat}, ID=13, Name=Arc 2}
          {SourceID=7, DestinationID=2, Conditions=[[Manager].MScript.CanHarvestLongSorghum], Actions=[[Manager].MScript.HarvestCrop("LongSorghum");], BezierPoints=[1335, 211, 1336, 211, 1337, 211, 1338, 211, 1339, 211, 1340, 212, 1341, 212, 1342, 212, 1343, 212, 1344, 212, 1345, 213, 1346, 213, 1347, 213, 1348, 213, 1349, 214, 1350, 214, 1351, 214, 1352, 214, 1353, 214, 1354, 215, 1354, 215, 1355, 215, 1356, 215, 1357, 215, 1358, 216, 1359, 216, 1360, 216, 1361, 216, 1362, 216, 1362, 216, 1363, 217, 1364, 217, 1365, 217, 1366, 217, 1367, 217, 1367, 218, 1368, 218, 1369, 218, 1370, 218, 1371, 218, 1371, 219, 1372, 219, 1373, 219, 1374, 219, 1375, 219, 1375, 219, 1376, 220, 1377, 220, 1378, 220, 1378, 220, 1379, 220, 1380, 221, 1381, 221, 1381, 221, 1382, 221, 1383, 221, 1384, 221, 1384, 222, 1385, 222, 1386, 222, 1386, 222, 1387, 222, 1388, 223, 1389, 223, 1389, 223, 1390, 223, 1391, 223, 1391, 224, 1392, 224, 1393, 224, 1393, 224, 1394, 224, 1395, 225, 1396, 225, 1396, 225, 1397, 225, 1398, 225, 1398, 226, 1399, 226, 1400, 226, 1400, 226, 1401, 226, 1402, 227, 1403, 227, 1403, 227, 1404, 227, 1405, 227, 1405, 228, 1406, 228, 1407, 228, 1407, 228, 1408, 229, 1409, 229, 1410, 229, 1410, 229, 1411, 230, 1412, 230, 1412, 230, 1413, 230, 1414, 230, 1415, 231, 1415, 231, 1416, 231, 1417, 231, 1417, 232, 1418, 232, 1419, 232, 1420, 233, 1420, 233, 1421, 233, 1422, 233, 1423, 234, 1423, 234, 1424, 234, 1425, 234, 1426, 235, 1426, 235, 1427, 235, 1428, 236, 1429, 236, 1430, 236, 1430, 237, 1431, 237, 1432, 237, 1433, 238, 1434, 238, 1434, 238, 1435, 239, 1436, 239, 1437, 239, 1438, 240, 1439, 240, 1440, 240, 1440, 241, 1441, 241, 1442, 241, 1443, 242, 1444, 242, 1445, 242, 1446, 243, 1447, 243, 1448, 244, 1449, 244, 1449, 244, 1450, 245, 1451, 245, 1452, 246, 1453, 246, 1454, 246, 1455, 247, 1456, 247, 1457, 248, 1458, 248, 1459, 249, 1460, 249, 1461, 249, 1462, 250, 1463, 250, 1465, 251, 1466, 251, 1467, 252, 1468, 252, 1469, 253, 1470, 253, 1471, 254, 1472, 254, 1473, 255, 1475, 255, 1476, 256, 1477, 256, 1478, 257, 1479, 257, 1481, 258, 1482, 259, 1483, 259, 1484, 260, 1486, 260, 1487, 261, 1488, 261, 1489, 262, 1491, 263, 1492, 263, 1493, 264, 1495, 264, 1496, 265, 1497, 266, 1499, 266, 1500, 267, 1502, 267, 1503, 268, 1505, 269, 1506, 269, 1507, 270, 1509, 271, 1510, 271, 1512, 272, 1513, 273, 1515, 274, 1517, 274, 1518, 275, 1520, 276, 1521, 276, 1523, 277, 1525, 278, 1526, 279, 1528, 279, 1529, 280, 1531, 281, 1533, 282, 1535, 282, 1536, 283, 1538, 284, 1540, 285, 1542, 286, 1543, 287, 1545, 287, 1547, 288, 1549, 289, 1551, 290, 1553, 291, 1555, 292], Source={ID=7, Name=LongSorghum}, Destination={ID=2, Name=Fallow}, ID=14, Name=Arc 7}
          {SourceID=2, DestinationID=7, Conditions=[[Manager].Script.CanSowLongSorghum, [Manager].MScript.AreaPlantedOk("LongSorghum")], Actions=[[Manager].Script.SowCrop("LongSorghum");], BezierPoints=[1557, 293, 1555, 293, 1553, 293, 1552, 293, 1550, 294, 1549, 294, 1547, 294, 1546, 294, 1544, 295, 1543, 295, 1541, 295, 1540, 295, 1538, 296, 1537, 296, 1535, 296, 1534, 296, 1532, 296, 1531, 297, 1530, 297, 1528, 297, 1527, 297, 1526, 298, 1524, 298, 1523, 298, 1522, 298, 1520, 298, 1519, 299, 1518, 299, 1517, 299, 1515, 299, 1514, 299, 1513, 300, 1512, 300, 1510, 300, 1509, 300, 1508, 300, 1507, 300, 1506, 300, 1505, 301, 1503, 301, 1502, 301, 1501, 301, 1500, 301, 1499, 301, 1498, 301, 1497, 302, 1496, 302, 1495, 302, 1494, 302, 1492, 302, 1491, 302, 1490, 302, 1489, 302, 1488, 302, 1487, 302, 1486, 302, 1485, 303, 1484, 303, 1483, 303, 1482, 303, 1481, 303, 1480, 303, 1480, 303, 1479, 303, 1478, 303, 1477, 303, 1476, 303, 1475, 303, 1474, 303, 1473, 303, 1472, 303, 1471, 303, 1470, 303, 1470, 303, 1469, 303, 1468, 303, 1467, 303, 1466, 303, 1465, 303, 1464, 303, 1464, 302, 1463, 302, 1462, 302, 1461, 302, 1460, 302, 1459, 302, 1459, 302, 1458, 302, 1457, 302, 1456, 302, 1455, 301, 1455, 301, 1454, 301, 1453, 301, 1452, 301, 1451, 301, 1451, 301, 1450, 300, 1449, 300, 1448, 300, 1447, 300, 1447, 300, 1446, 299, 1445, 299, 1444, 299, 1444, 299, 1443, 298, 1442, 298, 1441, 298, 1441, 298, 1440, 297, 1439, 297, 1438, 297, 1438, 297, 1437, 296, 1436, 296, 1435, 296, 1435, 295, 1434, 295, 1433, 295, 1432, 294, 1432, 294, 1431, 294, 1430, 293, 1429, 293, 1429, 292, 1428, 292, 1427, 292, 1426, 291, 1426, 291, 1425, 290, 1424, 290, 1423, 289, 1423, 289, 1422, 289, 1421, 288, 1420, 288, 1419, 287, 1419, 287, 1418, 286, 1417, 286, 1416, 285, 1416, 285, 1415, 284, 1414, 283, 1413, 283, 1412, 282, 1412, 282, 1411, 281, 1410, 281, 1409, 280, 1408, 279, 1408, 279, 1407, 278, 1406, 277, 1405, 277, 1404, 276, 1403, 275, 1403, 275, 1402, 274, 1401, 273, 1400, 273, 1399, 272, 1398, 271, 1397, 270, 1397, 270, 1396, 269, 1395, 268, 1394, 267, 1393, 267, 1392, 266, 1391, 265, 1390, 264, 1389, 263, 1388, 263, 1387, 262, 1386, 261, 1386, 260, 1385, 259, 1384, 258, 1383, 257, 1382, 256, 1381, 255, 1380, 254, 1379, 254, 1378, 253, 1377, 252, 1376, 251, 1374, 250, 1373, 249, 1372, 248, 1371, 247, 1370, 246, 1369, 245, 1368, 243, 1367, 242, 1366, 241, 1365, 240, 1364, 239, 1362, 238, 1361, 237, 1360, 236, 1359, 235, 1358, 233, 1357, 232, 1355, 231, 1354, 230, 1353, 229, 1352, 227, 1350, 226, 1349, 225, 1348, 224, 1347, 222, 1345, 221, 1344, 220, 1343, 219, 1341, 217, 1340, 216, 1339, 215, 1337, 213, 1336, 212], Source={ID=2, Name=Fallow}, Destination={ID=7, Name=LongSorghum}, ID=15, Name=Arc 8}
          {SourceID=2, DestinationID=8, Conditions=[[Manager].MScript.CanSowShortSorghum, [Manager].MScript.AreaPlantedOk("ShortSorghum")], Actions=[[Manager].MScript.SowCrop("ShortSorghum");], BezierPoints=[1557, 293, 1559, 291, 1562, 289, 1565, 287, 1568, 285, 1571, 284, 1574, 282, 1577, 280, 1579, 279, 1582, 277, 1585, 276, 1587, 274, 1590, 273, 1592, 271, 1595, 270, 1597, 268, 1599, 267, 1602, 265, 1604, 264, 1606, 262, 1609, 261, 1611, 260, 1613, 258, 1615, 257, 1617, 256, 1619, 255, 1621, 253, 1623, 252, 1625, 251, 1627, 250, 1629, 249, 1631, 248, 1632, 246, 1634, 245, 1636, 244, 1638, 243, 1639, 242, 1641, 241, 1642, 240, 1644, 239, 1646, 238, 1647, 237, 1648, 236, 1650, 235, 1651, 234, 1653, 233, 1654, 232, 1655, 232, 1657, 231, 1658, 230, 1659, 229, 1660, 228, 1662, 227, 1663, 227, 1664, 226, 1665, 225, 1666, 224, 1667, 223, 1668, 223, 1669, 222, 1670, 221, 1671, 220, 1672, 220, 1673, 219, 1674, 218, 1674, 218, 1675, 217, 1676, 216, 1677, 216, 1678, 215, 1678, 214, 1679, 214, 1680, 213, 1680, 213, 1681, 212, 1682, 211, 1682, 211, 1683, 210, 1683, 209, 1684, 209, 1685, 208, 1685, 208, 1686, 207, 1686, 207, 1687, 206, 1687, 205, 1687, 205, 1688, 204, 1688, 204, 1689, 203, 1689, 203, 1689, 202, 1690, 202, 1690, 201, 1690, 200, 1691, 200, 1691, 199, 1691, 199, 1691, 198, 1692, 198, 1692, 197, 1692, 197, 1692, 196, 1692, 195, 1693, 195, 1693, 194, 1693, 194, 1693, 193, 1693, 193, 1693, 192, 1693, 192, 1694, 191, 1694, 190, 1694, 190, 1694, 189, 1694, 189, 1694, 188, 1694, 187, 1694, 187, 1694, 186, 1694, 185, 1694, 185, 1694, 184, 1694, 184, 1694, 183, 1694, 182, 1694, 182, 1694, 181, 1694, 180, 1694, 179, 1694, 179, 1694, 178, 1694, 177, 1694, 177, 1694, 176, 1694, 175, 1694, 174], Source={ID=2, Name=Fallow}, Destination={ID=8, Name=ShortSorghum}, ID=16, Name=Arc 9}
          {SourceID=8, DestinationID=2, Conditions=[[Manager].MScript.CanHarvestShortSorghum], Actions=[[Manager].MScript.HarvestCrop("ShortSorghum");], BezierPoints=[1695, 174, 1694, 175, 1694, 177, 1694, 179, 1694, 181, 1694, 182, 1694, 184, 1694, 186, 1694, 188, 1694, 189, 1694, 191, 1694, 192, 1694, 194, 1694, 196, 1694, 197, 1694, 199, 1694, 200, 1694, 201, 1694, 203, 1694, 204, 1694, 206, 1694, 207, 1694, 208, 1694, 210, 1694, 211, 1694, 212, 1694, 214, 1693, 215, 1693, 216, 1693, 217, 1693, 218, 1693, 220, 1693, 221, 1693, 222, 1692, 223, 1692, 224, 1692, 225, 1692, 226, 1692, 227, 1691, 228, 1691, 229, 1691, 230, 1691, 231, 1690, 232, 1690, 233, 1690, 234, 1689, 235, 1689, 236, 1689, 237, 1688, 238, 1688, 238, 1687, 239, 1687, 240, 1687, 241, 1686, 242, 1686, 242, 1685, 243, 1685, 244, 1684, 245, 1683, 246, 1683, 246, 1682, 247, 1682, 248, 1681, 248, 1680, 249, 1680, 250, 1679, 250, 1678, 251, 1678, 252, 1677, 252, 1676, 253, 1675, 254, 1674, 254, 1674, 255, 1673, 256, 1672, 256, 1671, 257, 1670, 257, 1669, 258, 1668, 259, 1667, 259, 1666, 260, 1665, 260, 1664, 261, 1663, 261, 1662, 262, 1660, 263, 1659, 263, 1658, 264, 1657, 264, 1655, 265, 1654, 265, 1653, 266, 1651, 266, 1650, 267, 1648, 267, 1647, 268, 1646, 268, 1644, 269, 1642, 270, 1641, 270, 1639, 271, 1638, 271, 1636, 272, 1634, 272, 1632, 273, 1631, 273, 1629, 274, 1627, 274, 1625, 275, 1623, 275, 1621, 276, 1619, 277, 1617, 277, 1615, 278, 1613, 278, 1611, 279, 1609, 279, 1606, 280, 1604, 281, 1602, 281, 1599, 282, 1597, 282, 1595, 283, 1592, 284, 1590, 284, 1587, 285, 1585, 286, 1582, 286, 1579, 287, 1577, 288, 1574, 288, 1571, 289, 1568, 290, 1565, 290, 1562, 291, 1559, 292], Source={ID=8, Name=ShortSorghum}, Destination={ID=2, Name=Fallow}, ID=17, Name=Arc 18}
          {SourceID=2, DestinationID=1, Conditions=[[Manager].MScript.CanSowChickpea, [Manager].MScript.AreaPlantedOk("Chickpea")], Actions=[[Manager].MScript.SowCrop("Chickpea");], BezierPoints=[1557, 293, 1557, 291, 1558, 289, 1559, 288, 1559, 286, 1560, 285, 1561, 283, 1561, 281, 1562, 280, 1563, 278, 1563, 277, 1564, 275, 1565, 274, 1565, 273, 1566, 271, 1567, 270, 1567, 268, 1568, 267, 1569, 266, 1569, 264, 1570, 263, 1570, 262, 1571, 260, 1571, 259, 1572, 258, 1573, 256, 1573, 255, 1574, 254, 1574, 253, 1575, 251, 1575, 250, 1576, 249, 1576, 248, 1577, 247, 1577, 245, 1578, 244, 1578, 243, 1579, 242, 1579, 241, 1579, 240, 1580, 239, 1580, 238, 1581, 237, 1581, 235, 1582, 234, 1582, 233, 1582, 232, 1583, 231, 1583, 230, 1584, 229, 1584, 228, 1584, 227, 1585, 226, 1585, 225, 1585, 224, 1586, 223, 1586, 222, 1586, 221, 1587, 221, 1587, 220, 1587, 219, 1587, 218, 1588, 217, 1588, 216, 1588, 215, 1588, 214, 1589, 213, 1589, 212, 1589, 212, 1589, 211, 1590, 210, 1590, 209, 1590, 208, 1590, 207, 1590, 206, 1591, 206, 1591, 205, 1591, 204, 1591, 203, 1591, 202, 1591, 202, 1591, 201, 1592, 200, 1592, 199, 1592, 198, 1592, 198, 1592, 197, 1592, 196, 1592, 195, 1592, 194, 1592, 194, 1592, 193, 1592, 192, 1593, 191, 1593, 191, 1593, 190, 1593, 189, 1593, 188, 1593, 188, 1593, 187, 1593, 186, 1593, 185, 1593, 185, 1593, 184, 1593, 183, 1592, 182, 1592, 182, 1592, 181, 1592, 180, 1592, 179, 1592, 179, 1592, 178, 1592, 177, 1592, 176, 1592, 176, 1592, 175, 1591, 174, 1591, 173, 1591, 173, 1591, 172, 1591, 171, 1591, 170, 1591, 170, 1590, 169, 1590, 168, 1590, 167, 1590, 166, 1590, 166, 1589, 165, 1589, 164, 1589, 163, 1589, 163, 1588, 162, 1588, 161, 1588, 160, 1588, 159, 1587, 159, 1587, 158, 1587, 157, 1587, 156, 1586, 155, 1586, 154, 1586, 154, 1585, 153, 1585, 152, 1585, 151, 1584, 150, 1584, 149, 1584, 148, 1583, 147, 1583, 147, 1582, 146, 1582, 145, 1582, 144, 1581, 143, 1581, 142, 1580, 141, 1580, 140, 1580, 139, 1579, 138, 1579, 137, 1578, 136, 1578, 135, 1577, 134, 1577, 133, 1576, 132, 1576, 131, 1575, 130, 1575, 129, 1574, 128, 1574, 127, 1573, 126, 1573, 125, 1572, 124, 1572, 123, 1571, 122, 1570, 120, 1570, 119, 1569, 118, 1569, 117, 1568, 116, 1567, 115, 1567, 113, 1566, 112, 1566, 111, 1565, 110, 1564, 109, 1564, 107, 1563, 106, 1562, 105, 1562, 104, 1561, 102, 1560, 101, 1560, 100, 1559, 98, 1558, 97], Source={ID=2, Name=Fallow}, Destination={Description=c, ID=1, Name=Chickpea}, ID=18, Name=Arc 19}
          {SourceID=3, DestinationID=2, Conditions=[[Manager].MScript.CanHarvestShortEarlyWheat], Actions=[[Manager].MScript.HarvestCrop("ShortEarlyWheat");], BezierPoints=[1319, 438, 1319, 437, 1320, 436, 1321, 435, 1321, 434, 1322, 433, 1323, 432, 1323, 431, 1324, 431, 1325, 430, 1325, 429, 1326, 428, 1326, 427, 1327, 426, 1328, 426, 1328, 425, 1329, 424, 1330, 423, 1330, 422, 1331, 422, 1331, 421, 1332, 420, 1333, 419, 1333, 419, 1334, 418, 1334, 417, 1335, 417, 1336, 416, 1336, 415, 1337, 414, 1337, 414, 1338, 413, 1338, 412, 1339, 412, 1339, 411, 1340, 410, 1341, 410, 1341, 409, 1342, 408, 1342, 408, 1343, 407, 1343, 406, 1344, 406, 1344, 405, 1345, 404, 1346, 404, 1346, 403, 1347, 403, 1347, 402, 1348, 401, 1348, 401, 1349, 400, 1349, 399, 1350, 399, 1350, 398, 1351, 398, 1351, 397, 1352, 397, 1352, 396, 1353, 395, 1354, 395, 1354, 394, 1355, 394, 1355, 393, 1356, 393, 1356, 392, 1357, 392, 1357, 391, 1358, 390, 1358, 390, 1359, 389, 1360, 389, 1360, 388, 1361, 388, 1361, 387, 1362, 387, 1362, 386, 1363, 386, 1363, 385, 1364, 385, 1365, 384, 1365, 384, 1366, 383, 1366, 383, 1367, 382, 1367, 382, 1368, 381, 1369, 381, 1369, 380, 1370, 380, 1370, 379, 1371, 379, 1372, 378, 1372, 378, 1373, 377, 1373, 377, 1374, 377, 1375, 376, 1375, 376, 1376, 375, 1377, 375, 1377, 374, 1378, 374, 1379, 373, 1379, 373, 1380, 372, 1381, 372, 1381, 371, 1382, 371, 1383, 370, 1383, 370, 1384, 370, 1385, 369, 1385, 369, 1386, 368, 1387, 368, 1388, 367, 1388, 367, 1389, 366, 1390, 366, 1391, 365, 1391, 365, 1392, 365, 1393, 364, 1394, 364, 1395, 363, 1395, 363, 1396, 362, 1397, 362, 1398, 361, 1399, 361, 1399, 360, 1400, 360, 1401, 359, 1402, 359, 1403, 358, 1404, 358, 1405, 358, 1406, 357, 1407, 357, 1407, 356, 1408, 356, 1409, 355, 1410, 355, 1411, 354, 1412, 354, 1413, 353, 1414, 353, 1415, 352, 1416, 352, 1417, 351, 1418, 351, 1419, 350, 1420, 350, 1421, 349, 1422, 349, 1423, 348, 1425, 348, 1426, 347, 1427, 347, 1428, 346, 1429, 346, 1430, 345, 1431, 345, 1433, 344, 1434, 344, 1435, 343, 1436, 342, 1437, 342, 1439, 341, 1440, 341, 1441, 340, 1442, 340, 1444, 339, 1445, 339, 1446, 338, 1448, 337, 1449, 337, 1450, 336, 1452, 336, 1453, 335, 1454, 334, 1456, 334, 1457, 333, 1459, 333, 1460, 332, 1461, 331, 1463, 331, 1464, 330, 1466, 330, 1467, 329, 1469, 328, 1470, 328, 1472, 327, 1474, 326, 1475, 326, 1477, 325, 1478, 324, 1480, 324, 1482, 323, 1483, 322, 1485, 322, 1487, 321, 1488, 320, 1490, 319, 1492, 319, 1494, 318, 1495, 317, 1497, 317, 1499, 316, 1501, 315, 1503, 314, 1504, 314, 1506, 313, 1508, 312, 1510, 311, 1512, 311, 1514, 310, 1516, 309, 1518, 308, 1520, 307, 1522, 307, 1524, 306, 1526, 305, 1528, 304, 1530, 303, 1532, 302, 1534, 301, 1536, 301, 1539, 300, 1541, 299, 1543, 298, 1545, 297, 1547, 296, 1550, 295, 1552, 294, 1554, 293], Source={ID=3, Name=ShortEarlyWheat}, Destination={ID=2, Name=Fallow}, ID=19, Name=Arc 20}
          {SourceID=4, DestinationID=2, Conditions=[[Manager].MScript.CanHarvestShortEarlyWheat], Actions=[[Manager].MScript.HarvestCrop("LongEarlyWheat");], BezierPoints=[1489, 483, 1490, 481, 1491, 480, 1492, 479, 1493, 478, 1494, 476, 1495, 475, 1496, 474, 1497, 473, 1498, 472, 1499, 471, 1500, 469, 1501, 468, 1502, 467, 1503, 466, 1504, 465, 1505, 464, 1506, 463, 1507, 462, 1508, 461, 1509, 460, 1510, 459, 1511, 458, 1511, 457, 1512, 456, 1513, 455, 1514, 454, 1515, 453, 1516, 452, 1516, 451, 1517, 450, 1518, 449, 1519, 448, 1520, 447, 1520, 446, 1521, 446, 1522, 445, 1523, 444, 1523, 443, 1524, 442, 1525, 441, 1525, 440, 1526, 439, 1527, 439, 1527, 438, 1528, 437, 1529, 436, 1529, 435, 1530, 434, 1531, 434, 1531, 433, 1532, 432, 1532, 431, 1533, 430, 1534, 430, 1534, 429, 1535, 428, 1535, 427, 1536, 427, 1536, 426, 1537, 425, 1537, 424, 1538, 424, 1538, 423, 1539, 422, 1539, 421, 1540, 421, 1540, 420, 1541, 419, 1541, 418, 1542, 418, 1542, 417, 1542, 416, 1543, 415, 1543, 415, 1544, 414, 1544, 413, 1545, 412, 1545, 412, 1545, 411, 1546, 410, 1546, 410, 1546, 409, 1547, 408, 1547, 407, 1547, 407, 1548, 406, 1548, 405, 1548, 404, 1549, 404, 1549, 403, 1549, 402, 1550, 401, 1550, 401, 1550, 400, 1550, 399, 1551, 398, 1551, 398, 1551, 397, 1551, 396, 1552, 395, 1552, 395, 1552, 394, 1552, 393, 1553, 392, 1553, 391, 1553, 391, 1553, 390, 1553, 389, 1554, 388, 1554, 387, 1554, 387, 1554, 386, 1554, 385, 1554, 384, 1555, 383, 1555, 382, 1555, 382, 1555, 381, 1555, 380, 1555, 379, 1555, 378, 1556, 377, 1556, 376, 1556, 375, 1556, 374, 1556, 374, 1556, 373, 1556, 372, 1556, 371, 1556, 370, 1556, 369, 1557, 368, 1557, 367, 1557, 366, 1557, 365, 1557, 364, 1557, 363, 1557, 362, 1557, 361, 1557, 360, 1557, 359, 1557, 358, 1557, 357, 1557, 355, 1557, 354, 1557, 353, 1557, 352, 1557, 351, 1557, 350, 1557, 349, 1557, 348, 1557, 346, 1557, 345, 1557, 344, 1557, 343, 1557, 342, 1557, 340, 1557, 339, 1557, 338, 1557, 336, 1557, 335, 1557, 334, 1557, 333, 1557, 331, 1557, 330, 1557, 328, 1557, 327, 1557, 326, 1557, 324, 1557, 323, 1557, 321, 1557, 320, 1557, 318, 1557, 317, 1557, 315, 1557, 314, 1557, 312, 1557, 311, 1557, 309, 1557, 308, 1557, 306, 1557, 304, 1557, 303, 1557, 301, 1557, 299, 1557, 298, 1557, 296, 1557, 294], Source={ID=4, Name=LongEarlyWheat}, Destination={ID=2, Name=Fallow}, ID=20, Name=Arc 21}
          {SourceID=5, DestinationID=2, Conditions=[[Manager].MScript.CanHarvestShortWheat], Actions=[[Manager].MScript.HarvestCrop("ShortWheat");], BezierPoints=[1676, 480, 1675, 478, 1674, 477, 1673, 476, 1673, 475, 1672, 474, 1671, 472, 1671, 471, 1670, 470, 1669, 469, 1669, 468, 1668, 467, 1667, 466, 1667, 465, 1666, 464, 1665, 462, 1665, 461, 1664, 460, 1664, 459, 1663, 458, 1662, 457, 1662, 456, 1661, 455, 1661, 454, 1660, 453, 1660, 453, 1659, 452, 1658, 451, 1658, 450, 1657, 449, 1657, 448, 1656, 447, 1656, 446, 1655, 445, 1655, 444, 1654, 443, 1654, 443, 1653, 442, 1653, 441, 1652, 440, 1652, 439, 1651, 438, 1651, 437, 1650, 437, 1650, 436, 1649, 435, 1649, 434, 1648, 433, 1648, 433, 1647, 432, 1647, 431, 1646, 430, 1646, 429, 1645, 429, 1645, 428, 1644, 427, 1644, 426, 1643, 426, 1643, 425, 1642, 424, 1642, 423, 1642, 423, 1641, 422, 1641, 421, 1640, 420, 1640, 420, 1639, 419, 1639, 418, 1638, 417, 1638, 417, 1637, 416, 1637, 415, 1637, 415, 1636, 414, 1636, 413, 1635, 412, 1635, 412, 1634, 411, 1634, 410, 1633, 409, 1633, 409, 1632, 408, 1632, 407, 1632, 407, 1631, 406, 1631, 405, 1630, 404, 1630, 404, 1629, 403, 1629, 402, 1628, 401, 1628, 401, 1627, 400, 1627, 399, 1626, 398, 1626, 398, 1625, 397, 1625, 396, 1624, 395, 1624, 395, 1623, 394, 1623, 393, 1622, 392, 1622, 391, 1621, 391, 1621, 390, 1620, 389, 1620, 388, 1619, 387, 1619, 387, 1618, 386, 1618, 385, 1617, 384, 1617, 383, 1616, 382, 1616, 381, 1615, 381, 1614, 380, 1614, 379, 1613, 378, 1613, 377, 1612, 376, 1611, 375, 1611, 374, 1610, 373, 1610, 372, 1609, 372, 1608, 371, 1608, 370, 1607, 369, 1606, 368, 1606, 367, 1605, 366, 1604, 365, 1604, 364, 1603, 363, 1602, 362, 1602, 361, 1601, 359, 1600, 358, 1600, 357, 1599, 356, 1598, 355, 1597, 354, 1597, 353, 1596, 352, 1595, 351, 1594, 349, 1594, 348, 1593, 347, 1592, 346, 1591, 345, 1590, 343, 1590, 342, 1589, 341, 1588, 340, 1587, 338, 1586, 337, 1585, 336, 1584, 334, 1584, 333, 1583, 332, 1582, 330, 1581, 329, 1580, 328, 1579, 326, 1578, 325, 1577, 323, 1576, 322, 1575, 320, 1574, 319, 1573, 317, 1572, 316, 1571, 314, 1570, 313, 1569, 311, 1568, 309, 1567, 308, 1566, 306, 1565, 305, 1563, 303, 1562, 301, 1561, 300, 1560, 298, 1559, 296, 1558, 294], Source={ID=5, Name=ShortWheat}, Destination={ID=2, Name=Fallow}, ID=21, Name=Arc 22}
          {SourceID=6, DestinationID=2, Conditions=[[Manager].MScript.CanHarvestLongWheat], Actions=[[Manager].MScript.HarvestCrop("LongWheat");], BezierPoints=[1850, 359, 1849, 358, 1848, 358, 1847, 357, 1846, 357, 1846, 357, 1845, 356, 1844, 356, 1843, 355, 1842, 355, 1842, 355, 1841, 354, 1840, 354, 1839, 354, 1839, 353, 1838, 353, 1837, 352, 1836, 352, 1836, 352, 1835, 351, 1834, 351, 1834, 351, 1833, 350, 1832, 350, 1831, 350, 1831, 349, 1830, 349, 1829, 349, 1829, 348, 1828, 348, 1827, 348, 1827, 347, 1826, 347, 1825, 347, 1825, 346, 1824, 346, 1823, 346, 1823, 345, 1822, 345, 1821, 345, 1821, 344, 1820, 344, 1819, 344, 1819, 344, 1818, 343, 1818, 343, 1817, 343, 1816, 342, 1816, 342, 1815, 342, 1814, 342, 1814, 341, 1813, 341, 1813, 341, 1812, 340, 1811, 340, 1811, 340, 1810, 340, 1809, 339, 1809, 339, 1808, 339, 1808, 339, 1807, 338, 1806, 338, 1806, 338, 1805, 338, 1805, 337, 1804, 337, 1803, 337, 1803, 337, 1802, 336, 1802, 336, 1801, 336, 1800, 336, 1800, 335, 1799, 335, 1799, 335, 1798, 335, 1798, 334, 1797, 334, 1796, 334, 1796, 334, 1795, 333, 1795, 333, 1794, 333, 1793, 333, 1793, 333, 1792, 332, 1792, 332, 1791, 332, 1790, 332, 1790, 331, 1789, 331, 1789, 331, 1788, 331, 1787, 331, 1787, 330, 1786, 330, 1786, 330, 1785, 330, 1784, 330, 1784, 329, 1783, 329, 1783, 329, 1782, 329, 1781, 328, 1781, 328, 1780, 328, 1779, 328, 1779, 328, 1778, 328, 1778, 327, 1777, 327, 1776, 327, 1776, 327, 1775, 327, 1774, 326, 1774, 326, 1773, 326, 1772, 326, 1772, 326, 1771, 325, 1770, 325, 1770, 325, 1769, 325, 1768, 325, 1768, 324, 1767, 324, 1766, 324, 1766, 324, 1765, 324, 1764, 324, 1764, 323, 1763, 323, 1762, 323, 1762, 323, 1761, 323, 1760, 323, 1759, 322, 1759, 322, 1758, 322, 1757, 322, 1757, 322, 1756, 322, 1755, 321, 1754, 321, 1754, 321, 1753, 321, 1752, 321, 1751, 320, 1751, 320, 1750, 320, 1749, 320, 1748, 320, 1747, 320, 1747, 319, 1746, 319, 1745, 319, 1744, 319, 1743, 319, 1743, 319, 1742, 318, 1741, 318, 1740, 318, 1739, 318, 1738, 318, 1738, 318, 1737, 318, 1736, 317, 1735, 317, 1734, 317, 1733, 317, 1732, 317, 1731, 317, 1730, 316, 1730, 316, 1729, 316, 1728, 316, 1727, 316, 1726, 316, 1725, 315, 1724, 315, 1723, 315, 1722, 315, 1721, 315, 1720, 315, 1719, 314, 1718, 314, 1717, 314, 1716, 314, 1715, 314, 1714, 314, 1713, 313, 1712, 313, 1711, 313, 1710, 313, 1709, 313, 1708, 313, 1706, 312, 1705, 312, 1704, 312, 1703, 312, 1702, 312, 1701, 312, 1700, 311, 1699, 311, 1697, 311, 1696, 311, 1695, 311, 1694, 310, 1693, 310, 1691, 310, 1690, 310, 1689, 310, 1688, 310, 1687, 309, 1685, 309, 1684, 309, 1683, 309, 1681, 309, 1680, 309, 1679, 308, 1678, 308, 1676, 308, 1675, 308, 1674, 308, 1672, 307, 1671, 307, 1669, 307, 1668, 307, 1667, 307, 1665, 306, 1664, 306, 1662, 306, 1661, 306, 1660, 306, 1658, 306, 1657, 305, 1655, 305, 1654, 305, 1652, 305, 1651, 305, 1649, 304, 1648, 304, 1646, 304, 1644, 304, 1643, 304, 1641, 303, 1640, 303, 1638, 303, 1636, 303, 1635, 302, 1633, 302, 1631, 302, 1630, 302, 1628, 302, 1626, 301, 1625, 301, 1623, 301, 1621, 301, 1620, 300, 1618, 300, 1616, 300, 1614, 300, 1612, 300, 1611, 299, 1609, 299, 1607, 299, 1605, 299, 1603, 298, 1601, 298, 1599, 298, 1598, 298, 1596, 297, 1594, 297, 1592, 297, 1590, 297, 1588, 296, 1586, 296, 1584, 296, 1582, 296, 1580, 295, 1578, 295, 1576, 295, 1574, 295, 1572, 294, 1569, 294, 1567, 294, 1565, 294, 1563, 293, 1561, 293, 1559, 293], Source={ID=6, Name=LongWheat}, Destination={ID=2, Name=Fallow}, ID=22, Name=Arc 23}
          {SourceID=7, DestinationID=2, Conditions=[[Manager].Script.Biomass0LongSorghum], BezierPoints=[1335, 211, 1336, 211, 1338, 212, 1339, 213, 1341, 214, 1342, 215, 1344, 215, 1345, 216, 1347, 217, 1348, 218, 1350, 219, 1351, 219, 1353, 220, 1354, 221, 1356, 222, 1357, 222, 1359, 223, 1360, 224, 1361, 224, 1363, 225, 1364, 226, 1365, 227, 1367, 227, 1368, 228, 1369, 229, 1371, 229, 1372, 230, 1373, 231, 1374, 231, 1376, 232, 1377, 233, 1378, 233, 1379, 234, 1381, 234, 1382, 235, 1383, 236, 1384, 236, 1385, 237, 1386, 237, 1388, 238, 1389, 239, 1390, 239, 1391, 240, 1392, 240, 1393, 241, 1394, 241, 1395, 242, 1396, 242, 1397, 243, 1399, 243, 1400, 244, 1401, 245, 1402, 245, 1403, 246, 1404, 246, 1405, 247, 1406, 247, 1407, 248, 1408, 248, 1409, 248, 1410, 249, 1411, 249, 1411, 250, 1412, 250, 1413, 251, 1414, 251, 1415, 252, 1416, 252, 1417, 253, 1418, 253, 1419, 253, 1420, 254, 1421, 254, 1421, 255, 1422, 255, 1423, 255, 1424, 256, 1425, 256, 1426, 257, 1427, 257, 1427, 257, 1428, 258, 1429, 258, 1430, 258, 1431, 259, 1432, 259, 1432, 260, 1433, 260, 1434, 260, 1435, 261, 1436, 261, 1436, 261, 1437, 262, 1438, 262, 1439, 262, 1440, 263, 1440, 263, 1441, 263, 1442, 264, 1443, 264, 1444, 264, 1444, 264, 1445, 265, 1446, 265, 1447, 265, 1447, 266, 1448, 266, 1449, 266, 1450, 267, 1450, 267, 1451, 267, 1452, 267, 1453, 268, 1453, 268, 1454, 268, 1455, 268, 1456, 269, 1456, 269, 1457, 269, 1458, 270, 1459, 270, 1459, 270, 1460, 270, 1461, 271, 1462, 271, 1462, 271, 1463, 271, 1464, 272, 1465, 272, 1465, 272, 1466, 272, 1467, 272, 1468, 273, 1468, 273, 1469, 273, 1470, 273, 1471, 274, 1472, 274, 1472, 274, 1473, 274, 1474, 275, 1475, 275, 1475, 275, 1476, 275, 1477, 275, 1478, 276, 1479, 276, 1479, 276, 1480, 276, 1481, 276, 1482, 277, 1483, 277, 1483, 277, 1484, 277, 1485, 278, 1486, 278, 1487, 278, 1488, 278, 1488, 278, 1489, 279, 1490, 279, 1491, 279, 1492, 279, 1493, 279, 1494, 280, 1494, 280, 1495, 280, 1496, 280, 1497, 280, 1498, 281, 1499, 281, 1500, 281, 1501, 281, 1502, 281, 1503, 282, 1504, 282, 1505, 282, 1505, 282, 1506, 282, 1507, 283, 1508, 283, 1509, 283, 1510, 283, 1511, 284, 1512, 284, 1513, 284, 1514, 284, 1515, 284, 1517, 285, 1518, 285, 1519, 285, 1520, 285, 1521, 285, 1522, 286, 1523, 286, 1524, 286, 1525, 286, 1526, 287, 1527, 287, 1529, 287, 1530, 287, 1531, 288, 1532, 288, 1533, 288, 1534, 288, 1536, 288, 1537, 289, 1538, 289, 1539, 289, 1541, 289, 1542, 290, 1543, 290, 1544, 290, 1546, 290, 1547, 291, 1548, 291, 1550, 291, 1551, 291, 1552, 292, 1554, 292, 1555, 292], Source={ID=7, Name=LongSorghum}, Destination={ID=2, Name=Fallow}, ID=23, Name=Arc 6}
          {SourceID=8, DestinationID=2, Conditions=[[Manager].Script.Biomass0ShortSorghum], BezierPoints=[1695, 174, 1694, 176, 1694, 178, 1694, 180, 1694, 182, 1694, 184, 1694, 187, 1694, 189, 1694, 191, 1694, 193, 1694, 195, 1694, 197, 1694, 199, 1694, 200, 1694, 202, 1694, 204, 1694, 206, 1694, 208, 1694, 209, 1694, 211, 1694, 213, 1694, 214, 1694, 216, 1694, 218, 1694, 219, 1694, 221, 1694, 222, 1693, 224, 1693, 225, 1693, 227, 1693, 228, 1693, 230, 1693, 231, 1693, 232, 1692, 234, 1692, 235, 1692, 236, 1692, 237, 1692, 239, 1691, 240, 1691, 241, 1691, 242, 1691, 243, 1690, 244, 1690, 245, 1690, 247, 1689, 248, 1689, 249, 1689, 250, 1688, 251, 1688, 252, 1687, 253, 1687, 253, 1687, 254, 1686, 255, 1686, 256, 1685, 257, 1685, 258, 1684, 259, 1683, 260, 1683, 260, 1682, 261, 1682, 262, 1681, 263, 1680, 263, 1680, 264, 1679, 265, 1678, 265, 1678, 266, 1677, 267, 1676, 267, 1675, 268, 1674, 269, 1674, 269, 1673, 270, 1672, 270, 1671, 271, 1670, 271, 1669, 272, 1668, 272, 1667, 273, 1666, 273, 1665, 274, 1664, 274, 1663, 275, 1662, 275, 1660, 276, 1659, 276, 1658, 277, 1657, 277, 1655, 278, 1654, 278, 1653, 278, 1651, 279, 1650, 279, 1648, 280, 1647, 280, 1646, 280, 1644, 281, 1642, 281, 1641, 281, 1639, 282, 1638, 282, 1636, 282, 1634, 283, 1632, 283, 1631, 283, 1629, 284, 1627, 284, 1625, 284, 1623, 284, 1621, 285, 1619, 285, 1617, 285, 1615, 286, 1613, 286, 1611, 286, 1609, 287, 1606, 287, 1604, 287, 1602, 287, 1599, 288, 1597, 288, 1595, 288, 1592, 289, 1590, 289, 1587, 289, 1585, 289, 1582, 290, 1579, 290, 1577, 290, 1574, 291, 1571, 291, 1568, 291, 1565, 292, 1562, 292, 1559, 292], Source={ID=8, Name=ShortSorghum}, Destination={ID=2, Name=Fallow}, ID=24, Name=Arc 10}
        RotationRugplot: SimulationName=StandardSiteGeorgetown; CurrentPaddockString=[Manager].Script.currentPaddock
      Manager
```csharp
using System;
using System.Linq;
using System.Collections.Generic;
using Models.Core;
using Models.Interfaces;
using Models.Functions;
using Models.PMF;
using Models.Soils;
using Models.WaterModel;
using Models.Management;
using Models.Soils.Nutrients;
using Models.Management;
using Models.Utilities;
using Models.Climate;
using APSIM.Shared.Utilities;
using Models.Surface;
using System.Diagnostics;

namespace Models
{
    [Serializable]
    public class MScript : Model
    {
        [Link] private Clock Clock;
        [Link] private Summary Summary;
        [Link] private RotationManager RotationManager;
        [Link] SurfaceOrganicMatter SOM;

        // The paddocks - ie the names of zones.
        private List<string> myPaddockNames {get; set;}
        public string[] managedPaddocks {get {return myPaddockNames.ToArray();} set {}}
        
        // Default parameters for crops we manage.
        // The parameters for each alias are child components (FarmCropMgtInfo) of this manager 
        // Crop aliases: "Early Wheat" and "Late Wheat" both mean "Wheat", but different parameters. 
        private Dictionary<string, FarmCropMgtInfo> cropDefaults; 
       
        // Helpers for rotation arc rules. These will be called from the rotation manager 
        // component, which in turn is asked to do the daily management step by us. 
        public double CanSowShortSorghum {get { return(canSow("ShortSorghum")); } set {} }
        public double CanSowLongSorghum {get { return(canSow("LongSorghum")); } set {} }
        public double CanSowShortEarlyWheat {get { return(canSow("ShortEarlyWheat")); } set {} }
        public double CanSowLongEarlyWheat {get { return(canSow("LongEarlyWheat")); } set {} }
        public double CanSowShortWheat {get { return(canSow("ShortWheat")); } set {} }
        public double CanSowLongWheat {get { return(canSow("LongWheat")); } set {} }
        public double CanSowLateWheat {get { return(canSow("LateWheat")); } set {} }
        public double CanSowChickpea {get { return(canSow("Chickpea")); } set {} }
        
         
        public double CanHarvestShortSorghum {get { return(canHarvest("ShortSorghum")); } set {} }
        public double CanHarvestLongSorghum {get { return(canHarvest("LongSorghum")); } set {} }
        public double CanHarvestShortEarlyWheat {get { return(canHarvest("ShortEarlyWheat")); } set {} }
        public double CanHarvestLongEarlyWheat {get { return(canHarvest("LongEarlyWheat")); } set {} }
        public double CanHarvestShortWheat {get { return(canHarvest("ShortWheat")); } set {} }
        public double CanHarvestLongWheat {get { return(canHarvest("LongWheat")); } set {} }
        public double CanHarvestLateWheat {get { return(canHarvest("LateWheat")); } set {} }
        public double CanHarvestChickpea {get { return(canHarvest("Chickpea")); } set {} }
        public double Biomass0ShortSorghum {get { return(Biomass0("ShortSorghum")); } set {} }
        public double Biomass0LongSorghum {get { return(Biomass0("LongSorghum")); } set {} }
        
        
        // Amount of manure applied to all paddocks on each day
        public double manureApplied_kg {get; set;}
        
        // This is set during the management phase to the current paddock being managed.        
        public string _currentPaddock ;       
        public string currentPaddock {get => _currentPaddock; set => _currentPaddock = value; }
        
        // Keep these around as they're tedious to find 
        private Dictionary<string, Accumulator> accumulatedRain = new Dictionary<string, Accumulator>();
        private Dictionary<string, Zone> myPaddockZones = new Dictionary<string, Zone>();
        private Dictionary<string, WaterBalance> myWaterBalances = new Dictionary<string, WaterBalance>();
        private Dictionary<string, Physical> myPhysicals = new Dictionary<string, Physical>();
        // tillage management
        private readonly double tillageDepth = 300; // 耕作深度 
        private readonly double fractionToIncorporate = 1; // 掺入比例 
        // The current state of each paddock
        public Dictionary<string, string> currentStateAll {get; private set;}
        public string currentState {get { return currentStateAll[currentPaddock] ;} set {}}
        public string getCurrentStateOfPaddock(string paddock) {
           return currentStateAll[paddock];
        }

        private Dictionary<string, int> daysSinceLastHarvests;
        [NonSerialized] private Events myEvents;
           
        private bool afterInit = false;
        [EventSubscribe("StartOfSimulation")]
        private void OnStartOfSimulation(object sender, EventArgs e)
        {
            cropDefaults = new Dictionary<string, FarmCropMgtInfo>();
            foreach (var def in (this.Parent.Children).OfType<FarmCropMgtInfo>()) {
               cropDefaults[def.Name] = def;
               Summary.WriteMessage(this, $"Found crop defaults for '{def.Name}' aka '{def.RealName}'", MessageType.Diagnostic);
            }
            // A rain accumulator is kept for each crop
            foreach (var crop in cropDefaults.Keys) {
               accumulatedRain.Add(crop, new Accumulator(this, "[Weather].Rain", cropDefaults[crop].RainDays));
            }
            accumulatedRain.Add("weed", new Accumulator(this, "[Weather].Rain", 4));
            
            // Set up initial values
            myEvents = new Events(this);
            currentStateAll = new Dictionary<string, string>();
            daysSinceLastHarvests = new Dictionary<string, int>();
            myPaddockNames = new List<string>();
            
            // find a child component with initial state parameters 
            var initStateModel = (this.Parent.Children).OfType<FarmPaddocks>().FirstOrDefault();
            
            for (var i = 0; i < initStateModel.PaddockNames.Length; i++) {
               if (initStateModel.IsManaged[i]) 
               {
                  myPaddockNames.Add(initStateModel.PaddockNames[i]);
                  if (! RotationManager.Nodes.Exists(x => x.Name == initStateModel.InitialState[i]))
                     throw new Exception("Can't find a initial state/node called '" + initStateModel.InitialState[i] + "'");
                  currentStateAll.Add(initStateModel.PaddockNames[i], initStateModel.InitialState[i]);
                  daysSinceLastHarvests.Add(initStateModel.PaddockNames[i], initStateModel.DaysSinceHarvest[i]);
               }
            }
            
            // Hook up the water balance objects etc to our dictionaries 
            foreach (var paddock in myPaddockNames) {
                myPaddockZones[ paddock ] = FindInScope(paddock) as Zone; 
                if (myPaddockZones[ paddock ]  == null) { throw new Exception("Can't find a paddock called '" + paddock + "'");}
 
                myWaterBalances[ paddock ] = myPaddockZones[ paddock ].FindInScope("SoilWater") as WaterBalance;
                if (myWaterBalances[ paddock ] == null) { throw new Exception("Can't find a waterbalance in '" + paddock + "'");}

                myPhysicals[ paddock ] = myWaterBalances[ paddock ].FindSibling("Physical") as Physical;
               
                // trick the logger into recording initial state
                currentPaddock = paddock;
                RotationManager.CurrentState = currentStateAll[paddock];
                RotationManager.DoLogState(); 
                currentPaddock = "";
                RotationManager.CurrentState = "";
            }
            afterInit = true;
        }

        [EventSubscribe("EndOfSimulation")]
        private void DoEndOfSimulation(object sender, EventArgs e) 
        {
            // write out the final state
            foreach (var paddock in myPaddockNames) {
               currentPaddock = paddock;
               RotationManager.CurrentState = currentStateAll[paddock];
               RotationManager.DoLogState(); 
               currentPaddock = "";
               RotationManager.CurrentState = "";
            }
        }
        
        [EventSubscribe("StartOfDay")]
        private void DoStartOfDay(object sender, EventArgs e) 
        {
            manureApplied_kg = 0;
        }
        
        [EventSubscribe("EndOfDay")]
        private void DoEndOfDay(object sender, EventArgs e) 
        {
            foreach (var paddock in myPaddockNames) {
               var cropIn = false;
               var cropModules = cropDefaults.Values.Select(c => c.RealName).Distinct();
               foreach (var crop in cropModules) {
                  IPlant Crop = myPaddockZones[paddock].FindInScope(crop) as IPlant;
                  if (Crop.IsAlive)
                     cropIn = true;
               }
               if (!cropIn) 
                  daysSinceLastHarvests[paddock]++;
            }
        }

        [EventSubscribe("DoManagement")]
        private void DoManagement(object sender, EventArgs e)
        {
            foreach (var crop in accumulatedRain.Keys) {
               accumulatedRain[crop].Update();
            }
            
            bool moreToDo = true;
            while (moreToDo) {
               foreach (var paddock in myPaddockNames) {
                  currentPaddock = paddock;
                  RotationManager.CurrentState = currentStateAll[paddock];
                  //Summary.WriteMessage(this, $"Calling DoManagement for {currentPaddock}", MessageType.Diagnostic);
                  moreToDo = RotationManager.DoManagement();
                  currentStateAll[paddock] = RotationManager.CurrentState;
               }
            }
            currentPaddock = "";
        }

        // Rotation arc rules & actions. These depend on currentPaddock being set 
        private double canSow (string crop) {
        
            if (currentPaddock == "") { return 0; }
            //Summary.WriteMessage(this, $"Being asked for crop {crop} in {currentPaddock}", MessageType.Diagnostic);
            var Crop = findMyCrop(cropDefaults[crop].RealName);

            if ((DateUtilities.WithinDates(cropDefaults[crop].StartDate, Clock.Today, cropDefaults[crop].EndDate) &&
                 !Crop.IsAlive &&
                 MathUtilities.Sum(myWaterBalances[currentPaddock].ESW) > cropDefaults[crop].MinESW &&
                 accumulatedRain[crop].Sum > cropDefaults[crop].MinRain ) ||
                (!Crop.IsAlive && DateUtilities.DatesAreEqual(cropDefaults[crop].EndDate, Clock.Today) && 
                 cropDefaults[crop].MustSow)) 
                return 1; 
            return 0; 
        }
        //tillage
         
        private void PerformTillage(string paddockName)
     {
         var paddockZone = myPaddockZones[paddockName];
         var SOM = paddockZone.FindInScope<SurfaceOrganicMatter>();
         if (SOM != null)
         {
             SOM.Incorporate(fractionToIncorporate, tillageDepth);
             //Summary.WriteMessage(this, $"Performed tillage in paddock: {paddockName} with depth: {tillageDepth} and fraction: {fractionToIncorporate}", MessageType.Information);
         }
         else
         {
              Summary.WriteMessage(this, "Surface Organic Matter component not found in paddock: " + paddockName, MessageType.Warning);
         }
     }
        
        private double Biomass0 (string crop) {
        if (currentPaddock == "") { return 0; }
        var Crop = findMyCrop(cropDefaults[crop].RealName);
           if  (Crop.AboveGroundHarvestable.Wt== 0){
           return(1);}
           return(0);   
        }
               
        private double canHarvest (string crop) {
            if (currentPaddock == "") { return 0; }
            var Crop = findMyCrop(cropDefaults[crop].RealName);
            if (Crop.IsReadyForHarvesting || 
            (Crop.AboveGround.Wt < 200 && Crop.DaysAfterSowing > 100&& (Crop.Leaf.CanopyType=="Sorghum" ))||
            (Crop.DaysAfterSowing>90&& cropDefaults[crop].Name=="LongSorghum") ||
            (Crop.DaysAfterSowing>100&& cropDefaults[crop].Name=="ShortSorghum") ) {
               //Summary.WriteMessage(this, "Harvest condition met for {crop} in {currentPaddock}. ReadyForHarvesting", MessageType.Information);
               return(1);
            }
            //Summary.WriteMessage(this, $"NO!!!Harvest{crop}. BIOMASS is {Crop.AboveGroundHarvestable.Wt} . since sow:{Crop.DaysAfterSowing}. LAI IS {Crop.LAI}", MessageType.Information);
            return(0);   
        }
               
        public void SowCrop(string crop) 
        {   
            crop = crop.Replace("\"", ""); //NFI why the quotes are added in??
            var myPaddock = FindInScope(currentPaddock) as Zone; 
            if (myPaddock == null) { throw new Exception("Can't find a paddock called '" + currentPaddock + "'");}
            
            Plant Crop = myPaddock.FindInScope(cropDefaults[crop].RealName) as Plant;
            if (Crop == null) { throw new Exception("Can't find crop called '" + currentPaddock + "." + crop + "'");}

            Summary.WriteMessage(this, this.FullPath + " -  sowing " + Crop.FullPath, MessageType.Diagnostic);
            Crop.Sow(population: cropDefaults[crop].Population, cultivar: cropDefaults[crop].CultivarName, 
                     depth: cropDefaults[crop].SowingDepth, rowSpacing: cropDefaults[crop].RowSpacing);
            myEvents.Publish("DoPaddockExpenditure",  new object[] { this, 
                  new FarmEconomics.PaddockExpenditureArgs{
                      Description = $"{crop} Sowing",
                      Category = "In-crop", 
                      Paddock = currentPaddock,
                      Name = Crop.Name,
                      Rate = 1,
                      Area = myPaddockZones [ currentPaddock ].Area}});
            if (cropDefaults[crop].fertType == "Manure") {
               SurfaceOrganicMatter SOM = myPaddock.FindInScope("SurfaceOrganicMatter") as SurfaceOrganicMatter;
               SOM.FractionFaecesAdded = 1.0; // Manure Dry Weight proportion 0-1 (g/g)
               AddFaecesType Data = new AddFaecesType();
               Data.OMWeight = cropDefaults[crop].fertAmount;
               Data.OMN = Data.OMWeight * 0.05;  // N concentration of manure (g/g)
               SOM.AddFaeces(Data);
               SOM.Incorporate(1.0 /* fraction (0-1) */, 100 /* Depth (mm)*/);
               
               manureApplied_kg += cropDefaults[crop].fertAmount;
               
               // Incur a cost (machinery operation & purchase) of application
               myEvents.Publish("Operate",  new object[] { this, 
                  new FarmMachinery.FarmMachineryOperateArgs{
                      Tractor = "220kW FWA",
                      Implement = "Manure Spreader",
                      Category = "In-crop",
                      Paddock = currentPaddock}}); 

               myEvents.Publish("DoPaddockExpenditure",  new object[] { this, 
                  new FarmEconomics.PaddockExpenditureArgs{
                      Description = $"{crop} manure",
                      Category = "In-crop", 
                      Paddock = currentPaddock,
                      Name = cropDefaults[crop].fertType,
                      Rate = cropDefaults[crop].fertAmount,
                      Area = myPaddockZones [ currentPaddock ].Area}}); 

            } else {
               Fertiliser fert = myPaddock.FindInScope("Fertiliser") as Fertiliser;
               fert.Apply(cropDefaults[crop].fertAmount, fertByName(cropDefaults[crop].fertType)); 
               myEvents.Publish("DoPaddockExpenditure",  new object[] { this, 
                  new FarmEconomics.PaddockExpenditureArgs{
                      Description = $"{crop} fertiliser",
                      Category = "In-crop", 
                      Paddock = currentPaddock,
                      Name = cropDefaults[crop].fertType,
                      Rate = cropDefaults[crop].fertAmount,
                      Area = myPaddockZones [ currentPaddock ].Area}}); 
            }
            myEvents.Publish("Operate",  new object[] { this, 
                  new FarmMachinery.FarmMachineryOperateArgs{
                      Tractor = "220kW FWA",
                      Implement = "Planter",
                      Category = "In-crop",
                      Paddock = currentPaddock}}); 

            myEvents.Publish("KillWeeds",  new object [] {this, 
                  new EventArgs()}) ; 
                  
         }
        
        
        
        public void HarvestCrop(string crop)
        {
            crop = crop.Replace("\"", "");
            var myPaddock = FindInScope(currentPaddock) as Zone; 
            Plant Crop = myPaddock.FindInScope(cropDefaults[crop].RealName) as Plant;

            Summary.WriteMessage(this, this.FullPath + " -  harvesting " + Crop.FullPath, MessageType.Diagnostic);
            myEvents.Publish("DoPaddockIncome",  new object[] { this, 
                  new FarmEconomics.PaddockIncomeArgs{
                       Description = $"{crop} aka {Crop.Name} Harvest",
                       Category = "In-crop", 
                       Paddock = currentPaddock,
                       Name = Crop.Name,
                       //  wet yield @ 14% moisture 
                       Yield = 1.14 * GetValuebyName(myPaddock.Get("[" + Crop.Name + "].Grain.Total.Wt")) * 10 / 1000,  // g/m2 -> t/ha
                       Protein = GetValuebyName(myPaddock.Get("[" + Crop.Name + "].Grain.Protein")) ,
                       Area = myPaddockZones [ currentPaddock ].Area}});   
            Crop.Harvest();
            Crop.EndCrop();
            PerformTillage(currentPaddock);
            daysSinceLastHarvests[currentPaddock] = 0;
            myEvents.Publish("CropHarvested",  null); 
        }

        private Plant findMyCrop(string crop) {
            if (currentPaddock == "") { return null; }
            Plant Crop = null;
            try {
               var myPaddock = FindInScope(currentPaddock) as Zone;
               Crop = myPaddock.FindInScope(crop) as Plant;
            } catch (Exception e) {
               throw new AggregateException("Error in findMyCrop", e);
            }
            return (Crop);        
        }
        
        private double GetValuebyName(object value) 
        {
            if (value is null) return(0);
              
            if (value is IFunction function)
                value = function.Value();
                
            double result = (double) Convert.ChangeType(value, typeof(double));
            return(result);
        }
        
        public Fertiliser.Types fertByName (string s) {
            if (! Enum.GetNames(typeof(Fertiliser.Types)).Contains(s)) 
                throw new Exception("Can't find a fertiliser called " + s);
            var fertTypes = Enum.GetValues(typeof(Fertiliser.Types)).Cast<Fertiliser.Types>();
            var res = fertTypes.First(x => x.ToString() == s);
            return(res);
        }

        // More helpers for rotation arc rules. These rules also depend on currentPaddock being set 
        // earlier (ie we're calling the rotation graph, and in turn, it's asking us for something)

        // See if the potential area planted for this crop is less or equal to the total area allowed         
        public int AreaPlantedOk (string crop) {
           double areaCrop = 0;
           double areaTot = 0;
           foreach (var paddockZone in myPaddockZones.Values) {
               IPlant Crop = paddockZone.FindInScope(cropDefaults[crop].RealName) as IPlant;
               if (Crop == null) { throw new Exception($"Can't find crop {crop} in '{paddockZone.Name}'");}
               if (Crop.IsAlive) 
                  areaCrop += paddockZone.Area;
               areaTot += paddockZone.Area;
           }
           var thisPaddockArea = myPaddockZones [ currentPaddock ].Area;
           var areaFrac = (thisPaddockArea + areaCrop) / areaTot ; 
           int result = areaFrac <= cropDefaults[crop].maxArea ? 1 : 0;
           //Summary.WriteMessage(this, $"area rule for crop {crop} is {result}: this = {thisPaddockArea}, pot= {(areaCrop + thisPaddockArea)}, tot={areaTot}", MessageType.Diagnostic);
           return(result);        
        }
        
        // The number of days since the last crop was harvested
        public int daysSinceLastHarvest {
           get { 
             if (!afterInit) return 0;
             return(daysSinceLastHarvests[currentPaddock]);
           }
           set {}
        }
        
        public int daysSinceLastHarvest_gt_60 {get {return (daysSinceLastHarvest > 60 ? 1 : 0); } set {}}
        public int daysSinceLastHarvest_gt_180 {get {return (daysSinceLastHarvest > 180 ? 1 : 0); } set {}}
        

    }
}
```
        Memo APSFarm
          ### Whole farm management

          This simulation aims to manage paddocks from a single "top level" manager that applies a rotation to each, testing environmental (rainfall, water content), current (eg %age of farm planted) and historical (eg max 2 cereals in a row) states for what crop to sow next.

          The top level manager
        FarmCropMgtInfo ShortSorghum: RealName=Sorghum; MinRain=20; RainDays=5; StartDate=1-sep; EndDate=16-dec; MinESW=100; MustSow=true; Population=10; CultivarName=Buster; SowingDepth=30; RowSpacing=750; maxArea=0.2; fertType=Urea; fertAmount=208
        FarmCropMgtInfo LongSorghum: RealName=Sorghum; MinRain=20; RainDays=5; StartDate=1-dec; EndDate=16-dec; MinESW=100; MustSow=true; Population=10; CultivarName=Buster; SowingDepth=30; RowSpacing=750; maxArea=0.8; fertType=Urea; fertAmount=208
        FarmCropMgtInfo ShortEarlyWheat: RealName=Wheat; MinRain=0; RainDays=0; StartDate=26-apr; EndDate=7-may; MinESW=80; MustSow=true; Population=50; CultivarName=Hartog; SowingDepth=40; RowSpacing=280; maxArea=0.2; fertType=Urea; fertAmount=312
        FarmCropMgtInfo LongEarlyWheat: RealName=Wheat; MinRain=0; RainDays=0; StartDate=26-apr; EndDate=7-may; MinESW=80; MustSow=true; Population=50; CultivarName=Hartog; SowingDepth=40; RowSpacing=280; maxArea=0.2; fertType=Urea; fertAmount=312
        FarmCropMgtInfo ShortWheat: RealName=Wheat; MinRain=0; RainDays=5; StartDate=8-may; EndDate=1-jun; MinESW=80; MustSow=true; Population=50; CultivarName=Hartog; SowingDepth=40; RowSpacing=280; maxArea=0.8; fertType=Urea; fertAmount=312
        FarmCropMgtInfo LongWheat: RealName=Wheat; MinRain=0; RainDays=5; StartDate=8-may; EndDate=1-jun; MinESW=80; MustSow=true; Population=50; CultivarName=Hartog; SowingDepth=40; RowSpacing=280; maxArea=0.8; fertType=Urea; fertAmount=312
        FarmCropMgtInfo LateWheat: RealName=Wheat; MinRain=0; RainDays=5; StartDate=2-jun; EndDate=9-jun; MinESW=80; MustSow=true; Population=50; CultivarName=Hartog; SowingDepth=40; RowSpacing=280; maxArea=0.1; fertType=Urea; fertAmount=312
        FarmCropMgtInfo Chickpea: RealName=Chickpea; MinRain=0; RainDays=3; StartDate=14-may; EndDate=30-may; MinESW=80; MustSow=true; Population=30; CultivarName=Amethyst; SowingDepth=60; RowSpacing=400; maxArea=0.2; fertType=Urea; fertAmount=0
        FarmPaddocks Initial Values: DaysSinceHarvest=[0, 66, 66, 66, 66, 66, 66, 66, 66, 66, 66]
          PaddockNames=[, Field 1, Field 2, Field 3, Field 4, Field 5, Field 6, Field 7, Field 8, Field 9, Field 10]
          IsManaged=[false, true, true, true, true, true, true, true, true, true, true]
          InitialState=[, Fallow, Fallow, Fallow, Fallow, Fallow, Fallow, Fallow, Fallow, Fallow, Fallow]
      Manager Weeds
        rainAmount = 25
        ttSum = 250
        swFrac = 0.5
        controlChemical = Roundup
        controlRate = 1.6
        CO2_conv = 22.8
```csharp
using System;
using System.Linq;
using System.Collections.Generic;
using Models.Core;
using Models.Interfaces;
using Models.Functions;
using Models.PMF;
using Models.Soils;
using Models.WaterModel;
using Models.Soils.Nutrients;
using Models.Management;
using Models.Utilities;
using Models.Climate;
using APSIM.Shared.Utilities;

namespace Models
{
    public class WeedEventArgs: EventArgs
    {
       /// <summary> </summary>
       public string Paddock { get; set; }
    }        
    [Serializable]
    public class WeedScript : Model
    {
        ////////////////////////////////////////////////////////
        [Separator("Weeds - fallow cost of control")]
        [Description("Rainfall amount for germination (mm over 4 days)")]
        public double rainAmount{get; set;} 

        [Description("Thermal time to seed set (dd)")]
        public double ttSum{get; set;} 

        [Description("Surface soil water threshold for weed death (0-1)")]
        public double swFrac{get; set;} 
       
        [Description("Control chemical ()")]
        public string controlChemical{get; set;} 

        [Description("Control rate (l/ha)")]
        public double controlRate{get; set;} 

        [Description("CO2 conversion rate (* kg.chem => kg.co2_e)")]
        public double CO2_conv { get; set; } 

        [Units("kg")]
        public double CO2_e {get {return (ChemicalApplied * CO2_conv);} 
                             set {}}
        private double ChemicalApplied;       
        ////////////////////////////////////////////////////////
        // The paddocks - ie the names of zones.
        [NonSerialized] public List<string> myPaddockNames;
        
        [Link] Simulation Simulation;
        [Link] Weather Weather;
        [Link] private Clock Clock;
        [Link] private Summary Summary;
        [Link] private RotationManager RotationManager;
        [Link(ByName = true)] private Manager Manager;
        private MScript ManagerScript ;
        
        [NonSerialized] private Events myEvents;
        private Accumulator accumulatedRain;
        
        // Keep these around as they're tedious to find 
        private Dictionary<string, Zone> myPaddockZones = new Dictionary<string, Zone>();
        private Dictionary<string, WaterBalance> myWaterBalances = new Dictionary<string, WaterBalance>();
        private Dictionary<string, Physical> myPhysicals = new Dictionary<string, Physical>();
          
        private bool afterInit = false;
        [EventSubscribe("StartOfSimulation")]
        private void OnStartOfSimulation(object sender, EventArgs e)
        {
            ManagerScript = Manager.Script as MScript;
            accumulatedRain =  new Accumulator(this, "[Weather].Rain", 4);
            
            // Set up initial values
            myEvents = new Events(this);
            myPaddockNames = ManagerScript.managedPaddocks.ToList();
            
            // Hook up the water balance objects etc to our dictionaries 
            foreach (var paddock in myPaddockNames) {
                myPaddockZones[ paddock ] = FindInScope(paddock) as Zone; 
                if (myPaddockZones[ paddock ]  == null) { throw new Exception("Can't find a paddock called '" + paddock + "'");}
 
                myWaterBalances[ paddock ] = myPaddockZones[ paddock ].FindInScope("SoilWater") as WaterBalance;
                if (myWaterBalances[ paddock ] == null) { throw new Exception("Can't find a waterbalance in '" + paddock + "'");}

                myPhysicals[ paddock ] = myWaterBalances[ paddock ].FindSibling("Physical") as Physical;
                
                weedsGerminated.Add(paddock, false);
                weedsTT.Add(paddock, 0);
            }
            afterInit = true;
            ChemicalApplied = 0;
        }

        [EventSubscribe("StartOfDay")]
        private void DoStartOfDay(object sender, EventArgs e)
        {
            ChemicalApplied = 0;
        }
        [EventSubscribe("DoManagement")]
        private void DoManagement(object sender, EventArgs e)
        {
            accumulatedRain.Update();
            
            foreach (var paddock in myPaddockNames) {
               checkWeeds(paddock);
            }
        }
        
        // Weeds-------------------
        private Dictionary<string, bool> weedsGerminated = new Dictionary<string, bool>();
        private Dictionary<string, double> weedsTT = new Dictionary<string, double>();

        //[EventSubscribe("CropHarvested")] fixme


        [EventSubscribe("KillWeeds")]
        private void KillWeeds(object sender, EventArgs e) {
            var currentPaddock = ManagerScript.currentPaddock;
            weedsGerminated[currentPaddock] = false;
            weedsTT[currentPaddock] = 0;
        }

        private void checkWeeds (string paddock) {
            var currentState = ManagerScript.getCurrentStateOfPaddock(paddock);
            if (currentState.Contains("Fallow", StringComparison.CurrentCultureIgnoreCase ) /*&&
                daysSinceHarvest[paddock] > 30*/) {

                  if (! weedsGerminated[paddock] && accumulatedRain.Sum >= rainAmount) {
                     weedsGerminated[paddock] = true;
                     weedsTT[paddock] = 0;
                     Summary.WriteMessage(this, $"Weeds germinating in {paddock}", MessageType.Diagnostic);

                  } else if (weedsGerminated[paddock]) {
                     // Thermal time calc
                     weedsTT[paddock] += (Weather.MaxT + Weather.MinT) / 2;
         
                     // Surface SW calc
                     var ll = myPhysicals[paddock].LL15[0];
                     var dul = myPhysicals[paddock].DUL[0];
                     var sw = myWaterBalances[paddock].SW[0];
                     var swf = (sw-ll)/(dul-ll);
         
                     if (swf < swFrac) {
                         // kill off weeds
                         weedsGerminated[paddock] = false;
                         Summary.WriteMessage(this, $"Weeds die in {paddock}", MessageType.Diagnostic);
         
                     } else if (weedsTT[paddock] > ttSum) {
                         // Weeds are mature - spray them
                         
                         myEvents.Publish("DoPaddockExpenditure",  new object[] { this, 
                             new FarmEconomics.PaddockExpenditureArgs {
                                 Description = "Weed control - " + controlChemical,
                                 Category = "Fallow", 
                                 Paddock = paddock,
                                 Name = controlChemical,
                                 Rate = controlRate,
                                 Area = myPaddockZones [ paddock ].Area}});

                         ChemicalApplied += controlRate * myPaddockZones[paddock].Area;
 
                         myEvents.Publish("Operate",  new object[] { this, 
                             new FarmMachinery.FarmMachineryOperateArgs{
                                Tractor = "SprayRig",
                                Category = "Fallow", 
                                Implement = "Sprayer",
                                Paddock = paddock}}); 
                         Summary.WriteMessage(this, $"Weeds mature in {paddock} - sprayed out.", MessageType.Diagnostic);
                         weedsGerminated[paddock] = false;
                         weedsTT[paddock] = 0;
                     }  
                 }
              }   
       }
    }
}
```
      Manager PhaseAccumulations
```csharp
using System;
using System.Linq;
using System.Collections.Generic;

using Models.Core;
using Models.Interfaces;
using Models.Functions;
using Models.Climate;
using Models.Soils;
using Models.WaterModel;
using Models.Soils.Nutrients;
using Models.Management;
using Models.Utilities;

using Models.PMF;
using APSIM.Shared.Utilities;

// General accumulator for rotations. Reports on each transition in each paddock
namespace Models
{
    [Serializable]
    public class AccScript : Model
    {
        [Link] Simulation Simulation;
        [Link] IClock Clock;
        [Link] Weather Weather;
        [Link] ISummary Summary;

        [Link(ByName = true)] private Manager Manager;
        private MScript ManagerScript ;
        
        [Link(IsOptional = true)] private RotationManager RotationManager;
        [Link(IsOptional = true)] private Zone defaultZone;

        private Dictionary<string, Zone> myPaddockZones = null;
        private Dictionary<string, WaterBalance> myWaterBalances;
        private Dictionary<string, Nutrient> myNutrient;
        private Dictionary<string, Solute> myNO3;
        private Dictionary<string, Fertiliser> myFert;
        private Dictionary<string, Plant> myCrops; // eg ["paddockName,cropName"]
        
        // A state / accumulator for each thing in each paddock
        private Dictionary<string, double> me = new Dictionary<string, double>();
        private Dictionary<string, double[]> meArray = new Dictionary<string, double[]>();
        private Dictionary<string, int> meInt = new Dictionary<string, int>();
        
        private string currentPaddock {get { 
           return((ManagerScript is null) ? 
             defaultZone.Name : 
                ManagerScript.currentPaddock); } set {}} 

        [EventSubscribe("StartOfSimulation")]
        public void OnStart_Simulation(object sender, EventArgs e) { 
            myPaddockZones = new Dictionary<string, Zone>();
            myWaterBalances = new Dictionary<string, WaterBalance>();
            myNO3 = new Dictionary<string, Solute>();
            myFert = new Dictionary<string, Fertiliser>();
            myNutrient = new Dictionary<string, Nutrient>();
            myCrops = new Dictionary<string, Plant>();
            
            ManagerScript = Manager.Script as MScript;
            
            foreach (var z in Simulation.FindAllChildren<Zone>() ) {
               myPaddockZones.Add(z.Name, z);
               
               var w = (z as Zone).FindInScope("SoilWater") as WaterBalance;
               myWaterBalances.Add(z.Name, w);

               var no3 = (z as Zone).FindInScope("NO3") as Solute;
               myNO3.Add(z.Name, no3);

               var nut = (z as Zone).FindInScope("Nutrient") as Nutrient;
               myNutrient.Add(z.Name, nut);

               var fert = (z as Zone).FindInScope("Fertiliser") as Fertiliser;
               myFert.Add(z.Name, fert);
               
               foreach (var c in z.FindAllChildren<Plant>() ) {
                   myCrops.Add(z.Name + "," + c.Name, c);
               }
            }
              
            foreach (string paddockName in myPaddockZones.Keys) {
               me.Add(paddockName + "__NeedReset", 1);

               Summary.WriteMessage(this, "Adding " + paddockName, MessageType.Diagnostic);
               me.Add(paddockName + "_eswStart", 0);
               me.Add(paddockName + "_eswYesterday", 0);
               me.Add(paddockName + "_Ep", 0);
               me.Add(paddockName + "_drainage", 0);
               me.Add(paddockName + "_runoff", 0);
               me.Add(paddockName + "_no3Start", 0);
               me.Add(paddockName + "_no3Yesterday", 0);
               me.Add(paddockName + "_rain", 0);
               me.Add(paddockName + "_evaporation", 0);
               me.Add(paddockName + "_applied_fert", 0);
               
               double[] TotalC = myNutrient[paddockName].TotalC.ToArray(); // 
               meArray.Add(paddockName + "_CStart", new double[TotalC.Length]);
               meArray.Add(paddockName + "_CYesterday", new double[TotalC.Length]);
               meArray.Add(paddockName + "_dlt_carbon_tot", new double[TotalC.Length]);
               meArray.Add(paddockName + "_n2o_tot", new double[TotalC.Length]);
               meInt.Add(paddockName + "_daysInPhase", 0);

               meArray.Add(paddockName + "_annual_CStart", new double[TotalC.Length]);
               meArray.Add(paddockName + "_annual_CYesterday", new double[TotalC.Length]);
               meArray.Add(paddockName + "_annual_dlt_carbon_tot", new double[TotalC.Length]);
               meArray.Add(paddockName + "_annual_n2o_tot", new double[TotalC.Length]);
               

               double[] dlayer = myWaterBalances[paddockName].Thickness.ToArray();
               double dep = 0;
               int iLayer = 0;
               for (iLayer = 0; iLayer < dlayer.Length && dep < 300; iLayer++)
                    dep += dlayer[iLayer];
               if (dep != 300) { throw new Exception($"Layer structure is not aligned to 300mm boundary in {paddockName}"); }
               meInt.Add(paddockName + "_iLayer_300mm", iLayer);
               Summary.WriteMessage(this, "L @300 = " + iLayer.ToString(), MessageType.Diagnostic);
      
               for ( ;iLayer < dlayer.Length && dep < 1000; iLayer++)
                    dep += dlayer[iLayer];
               //if (dep > 1000) { throw new Exception($"Layer structure is not aligned to 1000mm boundary in {paddockName}"); }
               meInt.Add(paddockName + "iLayer_300_1000mm", iLayer);
               Summary.WriteMessage(this, $"L @1000 = {iLayer}  (= {dep} mm)", MessageType.Diagnostic);
           }

       } 
       
       [EventSubscribe("Transition")] 
       public void OnTransition(object sender, EventArgs e) {
          me[currentPaddock + "__NeedReset"] = 1;
       } 
   
   [EventSubscribe("StartOfDay")] 
   public void OnStartOfDay(object sender, EventArgs e) { 
      foreach (string paddockName in myPaddockZones.Keys) {
         if (me[paddockName + "__NeedReset"] > 0) {
            me[paddockName + "__NeedReset"] = 0;
            me[paddockName + "_eswStart"] = MathUtilities.Sum(myWaterBalances[paddockName].ESW);
            me[paddockName + "_swYesterday"] = me[paddockName + "_eswStart"];
            me[paddockName + "_Ep"] = 0;
            me[paddockName + "_drainage"] = 0;
            me[paddockName + "_runoff"] = 0;
            me[paddockName + "_no3Start"] = myNO3[paddockName].kgha.Sum();
            me[paddockName + "_no3Yesterday"] = me[paddockName + "_no3Start"];
            me[paddockName + "_rain"] = 0;
            me[paddockName + "_evaporation"] = 0;
            me[paddockName + "_applied_fert"] = 0;
            
            // C pools aren't initialised properly until the end of the 1st day. Fudge it for now.
            var TotalC = myNutrient[paddockName].TotalC.ToArray();
            meArray[paddockName + "_CStart"] = TotalC;
            meArray[paddockName + "_CYesterday"] = TotalC;
            meArray[paddockName + "_dlt_carbon_tot"] = new double[TotalC.Length];
            meArray[paddockName + "_n2o_tot"] = new double[TotalC.Length];
            meInt[paddockName + "_daysInPhase"] = 0;
            
         }
      }
   }
   
   [EventSubscribe("StartOfYear")] 
   public void OnStartOfYear(object sender, EventArgs e) { 
      foreach (string paddockName in myPaddockZones.Keys) {
         var TotalC = myNutrient[paddockName].TotalC.ToArray();
         meArray[paddockName + "_annual_CStart"] = TotalC;
         meArray[paddockName + "_annual_CYesterday"] = TotalC;
         meArray[paddockName + "_annual_dlt_carbon_tot"] = new double[TotalC.Length];
         meArray[paddockName + "_annual_n2o_tot"] = new double[TotalC.Length];
      }
   }
       
   private IEnumerable<string> listCropsIn(string paddock) {
      return(myCrops.Keys.ToList().
          Where(c => c.StartsWith(paddock + "," )).
          Select(s => s.Substring(s.IndexOf(',') + 1)));
   }
   
   [EventSubscribe("EndOfDay")] 
   public void OnEndOfDay(object sender, EventArgs e) { 
      foreach (string paddockName in myPaddockZones.Keys) 
      {
         foreach (var cropName in listCropsIn(paddockName))
         {
            double Ep =  GetValuebyName(myPaddockZones[paddockName].Get($"[{cropName}].Leaf.WaterAllocation"));  
            me[paddockName + "_Ep"] += Ep;
         }
         
         me[paddockName + "_swYesterday"] = MathUtilities.Sum(myWaterBalances[paddockName].ESW);

         me[paddockName + "_drainage"] += myWaterBalances[paddockName].Drainage;

         me[paddockName + "_runoff"] += myWaterBalances[paddockName].Runoff;

         me[paddockName + "_rain"] += Weather.Rain;
         
         me[paddockName + "_evaporation"] += myWaterBalances[paddockName].Es;

         me[paddockName + "_applied_fert"] += myFert[paddockName].NitrogenApplied;

         me[paddockName + "_no3Yesterday"] = myNO3[paddockName].kgha.Sum();

         var TotalC = myNutrient[paddockName].TotalC.ToArray();
         if (MathUtilities.Sum( meArray[paddockName + "_CStart"] ) <= 0) {  // only occurs on the 1st day of simulation
            meArray[paddockName + "_CStart"] = TotalC;  
            meArray[paddockName + "_annual_CStart"] = TotalC;  
         }
         meArray[paddockName + "_CYesterday"] = TotalC;  
         meArray[paddockName + "_annual_CYesterday"] = TotalC;  
         for (int i = 0; i < TotalC.Length; i++) {
            meArray[paddockName + "_dlt_carbon_tot"][i] = TotalC[i] - meArray[paddockName + "_CStart"][i];
            meArray[paddockName + "_n2o_tot"][i] += myNutrient[paddockName].N2Oatm[i];

            meArray[paddockName + "_annual_dlt_carbon_tot"][i] = TotalC[i] - meArray[paddockName + "_annual_CStart"][i];
            meArray[paddockName + "_annual_n2o_tot"][i] += myNutrient[paddockName].N2Oatm[i];
         }
         meInt[paddockName + "_daysInPhase"]++;
      }
    }
    
   // Cumulative Ep: The total transpiration since the last transition
   [Units("mm")]
   public double TEp {
      get {return(getv(currentPaddock + "_Ep"));}
      set {}
   }
   // Cumulative Drainage
   [Units("mm")]
   public double TDrainage {
      get {return(getv(currentPaddock + "_drainage"));}
   }
   // Cumulative Runoff
   [Units("mm")]
   public double TRunoff {
      get {return(getv(currentPaddock + "_runoff"));}
   }
   // <summary> The total rain since the last transition</summary>
   [Units("mm")]
   public double TRainfall {
      get {return(getv(currentPaddock + "_rain"));}
   }
   
   [Units("mm")]
   public double TEs {
      get {return(getv(currentPaddock + "_evaporation"));}
      set {}
   }
   // <summary> The total NO3 applied since the last transition </summary>
   [Units("kg/ha")]
   public double TFertAsNO3 {
      get {return(getv(currentPaddock + "_applied_fert"));}
      set {}
   }

   // <summary> Instantaneous sw at start </summary>
   [Units("mm")]
   public double eswStart {
      get { return(getv(currentPaddock + "_eswStart"));} 
      set {}
   }
   // <summary> Instantaneous sw at end </summary>
   [Units("mm")]
   public double eswYesterday {
      get {return(getv(currentPaddock + "_eswYesterday"));} 
      set {}
   }
   // <summary> Instantaneous no3 at start of a phase </summary>
   [Units("kg/ha")]
   public double no3Start { 
      get {return(getv(currentPaddock + "_no3Start"));}
   }
   // <summary> Instantaneous no3 at end of a phase </summary>
    [Units("kg/ha")]
   public double no3Yesterday {
      get {return(getv(currentPaddock + "_no3Yesterday"));}
   }

   // <summary> Instantaneous total carbon at start of a phase </summary>
    [Units("kg/ha")]
   public double[] totCStart { 
      get {return(geta(currentPaddock + "_CStart"));}
   }
   // <summary> Instantaneous no3 at end of a phase </summary>
    [Units("kg/ha")]
   public double[] totCYesterday {
      get {return(geta(currentPaddock + "_CYesterday"));}
   }
   
   [Units("kg/ha")]
   // <summary> Change in total carbon to 300mm over water year (t/ha) </summary>
   public double dlt_carbon_tot_300mm {
      get {
         double res = 0;
         int n = getInt( currentPaddock + "_iLayer_300mm" );
         for (var i = 0; i < n; i++)
            res += geta(currentPaddock + "_dlt_carbon_tot", i);
         return(res);
      }
   }
   [Units("kg")]
   public double annual_dlt_carbon_tot_300mm {
      get {
         double res = 0;
         foreach (string paddockName in myPaddockZones.Keys) 
         {
            int n = getInt( paddockName + "_iLayer_300mm" );
            for (var i = 0; i < n; i++)
               res += geta(paddockName + "_annual_dlt_carbon_tot", i) * myPaddockZones[paddockName].Area;
         }
         return(res);
      }
   }

    // <summary> Change in total carbon from 300mm - 1000mm over water year</summary>
    [Units("kg/ha")]
    public double dlt_carbon_tot_300_1000mm {
      get {
         double res = 0;
         int n1 = getInt( currentPaddock + "_iLayer_300mm" );
         int n2 = getInt( currentPaddock + "_iLayer_300mm_1000mm" );
         for (var i = n1; i < n2; i++)
            res += geta(currentPaddock + "_dlt_carbon_tot", i);
         return(res);
      }
   }
   
   
   // <summary> N2O emitted from top300mm since start of water year </summary>
   [Units("kg/ha")]
   public double n2o_300mm {
      get {
         double res = 0;
         int n = getInt( currentPaddock + "_iLayer_300mm" );
         for (var i = 0; i < n; i++)
            res += geta(currentPaddock + "_n2o_tot", i);
         return(res);
      }
   }
   
   [Units("kg")]
   // <summary> N2O emitted from top300mm since start of water year (kg) </summary>
   public double annual_n2o_300mm {
      get {
         double res = 0;
         foreach (string paddockName in myPaddockZones.Keys) {
            int n = getInt( paddockName + "_iLayer_300mm" );
            for (var i = 0; i < n; i++)
               res += geta(paddockName + "_annual_n2o_tot", i) * myPaddockZones[paddockName].Area;
         }
         return(res);
      }
   }

   // <summary> N2O emitted from 300mm - 1000mm since start of water year</summary>
   [Units("kg/ha")]
   public double n2o_300_1000mm {
      get {
         double res = 0;
         int n1 = getInt( currentPaddock + "_iLayer_300mm" );
         int n2 = getInt( currentPaddock + "_iLayer_300mm_1000mm" );
         for (var i = n1; i < n2; i++)
            res += geta(currentPaddock + "_n2o_tot", i);
         return(res);
      }
   }
   
    //<summary>CO2 equivalent emissions to 300mm since transition</summary> 
   [Units("t/ha")]
   public double co2_equiv_300mm {
      get {
         return((-1 * dlt_carbon_tot_300mm * 3.67 + 
                 n2o_300mm * 298) / 1000.0);
      }
   }
   
   [Units("t")]
   public double annual_co2_equiv_300mm {
      get {
         return((-1 * annual_dlt_carbon_tot_300mm * 3.67 + 
                 annual_n2o_300mm * 298) / 1000.0);
      }
   }

    //<summary>CO2 equivalent emissions from 300mm -  1000mm since transition</summary>
   [Units("t/ha")]
   public double co2_equiv_300_1000mm {
      get {
         return((-1 * dlt_carbon_tot_300_1000mm * 3.67 + 
            n2o_300_1000mm * 298) / 1000.0);
           
      }
   }

   // <summary> Instantaneous yield (kg/ha, sum of all crops) </summary>
   [Units("kg/ha")]
   public double yield_kgha {
      get{
         double yld2 = 0;
         foreach (var cropName in listCropsIn(currentPaddock))
         {
            // This is quite a mouthful. Should be an easier way to do this..
            var value = myPaddockZones[currentPaddock].Get($"[{cropName}].Grain.Total.Wt"); 
            if (value != null) 
               yld2 = yld2 + GetValuebyName(value) * 10;  // g/m2 -> kg/ha
         }
         return yld2 ;
      }
      set {}
   }

   //<summary> Instantaneous yield (kg) of all crops </summary>
   [Units("kg")]
   public double yield_kg {
      get{
         double yld2 = 0;
         foreach (var cropName in listCropsIn(currentPaddock))
         {
            // This is quite a mouthful. Should be an easier way to do this..
            var value =  myPaddockZones[currentPaddock].Get($"[{cropName}].Grain.Total.Wt"); 
            if (value != null) 
               yld2 = yld2 + GetValuebyName(value) * 10 * myPaddockZones[currentPaddock].Area;// g/m2 -> kg/ha
         }
         return yld2 ;
      }
      set {}
   }

   //<summary> Instantaneous biomass (kg/ha) of all crops</summary>
   [Units("kg/ha")]
   public double biomass_kgha {
      get{
         double biomass2 = 0;
         foreach (var cropName in listCropsIn(currentPaddock))
         {
            // This is quite a mouthful. Should be an easier way to do this..
            var value = myPaddockZones[currentPaddock].Get($"[{cropName}].AboveGround.Wt");
            if (value != null) 
               biomass2 = biomass2 + GetValuebyName(value) * 10;  // g/m2 -> kg/ha;
         }
         return biomass2 ;}
      set {}
   }
   // <summary>Instantaneous biomass (kg) of all crops</summary>
   [Units("kg")]
   public double biomass_kg {
      get{
         double biomass2 = 0;
         foreach (var cropName in listCropsIn(currentPaddock))
         {
            // This is quite a mouthful. Should be an easier way to do this..
            var value =  myPaddockZones[currentPaddock].Get($"[{cropName}].AboveGround.Wt");
            if (value != null) 
               biomass2 = biomass2 + GetValuebyName(value) * 10 * myPaddockZones[currentPaddock].Area; // g/m2 -> kg/ha 
         }
         return biomass2 ;}
   }
#if false
   // Instantaneous protein of all crops
   [Output, Description("Grain Protein"), Units("%")] public double protein {
      get{
         double pro2 = 0;
         Paddock p = (Paddock) MySimulation.LinkByName(currentPaddock());
         foreach (Component crop in p.Crops)
         {
            double pro = 0;
            crop.Get("grain_protein", out pro);
            pro2 = pro2 + pro;
         }
        
         return pro2 ;}
   }
   
   // Instantaneous N of all crops
   [Output, Description("Grain N"), Units("g/m2")] public double GrainN_gm2 {
      get{
         double GN2 = 0;
         Paddock p = (Paddock) MySimulation.LinkByName(currentPaddock());
         foreach (Component crop in p.Crops)
         {
            double GN = 0;
            if (crop.Get("grain_N", out GN))
               GN2 = GN2 + GN;
            else if (crop.Get("GrainGreenN", out GN))
               GN2 = GN2 + GN;
         }
         return GN2 ;}
   }

#endif
   
   public int daysInPhase {
      get {
        return(getInt( currentPaddock + "_daysInPhase"));
      }
   }
   
        private double[] geta(string key) {
           if (meArray.ContainsKey(key)) return(meArray[key]);
           return(null);
        }

        private double geta(string key, int i) {
           if (meArray.ContainsKey(key)) return(meArray[key] [i]);
           return(-1.0);
        }
        
        private double getv(string key) {
           if (me.ContainsKey(key)) return(me[key]);
           return(-1.0);
        }
        
        private int getInt(string key) {
           if (meInt.ContainsKey(key)) return(meInt[key]);
           return(0);
        }
        
        private double GetValuebyName(object value) 
        {
            double result;
            if (value is IFunction function)
                value = function.Value();
            result = (double) Convert.ChangeType(value, typeof(double));
            return(result);
        }

    
        [EventSubscribe("DoManagement")]
        private void DoDailyCalculations(object sender, EventArgs e)
        {
            // Called once per day
        }
    }
}
```
      Manager Pesticides
        ChemicalName = Pesticide
        ApplicationRate = 0.15
        CO2_conv = 24.5
        TractorName = SprayRig
        ImplementName = Sprayer
```csharp
using System;
using System.Linq;
using System.Collections.Generic;
using Models.Core;
using Models.Interfaces;
using Models.Functions;
using Models.PMF;
using Models.Soils;
using Models.WaterModel;
using Models.Soils.Nutrients;
using Models.Management;
using Models.Utilities;
using Models.Climate;
using APSIM.Shared.Utilities;

namespace Models
{
    [Serializable]
    
    public class PestControlScript : Model
    {
        [Link] private Clock Clock;
        [Link] private Summary Summary;

        [Description("Control chemical name (matches item in economics)")]
        public string ChemicalName { get; set; } 

        [Description("Application rate (kg/ha)")]
        public double ApplicationRate { get; set; } 

        [Description("CO2 conversion rate (* kg.chem => kg.co2_e)")]
        public double CO2_conv { get; set; } 

        [Description("Tractor name")]
        public string TractorName { get; set; } 

        [Description("Implement name")]
        public string ImplementName { get; set; } 

        /// <summary>Pesticide applied today across all paddocks (kg)</summary>
        [Units("kg")]
        public double PesticideApplied {get; set;}

        /// <summary>CO2 equivalent of that pesticide (kg)</summary>
        [Units("kg")]
        public double CO2_e {get; set;}

        [NonSerialized] private Events myEvents;
        [EventSubscribe("StartOfSimulation")]
        private void OnStartOfSimulation(object sender, EventArgs e)
        {
            myEvents = new Events(this);
        }

        [EventSubscribe("StartOfDay")]
        private void OnStartOfDay(object sender, EventArgs e)
        {
            CO2_e = PesticideApplied = 0;
        }

        [EventSubscribe("Sowing")]
        private void OnSowing(object sender, EventArgs e)
        {
            string paddockName = (sender as Model).Parent.Name;           
            var paddockZone = FindInScope(paddockName) as Zone;
            //var crops = paddockZone.Children.OfType<IPlant>();
            
             //foreach (var crop in crops)
           //{
               string cropType = (sender as Model).Name; 
                if (cropType == "Sorghum") 
               { 
            
            double amountToApply = ApplicationRate * paddockZone.Area;
            PesticideApplied += amountToApply;
            CO2_e = PesticideApplied * CO2_conv;

            myEvents.Publish("DoPaddockExpenditure",  new object[] { this, 
                  new FarmEconomics.PaddockExpenditureArgs{
                      Description = $"{ChemicalName} pesticide",
                      Category = "In-crop", 
                      Paddock = paddockName,
                      Name = ChemicalName,
                      Rate = ApplicationRate,
                      Area = paddockZone.Area}});
                       
            myEvents.Publish("Operate",  new object[] { this, 
                  new FarmMachinery.FarmMachineryOperateArgs{
                      Tractor = TractorName,
                      Implement = ImplementName,
                      Category = "In-crop",
                      Paddock = paddockName}}); 
          
            Summary.WriteMessage(this, $"{Clock.Today.ToShortDateString()}: Applied {amountToApply} kg of {ChemicalName} to {paddockName}, total today {PesticideApplied} kg.", MessageType.Information);
        }
        //}
        }
    }
}
```
      Report AnnualReport: EventNames=[Clock].EndOfYear
        VariableNames:
          [Clock].Today
          [FarmEconomics].Balance as Balance
          Sum of [Weather].Rain from [Clock].StartOfYear to [Clock].Today as Rain
          Sum of [FarmMachinery].FuelConsumption on [Clock].EndOfDay from [Clock].StartOfYear to [Clock].Today as FuelConsumption
          Sum of [Manager].Script.manureApplied_kg from [Clock].StartOfYear to [Clock].Today as ManureApplied
          // CO2 sources
          Sum of [Pesticides].PestControlScript.CO2_e from [Clock].StartOfYear to [Clock].Today as pest_co2
          Sum of [Weeds].WeedScript.CO2_e from [Clock].StartOfYear to [Clock].Today as weed_co2
          // This is in kg
          Sum of ([FarmMachinery].FuelConsumption * 2.68) on [Clock].EndOfDay from [Clock].StartOfYear to [Clock].Today as diesel_co2 //kg
          [PhaseAccumulations].AccScript.annual_co2_equiv_300mm as co2_equiv_soil
      Report PhaseReport: EventNames=[RotationManager].Transition
        VariableNames:
          [Clock].Today
          [Manager].MScript.currentPaddock as Paddock
          [Manager].MScript.currentState as currentState
          [PhaseAccumulations].AccScript.daysInPhase as daysInPhase
          [PhaseAccumulations].AccScript.eswStart  as eswStart
          [PhaseAccumulations].AccScript.eswYesterday as eswEnd
          [PhaseAccumulations].AccScript.no3Start  as no3Start
          [PhaseAccumulations].AccScript.no3Yesterday as no3End
          [PhaseAccumulations].AccScript.yield_kgha as yield_kgha
          [PhaseAccumulations].AccScript.biomass_kgha as biomass_kgha
          [PhaseAccumulations].AccScript.TEp as TEp
          [PhaseAccumulations].AccScript.TEs as TEs
          [PhaseAccumulations].AccScript.TRunoff as TRunoff
          [PhaseAccumulations].AccScript.TDrainage as TDrainage
          [PhaseAccumulations].AccScript.TRainfall as TRainfall
          [PhaseAccumulations].AccScript.TFertAsNO3 as TFert
          [PhaseAccumulations].AccScript.co2_equiv_300mm as co2_equiv_300mm
          [PhaseAccumulations].AccScript.dlt_carbon_tot_300mm as carbon_300mm
          sum([Nutrient].Organic.C) as OrganicC
        Memo
          Each line (transition) is reporting at the end of the phase, immediately before the next.

          Usually that's when a crop is harvested, or when a fallow finishes

          The module requires a manager (ie PhaseAccumulations) to tell us (by a DoOutput() method call) when the transition has been made.
  Memo
    **Long term simulations**

    4 sites, 3 fert levels.

    Soil is reset at sowing (rainfall criteria), starts with 50KgN
