Simulations: Version=174
  DataStore
  Experiment Standard
    Factors
      Permutation
        Factor Site
          CompositeFactor Capella
            Specifications:
              [Weather]
              [Clock]
            Weather Capella met
              FileName=C:\Users\uqztan6\OneDrive - The University of Queensland\Documents\APSFARM model\Moonggoo\climate\baseline\Capella_baseline.met
            Clock: Start=1970-01-01; End=2019-12-31
          CompositeFactor CapellaSSP126
            Specifications:
              [Weather]
              [Clock]
            Weather Capella126 met
              FileName=C:\Users\uqztan6\OneDrive - The University of Queensland\Documents\APSFARM model\Moonggoo\climate\baseline\Capella_ssp126.met
            Clock: Start=2021-01-01; End=2070-12-31
          CompositeFactor CapellaSSP245
            Specifications:
              [Weather]
              [Clock]
            Weather Capella245 met
              FileName=C:\Users\uqztan6\OneDrive - The University of Queensland\Documents\APSFARM model\Moonggoo\climate\baseline\Capella_ssp245.met
            Clock: Start=2021-01-01; End=2070-12-31
          CompositeFactor CapellaSSP585
            Specifications:
              [Weather]
              [Clock]
            Weather Capella585 met
              FileName=C:\Users\uqztan6\OneDrive - The University of Queensland\Documents\APSFARM model\Moonggoo\climate\baseline\Capella_ssp585.met
            Clock: Start=2021-01-01; End=2070-12-31
    Simulation EucalyptusRotation
      Memo
        This example grows a eucalypt rotation, with harvesting at 7 years of age and replanting and fertilising on the 1st August after each harvest.
      Weather: FileName=climate\baseline\Dalby_baseline.met
      Clock: Start=1970-01-01; End=2019-12-31
      Summary
      SoilArbitrator Soil Arbitrator
      Zone Plantation: Area=1; Slope=0; AspectAngle=0; Altitude=50
        Irrigation
        Fertiliser
        SurfaceOrganicMatter: InitialResidueName=Wheat; InitialResidueType=Wheat; InitialResidueMass=2000; InitialStandingFraction=0; InitialCPR=0; InitialCNR=80
        MicroClimate: a_interception=0; b_interception=1; c_interception=0; d_interception=0; SoilHeatFluxFraction=0.4; MinimumHeightDiffForNewLayer=0; NightInterceptionFraction=0.5; ReferenceHeight=2
        Plant Eucalyptus
        Manager TreeManagement
          RowSpace = 3
          RowWidth = 3
          CultivarName = grandis
          PlantingDate = 1-jan
          HarvestAge = 15
          FertAmount = -
```csharp
using Models.Soils;
using System.Linq;
using System;
using Models.Core;
using Models.PMF;
using APSIM.Shared.Utilities;

namespace Models
{
    [Serializable] 
    [System.Xml.Serialization.XmlInclude(typeof(Model))]
    public class Script : Model
    {
        [Link] Plant Eucalyptus;
        [Link] Clock Clock;
        [Link] Fertiliser Fertiliser;

        public double TimeSincePlanting {get; set;}

        [Description("Spacing (m) between plants within rows")]
        public double RowSpace { get; set; }

        [Description("Spacing (m) between rows")]
        public double RowWidth { get; set; }

        [Description("Cultivar")]
        [Display(Type=DisplayType.CultivarName, PlantName = "Eucalyptus")]
        public string CultivarName { get; set; }

        [Description("Planting Date (dd-mmm)")]
        public String PlantingDate { get; set; }

        [Description("Harvest Age (years)")]
        public double HarvestAge { get; set; }

        [Description("Amount of fertiliser N to be applied at planting (kg N/ha)")]
        public double FertAmount { get; set; }

        [EventSubscribe("DoManagement")]
        private void OnDoManagement(object sender, EventArgs e)
        {
            double PlantPopulation = 1 / (RowWidth * RowSpace);
            double RowWidthmm = RowWidth * 1000;

            if (DateUtilities.WithinDates(PlantingDate, Clock.Today, PlantingDate) && !Eucalyptus.IsAlive)
            {
                Eucalyptus.Sow(population: PlantPopulation, 
                    cultivar: CultivarName, 
                    depth: 100, 
                    rowSpacing: RowWidthmm);
                TimeSincePlanting = 0;
                Fertiliser.Apply(Amount: FertAmount, Type: Fertiliser.Types.NO3N);
            }

            if (TimeSincePlanting > HarvestAge && Eucalyptus.IsAlive)
            {
               Eucalyptus.Harvest();
               Eucalyptus.EndCrop();         
               TimeSincePlanting = 0;  
            }

            TimeSincePlanting += 1.0/365.0;
        }
    }
}
```
        Report: EventNames=[Clock].EndOfYear
          VariableNames:
            [Clock].Today
            [TreeManagement].Script.TimeSincePlanting
            [Eucalyptus].Age
            [Eucalyptus].AboveGround.Wt
            [Eucalyptus].BelowGround.Wt
            [Eucalyptus].Total.Wt
            [Eucalyptus].Stem.Wt
            [Eucalyptus].FineRoot.Wt
            [Eucalyptus].CoarseRoot.Wt
            [Eucalyptus].Total.N
            [Eucalyptus].Branch.Wt
            [Eucalyptus].Leaf.Transpiration
            [Eucalyptus].Leaf.CoverGreen
            [Eucalyptus].Leaf.LAI
            [Eucalyptus].Stem.DBH
            [Eucalyptus].Stem.Ht
            [Eucalyptus].Stem.Vol
            [Eucalyptus].RootShootRatio
            sum([Nutrient].Organic.C) as OrganicC
            sum([Nutrient].Organic.N) as OrganicN
            [Eucalyptus].Total.Wt*10 as EucalyptusTotalGroundWtKgha
            sum([Nutrient].Catm/1000*3.67) as co2tha
        Soil Black Vertosol (Capella No1272): ASCOrder=Vertosol; ASCSubOrder=Black; SoilType=Black Vertosol; Site=Capella; NearestTown=Capella; Region=Central Highlands; State=Queensland; Country=Australia; ApsoilNumber=1272; Latitude=-23.159917; Longitude=148.048517; LocationAccuracy=+/- 20m; YearOfSampling=2015; DataSource=Brett Cocks  CSIRO Agriculture
          Comments=Shallow Vertosol Black Self-Mulching Epicalcareous over decaying basalt  - Collected as a part of GRDC Measuring an manageing soil water
          Physical
            Thickness  ParticleSizeClay  ParticleSizeSand  ParticleSizeSilt  Rocks  BD    AirDry  LL15  DUL    SAT
            150        30                5                 65                0      1.15  0.15    0.3   0.487  0.537
            150        30                5                 65                0      1.16  0.24    0.3   0.481  0.531
            300        30                5                 65                0      1.17  0.3     0.3   0.48   0.53
            300        30                5                 65                0      1.17  0.3     0.3   0.48   0.53
            BD, DUL, SAT source: Field measured and checked for sensibility
            AirDry, LL15 source: Estimated based on local knowledge
            Rocks, ParticleSizeSand, ParticleSizeSilt, ParticleSizeClay source: Calculated
            SoilCrop maizeSoil: LL=[0.28, 0.28, 0.3, 0.3]; KL=[0.06, 0.06, 0.06, 0.04]; XF=[1, 1, 1, 1]
              LL source: Field measured and checked for sensibility
            SoilCrop sorghumSoil: same as Standard.EucalyptusRotation.Plantation.Black Vertosol (Capella No1272).Physical.maizeSoil
            SoilCrop chickpeaSoil: same as Standard.EucalyptusRotation.Plantation.Black Vertosol (Capella No1272).Physical.maizeSoil
            SoilCrop wheatSoil: same as Standard.EucalyptusRotation.Plantation.Black Vertosol (Capella No1272).Physical.maizeSoil
            SoilCrop MungbeanSoil: LL=[0.261, 0.248, 0.3, 0.306]; KL=[0.06, 0.06, 0.06, 0.04]; XF=[1, 1, 1, 1]
            SoilCrop SoybeanSoil: LL=[0.261, 0.248, 0.3, 0.306]; KL=[0.06, 0.06, 0.06, 0.04]; XF=[1, 1, 1, 1]
            SoilCrop RedcloverSoil: LL=[0.28, 0.28, 0.3, 0.3]; KL=[0.06, 0.06, 0.06, 0.04]; XF=[1, 1, 1, 1]
            SoilCrop EucalyptusSoil: LL=[0.3, 0.3, 0.3, 0.313]; KL=[0.1, 0.1, 0.1, 0.1]; XF=[1, 1, 1, 1]
              LL, KL, XF source: Estimated
            SoilCrop CottonSoil: LL=[0.3, 0.3, 0.3, 0.31296]; KL=[0.1, 0.1, 0.1, 0.1]; XF=[1, 1, 1, 1]
              LL, KL, XF source: Estimated
          WaterBalance SoilWater: SummerDate=1-nov; SummerU=6; SummerCona=3.5; WinterDate=1-apr; WinterU=4; WinterCona=2.5; DiffusConst=40; DiffusSlope=16; Salb=0.12; CN2Bare=73; CNRed=20; CNCov=0.08; PSIDul=-100; Thickness=[150, 150, 300, 300]; SWCON=[0.3, 0.3, 0.3, 0.3]
          Organic: FOMCNRatio=40; CarbonUnits=WalkleyBlack
            Thickness  Carbon  SoilCNRatio  FBiom  FInert  FOM
            150        0.75    12           0.04   0.4     523.082
            150        0.6     12           0.02   0.6     317.265
            300        0.375   12           0.01   0.8     116.715
            300        0.188   12           0.01   0.95    42.937
          Chemical: PHUnits=Water
            Thickness  PH   EC    ESP    CEC
            150        8.1  0.06  0.005  76
            150        8.2  0.05  0.007  76
            300        8.4  0.07  0.011  71
            300        8.3  0.07  0.017  70
            EC, CL, PH source: Measured
            ESP source: C
          Nutrient
          Solute NO3: Thickness=[300]; InitialValues=[50]; InitialValuesUnits=kg/ha; WaterTableConcentration=0; D0=0; DepthConstant=0; MaxDepthSoluteAccessible=0; RunoffEffectivenessAtMovingSolute=0; MaxEffectiveRunoff=0
          Solute NH4: InitialValuesUnits=ppm; WaterTableConcentration=0; D0=0; DepthConstant=0; MaxDepthSoluteAccessible=0; RunoffEffectivenessAtMovingSolute=0; MaxEffectiveRunoff=0
          Solute Urea: Thickness=[150, 150, 300, 300]; InitialValues=[0, 0, 0, 0]; InitialValuesUnits=kg/ha; WaterTableConcentration=0; D0=0; DepthConstant=0; MaxDepthSoluteAccessible=0; RunoffEffectivenessAtMovingSolute=0; MaxEffectiveRunoff=0
          Water: Thickness=[150, 150, 300, 300]; InitialValues=[0.45, 0.445, 0.444, 0.444]; InitialPAWmm=130.65; RelativeTo=LL15; FilledFromTop=false
          CERESSoilTemperature Temperature
  Memo
    **Long term simulations**

    4 sites, 3 fert levels.

    Soil is reset at sowing (rainfall criteria), starts with 50KgN
